OpenVSP model (file version 5), 13 components.
Geometry view with OpenVSP parameter names; values to 6 digits, angles in degrees, lengths in the model's unit.
Overall bounding box: X_Min=0 X_Len=7.9134 Y_Min=-5.81647 Y_Len=11.6329 Z_Min=-1.22682 Z_Len=2.90947

Fuselage "Fuselage"
  location (X Y Z) 0 0 0, rotation 0 0 0
  bounding box size 6.8 1.31452 1.46304
  Design: Length=6.8
  cross sections:
    n  XLocPercent  YLocPercent  ZLocPercent  shape
    0  0            0            0            point
    1  0.0543478    0            0            general fuselage BotStr=0.83 BotTanAngle=90 CornerRad=0 Height=0.3048 LowStr=0.83 MaxWidthLoc=0 TopStr=0.83 TopTanAngle=90 UpStr=0.83 Width=0.3048
    2  0.0623188    0            0            as above
    3  0.0724638    0            -0.00362319  general fuselage BotStr=1.2 BotTanAngle=90 CornerRad=0 Height=0.3556 LowStr=1 MaxWidthLoc=0 TopStr=1.2 TopTanAngle=90 UpStr=1 Width=1.0414
    4  0.151611     0            -0.0144928   general fuselage BotStr=1.2 BotTanAngle=90 CornerRad=0 Height=0.8001 LowStr=1.2 MaxWidthLoc=0 TopStr=1.2 TopTanAngle=90 UpStr=1.2 Width=1.15824
    5  0.223551     0            -0.0144928   general fuselage BotStr=1.2 BotTanAngle=90 CornerRad=0 Height=0.88392 LowStr=1.2 MaxWidthLoc=0 TopStr=1.2 TopTanAngle=90 UpStr=1.2 Width=1.2192
    6  0.431522     0            0.0221739    general fuselage BotStr=1.2 BotTanAngle=90 CornerRad=0.5 Height=1.46304 LowStr=1.2 MaxWidthLoc=0 TopStr=1.2 TopTanAngle=90 UpStr=1.2 Width=1.2446
    7  0.615942     0            0.0165217    general fuselage BotStr=1 BotTanAngle=90 CornerRad=0 Height=1.1938 LowStr=1 MaxWidthLoc=0 TopStr=1 TopTanAngle=90 UpStr=1 Width=1.016
    8  0.83913      0            0.0195652    general fuselage BotStr=0.83 BotTanAngle=90 CornerRad=0 Height=0.73152 LowStr=0.83 MaxWidthLoc=0 TopStr=0.83 TopTanAngle=90 UpStr=0.83 Width=0.3048
    9  1            0            0.0405882    general fuselage BotStr=1.5 BotTanAngle=90 CornerRad=0 Height=0.8 LowStr=1.4 MaxWidthLoc=0 TopStr=1.25 TopTanAngle=90 UpStr=1.26818 Width=0.09

Blank "MainGear", child of "Fuselage"
  location (X Y Z) 3.02768 0 -0.96774, rotation 0 0 0

Fuselage "Tire_MainGear", child of "MainGear"
  location (X Y Z) 3.02768 1.2954 -0.96774, rotation 0 0 90; relative location 0 1.2954 0, rotation 0 0 90
  symmetric about XZ
  bounding box size 0.36576 2.95656 0.36576
  Design: Length=0.18288
  cross sections:
    n  XLocPercent  YLocPercent  ZLocPercent  shape
    0  0            0            0            point
    1  0.35         0            0            circle Circle_Diameter=0.36576
    2  0.65         0            0            as above
    3  1            0            0            point

Fuselage "Pant_MainGear", child of "MainGear"
  location (X Y Z) 2.72288 1.39192 -0.92202, rotation 0 0 0; relative location -0.3048 1.39192 0.04572, rotation 0 0 0
  symmetric about XZ
  bounding box size 0.928022 3.07035 0.36576
  Design: Length=0.9144
  cross sections:
    n  XLocPercent  YLocPercent  ZLocPercent  shape
    0  0            0            0            point
    1  0.35         0            0            general fuselage BotStr=0.83 BotTanAngle=90 CornerRad=0 Height=0.36576 LowStr=0.83 MaxWidthLoc=0 TopStr=0.83 TopTanAngle=90 UpStr=0.83 Width=0.286512
    2  1            0            0            general fuselage BotStr=0.83 BotTanAngle=90 CornerRad=0 Height=0.0991062 LowStr=0.83 MaxWidthLoc=0 TopStr=0.83 TopTanAngle=90 UpStr=0.83 Width=0.01524

Wing "Strut_MainGear", child of "MainGear"
  location (X Y Z) 2.95148 1.41931 -0.90678, rotation 140 0 0; relative location -0.0762 1.41931 0.06096, rotation 140 0 0
  symmetric about XZ
  bounding box size 0.21336 2.8739 0.584333
  totals: TotalSpan=1.6764 TotalProjectedSpan=1.6764 TotalChord=0.196088 TotalArea=0.332128 TotalAR=8.46154
  root: chord 0.18288, twist 0, NACA 4-series Camber=0 CamberLoc=0.5 ThickChord=0.3
  sections:
    n  Span     Root_Chord  Tip_Chord  Area       Sweep     Sweep_Location  Dihedral  Twist  Twist_Location  tip airfoil
    1  0.25146  0.18288     0.192024   0.0471367  -1.04163  0               0         0      0               as above
    2  0.16764  0.192024    0.19812    0.0327019  -1.04163  0               0         0      0               as above
    3  0.4191   0.19812     0.21336    0.0862256  -1.04163  0               0         0      0               as above

Blank "NoseGear", child of "Fuselage"
  location (X Y Z) 0.81534 0 -1.07442, rotation 0 0 0

Fuselage "Tire_NoseGear", child of "NoseGear"
  location (X Y Z) 0.81534 -0.0762 -1.07442, rotation 0 0 90; relative location 0 -0.0762 0, rotation 0 0 90
  bounding box size 0.3048 0.1524 0.3048
  Design: Length=0.1524
  cross sections:
    n  XLocPercent  YLocPercent  ZLocPercent  shape
    0  0            0            0            point
    1  0.35         0            0            circle Circle_Diameter=0.3048
    2  0.65         0            0            as above
    3  1            0            0            point

Fuselage "Pant_NoseGear", child of "NoseGear"
  location (X Y Z) 0.51054 0 -1.0287, rotation 0 0 0; relative location -0.3048 0 0.04572, rotation 0 0 0
  bounding box size 0.927997 0.21336 0.28956
  Design: Length=0.9144
  cross sections:
    n  XLocPercent  YLocPercent  ZLocPercent  shape
    0  0            0            0            point
    1  0.35         0            0            general fuselage BotStr=0.83 BotTanAngle=90 CornerRad=0 Height=0.28956 LowStr=0.83 MaxWidthLoc=0 TopStr=0.83 TopTanAngle=90 UpStr=0.83 Width=0.21336
    2  1            0            0            general fuselage BotStr=0.83 BotTanAngle=90 CornerRad=0 Height=0.0989215 LowStr=0.83 MaxWidthLoc=0 TopStr=0.83 TopTanAngle=90 UpStr=0.83 Width=0.0138545

Wing "Strut_NoseGear", child of "NoseGear"
  location (X Y Z) 0.517263 0 -1.01346, rotation 90 0 0; relative location -0.298077 0 0.06096, rotation 90 0 0
  bounding box size 0.572522 0.0609855 0.560437
  totals: TotalSpan=0.560437 TotalProjectedSpan=0.560437 TotalChord=0.12192 TotalArea=0.0683284 TotalAR=4.59676
  root: chord 0.12192, twist 0, NACA 4-series Camber=0 CamberLoc=0.2 ThickChord=0.499999
  sections:
    n  Span      Root_Chord  Tip_Chord  Area       Sweep  Sweep_Location  Dihedral  Twist  Twist_Location  tip airfoil
    1  0.560437  0.12192     0.12192    0.0683284  38.8   0               0         0      0               as above

Propeller "Prop", child of "Fuselage"
  location (X Y Z) 0.4064 0 0, rotation 0 0 0
  bounding box size 0 1.9558 1.9558
  Design: Diameter=1.9558 NumBlade=3 Beta34=20 UseBeta34Flag=1 Feather=0 Rotate=0 Precone=0 ReverseFlag=0 FoldAngle=0 PropMode=2 AF=113.767 CLi=0.539661 Chord=0.15664 Solidity=0.14958 ConstructXoC=0.5 FeatherAxisXoC=0.5 FeatherOffsetXoC=0
  cross sections:
    n  RadiusFrac  shape
    0  0.16        ellipse Ellipse_Height=0.039116 Ellipse_Width=0.078232
    1  0.4         NACA 16-series Chord=0.168028 IdealCl=0.7 ThickChord=0.144074
    2  1           NACA 16-series Chord=0.0747007 IdealCl=0.2 ThickChord=0.03
  Chord along r/R (cubic Bezier): 0.16: 0.08, 0.306667: 0.15, 0.453333: 0.2, 0.6: 0.2, 0.733333: 0.2, 0.866667: 0.146389, 1: 0.0763889
  Twist along r/R (PCHIP): 0.16: 46.75, 0.75: 20, 1: 13
  Thick along r/R (cubic Bezier): 0.16: 0.5, 0.206667: 0.3, 0.253333: 0.225, 0.3: 0.2, 0.4: 0.125, 0.5: 0.115, 0.6: 0.1, 0.733333: 0.075, 0.866667: 0.055, 1: 0.03
  CLI along r/R (cubic Bezier): 0.16: 0, 0.24: 0.7, 0.32: 0.7, 0.4: 0.7, 0.466667: 0.7, 0.533333: 0.7, 0.6: 0.7, 0.733333: 0.7, 0.866667: 0.7, 1: 0.2

Wing "Vertical", child of "Fuselage"
  location (X Y Z) 6.31 0 -0.098552, rotation 90 0 0
  bounding box size 1.60514 0.14785 1.81994
  totals: TotalSpan=1.7624 TotalProjectedSpan=1.7624 TotalChord=0.856087 TotalArea=1.62357 TotalAR=1.9131
  root: chord 1, twist 0, NACA 4-series Camber=0 CamberLoc=0.5 ThickChord=0.1
  sections:
    n  Span    Root_Chord  Tip_Chord  Area       Sweep  Sweep_Location  Dihedral  Twist  Twist_Location  tip airfoil
    1  0.1524  1           1.23153    0.170042   30     0               0         0      0               NACA 4-series Camber=0 CamberLoc=0.5 ThickChord=0.12
    2  1.5     1.23153     0.62999    1.39614    30     0               0         0      0               as above
    3  0.11    0.62999     0.41349    0.0573914  65     0               0         0      0.25            NACA 4-series Camber=0 CamberLoc=0.2 ThickChord=0.1
  SS_Control "Rudder": UStart=0.4 UEnd=0.6 Length_C_Start=0.35 Length_C_End=0.35 Length_Start=0.431034 Length_End=0.220497 LE_Flag=0 Surf_Type=2

Wing "Wing"
  location (X Y Z) 2.3368 0 -0.40894, rotation 0 0 0
  symmetric about XZ
  bounding box size 1.55514 11.6329 0.714137
  totals: TotalSpan=11.6934 TotalProjectedSpan=11.6136 TotalChord=0.958436 TotalArea=13.5505 TotalAR=9.95355 RelativeTwistFlag=1
  root: chord 1.55509, twist 0, airfoil file "NASA/LANGLEY NLF 0414F AIRFOIL"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 BaseThickChord=0.141832 ThickChord=0.141832
  sections:
    n  Span        Root_Chord  Tip_Chord  Area        Sweep     Sweep_Location  Dihedral  Twist  Twist_Location  tip airfoil
    1  3.33242     1.55509     1.08809    4.4041      0         0.25            5.5       -1.5   0.25            as above
    2  0.00302948  1.08809     1.12239    0.00334829  -83.3641  0.25            5.5       0.05   0.25            as above
    3  2.36533     1.12239     0.790911   2.26279     0         0.25            5.5       -1.5   0.25            as above
    4  0.0922541   0.790911    0.733552   0.070319    25        0.25            25        -0.5   0.25            airfoil file "NASA/LANGLEY NLF 0414F AIRFOIL"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 BaseThickChord=0.141832 ThickChord=0.08
    5  0.0536857   0.733552    0.559388   0.0347062   74.3479   0               25        -1     0.25            airfoil file "NASA/LANGLEY NLF 0414F AIRFOIL"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 BaseThickChord=0.141832 ThickChord=0.04
  SS_Control "Aileron": UStart=0.4444 UEnd=0.531 Length_C_Start=0.29 Length_C_End=0.29 Length_Start=0.314834 Length_End=0.256549 LE_Flag=0 Surf_Type=2
  SS_Control "Flap": UStart=0.175 UEnd=0.285 Length_C_Start=0.3 Length_C_End=0.3 Length_Start=0.434986 Length_End=0.327128 LE_Flag=0 Surf_Type=2

Wing "Horizontal"
  location (X Y Z) 6.4262 0 0.14732, rotation 0 0 0
  symmetric about XZ
  bounding box size 0.758768 4.00661 0.0910933
  totals: TotalSpan=4 TotalProjectedSpan=4 TotalChord=0.490085 TotalArea=2.39958 TotalAR=6.66785
  root: chord 0.758768, twist 0, NACA 4-series Camber=0 CamberLoc=0.5 ThickChord=0.12
  sections:
    n  Span  Root_Chord  Tip_Chord  Area       Sweep  Sweep_Location  Dihedral  Twist  Twist_Location  tip airfoil
    1  1.84  0.758768    0.482852   1.14229    0      0.625           0         0      0               NACA 4-series Camber=0 CamberLoc=0.5 ThickChord=0.1
    2  0.16  0.482852    0.235869   0.0574977  30     0.625           0         0      0               as above
  SS_Control "Elevator": UStart=0.255 UEnd=0.5 Length_C_Start=0.375 Length_C_End=0.375 Length_Start=0.282469 Length_End=0.18107 LE_Flag=0 Surf_Type=2

VSPAERO settings: Sref=13.5505 bref=11.6934 cref=0.958436 Xcg=0.701 Ycg=1.75976e-07 Zcg=0.035052 AlphaStart=3 AlphaEnd=10 AlphaNpts=1 BetaStart=0 BetaEnd=0 BetaNpts=1 MachStart=0.1 MachEnd=0 MachNpts=1 ReCref=6e+06 Vinf=94 Rho=1.225
  control group "Elevator": DeflectionAngle=0
  control group "Rudder": DeflectionAngle=0
  control group "AileronLeft": DeflectionAngle=0
  control group "AileronRight": DeflectionAngle=0
  control group "Flaps": DeflectionAngle=0
