OpenVSP model (file version 5), 4 components.
Geometry view with OpenVSP parameter names; values to 6 digits, angles in degrees, lengths in the model's unit.
Overall bounding box: X_Min=-0.289813 X_Len=0.579625 Y_Min=-0.289813 Y_Len=0.579625 Z_Min=-0.025 Z_Len=0.08

Fuselage "CenterFrame"
  location (X Y Z) -0.1 0 0, rotation 0 0 0
  bounding box size 0.2 0.1 0.05
  Design: Length=0.2
  cross sections:
    n  XLocPercent  YLocPercent  ZLocPercent  shape
    0  0            0            0            point
    1  0.05         0            0            rounded rectangle RoundRectXSec_Radius=0 RoundedRect_Height=0.05 RoundedRect_Width=0.1
    2  0.95         0            0            as above
    3  1            0            0            point

Fuselage "Arm"
  location (X Y Z) 0.16 0.16 0.02, rotation 0 0 -125
  symmetric about XZ, YZ
  bounding box size 0.336383 0.331472 0.01
  Design: Length=0.14
  cross sections:
    n  XLocPercent  YLocPercent  ZLocPercent  shape
    0  0            0            0            rounded rectangle RoundRectXSec_Radius=0.004 RoundedRect_Height=0.01 RoundedRect_Width=0.02
    1  1            0            0            as above

Fuselage "Motor", child of "Arm"
  location (X Y Z) 0.16 0.16 0.02, rotation -90 35 -90; relative location 0 0 0, rotation 0 -90 0
  symmetric about XZ, YZ
  bounding box size 0.335436 0.335436 0.03
  Design: Length=0.03
  cross sections:
    n  XLocPercent  YLocPercent  ZLocPercent  shape
    0  0            0            0            circle Circle_Diameter=0.015
    1  1            0            0            as above

Propeller "Prop", child of "Arm"
  location (X Y Z) 0.16 0.16 0.055, rotation 90 -35 -90; relative location 0 0 0.035, rotation 0 90 0
  symmetric about XZ, YZ
  bounding box size 0.579625 0.579625 0
  Design: Diameter=0.2286 NumBlade=2 Beta34=20 UseBeta34Flag=1 Feather=0 Rotate=81.5464 Precone=0 ReverseFlag=1 FoldAngle=0 PropMode=2 AF=93.8293 CLi=0.540702 Chord=0.156465 Solidity=0.0996085 ConstructXoC=0.5 FeatherAxisXoC=0.5 FeatherOffsetXoC=0
  cross sections:
    n  RadiusFrac  shape
    0  0.07        ellipse Ellipse_Height=0.00785813 Ellipse_Width=0.0157163
    1  0.4         NACA 16-series Chord=0.020954 IdealCl=0.7 ThickChord=0.144074
    2  1           NACA 16-series Chord=0.00756708 IdealCl=0.2 ThickChord=0.03
  Chord along r/R (cubic Bezier): 0.07: 0.1375, 0.204299: 0.244444, 0.338598: 0.178241, 0.472897: 0.178241, 0.648598: 0.15787, 0.824299: 0.1375, 1: 0.0662037
  Twist along r/R (PCHIP): 0.07: 46.75, 0.75: 20, 1: 13
  Thick along r/R (cubic Bezier): 0.07: 0.5, 0.146667: 0.3, 0.223333: 0.225, 0.3: 0.2, 0.4: 0.125, 0.5: 0.115, 0.6: 0.1, 0.733333: 0.075, 0.866667: 0.055, 1: 0.03
  CLI along r/R (cubic Bezier): 0.07: 0, 0.18: 0.80463, 0.29: 0.7, 0.4: 0.7, 0.466667: 0.7, 0.533333: 0.7, 0.6: 0.7, 0.733333: 0.7, 0.866667: 0.7, 1: 0.2

VSPAERO settings: Sref=1 bref=1 cref=1 Xcg=0 Ycg=0 Zcg=0 AlphaStart=-10 AlphaEnd=10 AlphaNpts=1 BetaStart=0 BetaEnd=0 BetaNpts=1 MachStart=0 MachEnd=0 MachNpts=1 ReCref=1e+07 Vinf=0 Rho=1.225
