OpenVSP model (file version 4), 4 components.
Geometry view with OpenVSP parameter names; values to 6 digits, angles in degrees, lengths in the model's unit.
Overall bounding box: X_Min=0 X_Len=1.10326 Y_Min=-1.07426 Y_Len=2.14852 Z_Min=-0.145656 Z_Len=0.370404

Wing "Wing"
  location (X Y Z) 0.3996 0 0.054, rotation 0 0 0
  symmetric about XZ
  bounding box size 0.330055 2.14852 0.0463075
  totals: TotalSpan=2.15058 TotalProjectedSpan=2.14595 TotalChord=0.258033 TotalArea=0.626589 TotalAR=7.34946 RelativeDihedralFlag=1 RelativeTwistFlag=1
  root: chord 0.3302, twist 3, NACA 4-series Camber=0.02 CamberLoc=0.2 ThickChord=0.09
  sections:
    n  Span      Root_Chord  Tip_Chord  Area       Sweep  Sweep_Location  Dihedral  Twist  Twist_Location  tip airfoil
    1  0.541889  0.3302      0.33       0.178878   0      0               0         0      0.25            as above
    2  0.381     0.33        0.254      0.111252   0      0.75            0         0      0.25            as above
    3  0.1524    0.254       0.05       0.0231648  0      0.75            10        -3     0.25            as above
  SS_Control "Aileron": UStart=0.25 UEnd=0.5 Length_C_Start=0.25 Length_C_End=0.271654 Length_Start=0.0825 Length_End=0.069 LE_Flag=0 Surf_Type=2

Fuselage "Fuselage"
  location (X Y Z) 0 0 0, rotation 0 0 0
  bounding box size 1.0795 0.125 0.132564
  Design: Length=1.0795
  cross sections:
    n  XLocPercent  YLocPercent  ZLocPercent  shape
    0  0            0            0            point
    1  0.0941176    0            0            rounded rectangle RoundRectXSec_Radius=0.03 RoundedRect_Height=0.125 RoundedRect_Width=0.125
    2  0.662338     0            0            rounded rectangle RoundRectXSec_Radius=0.03 RoundedRect_Height=0.13 RoundedRect_Width=0.12
    3  0.999        0            0.025        circle Circle_Diameter=0.081153
    4  1            0            0.0249994    point

Wing "VTail"
  location (X Y Z) 0.8316 0.045 0.035, rotation 40 0 0
  symmetric about XZ
  bounding box size 0.271658 0.539523 0.19676
  totals: TotalSpan=0.5715 TotalProjectedSpan=0.5715 TotalChord=0.16375 TotalArea=0.0935831 TotalAR=3.49008
  root: chord 0.2032, twist 0, NACA 4-series Camber=0 CamberLoc=0.2 ThickChord=0.09
  sections:
    n  Span     Root_Chord  Tip_Chord  Area       Sweep    Sweep_Location  Dihedral  Twist  Twist_Location  tip airfoil
    1  0.28575  0.2032      0.1243     0.0467916  27.2796  0               0         0      0.25            as above
  SS_Control "Rudervator": UStart=0.37 UEnd=0.65 Length_C_Start=0.25 Length_C_End=0.365854 Length_Start=0.0486303 Length_End=0.0469189 LE_Flag=0 Surf_Type=2

Wing "Ventral"
  location (X Y Z) 0.7 0 -0.015, rotation -90 0 0
  bounding box size 0.36 0.0324201 0.130656
  totals: TotalSpan=0.13 TotalProjectedSpan=0.13 TotalChord=0.205 TotalArea=0.02665 TotalAR=0.634146
  root: chord 0.36, twist 0, NACA 4-series Camber=0 CamberLoc=0.2 ThickChord=0.09
  sections:
    n  Span  Root_Chord  Tip_Chord  Area     Sweep  Sweep_Location  Dihedral  Twist  Twist_Location  tip airfoil
    1  0.13  0.36        0.05       0.02665  15     0.75            0         0      0.25            as above

VSPAERO settings: Sref=0.626589 bref=2.15058 cref=0.258033 Xcg=0.4645 Ycg=0 Zcg=0 AlphaStart=-4 AlphaEnd=12 AlphaNpts=11 BetaStart=-10 BetaEnd=10 BetaNpts=5 MachStart=0.035 MachEnd=0.075 MachNpts=3 ReCref=1e+07 Vinf=15 Rho=1.225
  control group "AilL": DeflectionAngle=0
  control group "AilR": DeflectionAngle=0
  control group "RudevL": DeflectionAngle=0
  control group "RudevR": DeflectionAngle=0
