OpenVSP model (file version 4), 7 components.
Geometry view with OpenVSP parameter names; values to 6 digits, angles in degrees, lengths in the model's unit.
Overall bounding box: X_Min=-0.18415 X_Len=1.66688 Y_Min=-0.963027 Y_Len=1.92605 Z_Min=-0.203 Z_Len=0.406

Fuselage "FuselageGeom"
  location (X Y Z) 0 0 0, rotation 0 0 0
  bounding box size 1.31763 0.117157 0.136347
  Design: Length=1.31763
  cross sections:
    n  XLocPercent  YLocPercent  ZLocPercent  shape
    0  0            0            0            general fuselage BotStr=1.65 BotTanAngle=90 CornerRad=0 Height=0.10795 LowStr=1.65 MaxWidthLoc=0 TopStr=1.65 TopTanAngle=90 UpStr=1.65 Width=0.10795
    1  0.151807     0            0.0102412    general fuselage BotStr=1.65 BotTanAngle=90 CornerRad=0 Height=0.131763 LowStr=1.65 MaxWidthLoc=0 TopStr=1.65 TopTanAngle=90 UpStr=1.65 Width=0.1143
    2  0.428916     0            0.0102412    as above
    3  1            0            -0.0313253   general fuselage BotStr=1.65 BotTanAngle=90 CornerRad=0 Height=0.0254 LowStr=1.65 MaxWidthLoc=0 TopStr=1.65 TopTanAngle=90 UpStr=1.65 Width=0.015875

Fuselage "Nacelle", child of "FuselageGeom"
  location (X Y Z) -0.1524 0 0, rotation 0 0 0
  bounding box size 0.167816 0.110649 0.110649
  Design: Length=0.1524
  cross sections:
    n  XLocPercent  YLocPercent  ZLocPercent  shape
    0  0            0            0            general fuselage BotStr=1 BotTanAngle=90 CornerRad=0 Height=0.06985 LowStr=1 MaxWidthLoc=0 TopStr=1 TopTanAngle=90 UpStr=1 Width=0.06985
    1  1            0            0            general fuselage BotStr=1.65 BotTanAngle=90 CornerRad=0 Height=0.10795 LowStr=1.65 MaxWidthLoc=0 TopStr=1.65 TopTanAngle=90 UpStr=1.65 Width=0.10795

Wing "Wing"
  location (X Y Z) 0.200025 0 0.069056, rotation 0 0 0
  symmetric about XZ
  bounding box size 0.4318 1.92605 0.0718337
  mass: Density=1 Shell_Flag=1 Mass_Area=1 Mass_Prior=0
  totals: TotalSpan=1.92405 TotalProjectedSpan=1.92391 TotalChord=0.382588 TotalArea=0.785946 TotalAR=4.7095
  root: chord 0.4318, twist 0, NACA 4-series Camber=0 CamberLoc=0.2 ThickChord=0.14
  sections:
    n  Span      Root_Chord  Tip_Chord  Area       Sweep  Sweep_Location  Dihedral  Twist  Twist_Location  tip airfoil
    1  0.1016    0.4318      0.4318     0.0438709  0      0               0.7       0      0.25            as above
    2  0.3429    0.4318      0.4318     0.148064   0      0               0.7       0      0.25            as above
    3  0.4191    0.4318      0.41275    0.176975   0      0               0.7       0      0.25            NACA 4-series Camber=0 CamberLoc=0.2 ThickChord=0.146
    4  0.098425  0.41275     0.0762     0.0240625  -2.6   1               0.7       0      0.25            NACA 4-series Camber=0 CamberLoc=0.2 ThickChord=0.2
  SS_Control "Flap": UStart=0.333333 UEnd=0.5 Length_C_Start=0.176471 Length_C_End=0.176471 Length_Start=0.0762 Length_End=0.0762 LE_Flag=0 Surf_Type=2
  SS_Control "Aileron": UStart=0.5 UEnd=0.666667 Length_C_Start=0.176471 Length_C_End=0.138462 Length_Start=0.0762 Length_End=0.05715 LE_Flag=0 Surf_Type=2

Wing "H-Tail"
  location (X Y Z) 1.12395 0 -0.047625, rotation 0 0 0
  symmetric about XZ
  bounding box size 0.28258 0.735745 0.0127284
  totals: TotalSpan=0.733424 TotalProjectedSpan=0.733424 TotalChord=0.224634 TotalArea=0.195843 TotalAR=2.74664
  root: chord 0.282575, twist 0, NACA 4-series Camber=0 CamberLoc=0.2 ThickChord=0.04494
  sections:
    n  Span      Root_Chord  Tip_Chord  Area        Sweep  Sweep_Location  Dihedral  Twist  Twist_Location  tip airfoil
    1  0.3175    0.282575    0.28258    0.0897184   0      0               0         0      0.25            NACA 4-series Camber=0 CamberLoc=0.2 ThickChord=0.044943
    2  0.049212  0.28258     0.0508     0.00820315  0      1               0         0      0.25            NACA 4-series Camber=0 CamberLoc=0.2 ThickChord=0.25
  SS_Control "Elevator": UStart=0 UEnd=0.333 Length_C_Start=0.314607 Length_C_End=0.314601 Length_Start=0.0889 Length_End=0.0889 LE_Flag=0 Surf_Type=2

Wing "V-Tail"
  location (X Y Z) 0.962025 0 -0.042, rotation 0 0 0
  bounding box size 0.5207 0.0127217 0.237596
  totals: TotalSpan=0.23495 TotalProjectedSpan=1e-06 TotalChord=0.327025 TotalArea=0.0768345 TotalAR=0
  root: chord 0.5207, twist 0, NACA 4-series Camber=0 CamberLoc=0.2 ThickChord=0.0243902
  sections:
    n  Span     Root_Chord  Tip_Chord  Area       Sweep    Sweep_Location  Dihedral  Twist  Twist_Location  tip airfoil
    1  0.23495  0.5207      0.13335    0.0768345  10.9091  0.654545        90        0      0.25            NACA 4-series Camber=0 CamberLoc=0.2 ThickChord=0.0952381
  SS_Control "Rudder": UStart=0 UEnd=1 Length_C_Start=0.317073 Length_C_End=0.571429 Length_Start=0.1651 Length_End=0.0762 LE_Flag=0 Surf_Type=2

Custom "PropellerDisk"
  location (X Y Z) -0.18415 0 0, rotation 0 0 0
  bounding box size 0 0.406 0.406
  Design: Diameter=0.406
  custom script Disk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

Fuselage "Motor"
  location (X Y Z) -0.16 0 0, rotation 0 0 0
  bounding box size 0.054 0.063 0.063
  Design: Length=0.054
  cross sections:
    n  XLocPercent  YLocPercent  ZLocPercent  shape
    0  0            0            0            point
    1  0            0            0            circle Circle_Diameter=0.063
    2  1            0            0            as above
    3  1            0            0            point

VSPAERO settings: Sref=0.785946 bref=1.92405 cref=0.382588 Xcg=0.307975 Ycg=0 Zcg=0 AlphaStart=-6 AlphaEnd=14 AlphaNpts=9 BetaStart=-10 BetaEnd=10 BetaNpts=5 MachStart=0.045 MachEnd=0.085 MachNpts=3 ReCref=1e+07 Vinf=23 Rho=1.225
  control group "AilR": DeflectionAngle=0
  control group "AilL": DeflectionAngle=0
  control group "Rud": DeflectionAngle=0
  control group "FlapR": DeflectionAngle=0
  control group "FlapL": DeflectionAngle=0
  control group "Elev": DeflectionAngle=0
