OpenVSP model (file version 5), 6 components.
Geometry view with OpenVSP parameter names; values to 6 digits, angles in degrees, lengths in the model's unit.
Overall bounding box: X_Min=-0.07 X_Len=1.24624 Y_Min=-0.762955 Y_Len=1.52591 Z_Min=-0.1778 Z_Len=0.3556

Fuselage "FuselageGeom"
  location (X Y Z) 0 0 0, rotation 0 0 0
  bounding box size 1.0922 0.0945312 0.105833
  Design: Length=1.0922
  cross sections:
    n  XLocPercent  YLocPercent  ZLocPercent  shape
    0  0            0            0            point
    1  0.005        0            0            general fuselage BotStr=1.75 BotTanAngle=90 CornerRad=0 Height=0.09525 LowStr=1.75 MaxWidthLoc=0 TopStr=1.75 TopTanAngle=90 UpStr=1.75 Width=0.08255
    2  0.139535     0            0.00299963   general fuselage BotStr=1.75 BotTanAngle=90 CornerRad=0 Height=0.1016 LowStr=1.75 MaxWidthLoc=0 TopStr=1.75 TopTanAngle=90 UpStr=1.75 Width=0.09075
    3  0.40407      0            0.00299963   as above
    4  0.998        0            -0.0348837   general fuselage BotStr=1.75 BotTanAngle=90 CornerRad=0 Height=0.01905 LowStr=1.75 MaxWidthLoc=0 TopStr=1.75 TopTanAngle=90 UpStr=1.75 Width=0.0127
    5  1            0            -0.0348837   point

Propeller "Propeller", child of "FuselageGeom"
  location (X Y Z) -0.07 0 0, rotation 0 0 0
  bounding box size 0 0.3556 0.3556
  Design: Diameter=0.3556 NumBlade=2 Beta34=20 UseBeta34Flag=1 Feather=0 Rotate=0 ReverseFlag=0 FoldAngle=0 PropMode=2 AF=151.538 CLi=0.538798 Chord=0.177656 Solidity=0.113099 ConstructXoC=0.5 FeatherAxisXoC=0.5 FeatherOffsetXoC=0
  cross sections:
    n  RadiusFrac  shape
    0  0.2         ellipse Ellipse_Height=0.007112 Ellipse_Width=0.014224
    1  0.4         NACA 16-series Chord=0.0295593 IdealCl=0.7 ThickChord=0.144074
    2  1           NACA 16-series Chord=0.023114 IdealCl=0.2 ThickChord=0.03
  Chord along r/R (cubic Bezier): 0.2: 0.08, 0.333333: 0.15, 0.466667: 0.2, 0.6: 0.2, 0.716667: 0.2, 0.833333: 0.2, 0.95: 0.2, 0.966667: 0.2, 0.983333: 0.2, 1: 0.13
  Twist along r/R (PCHIP): 0.2: 46.75, 0.75: 20, 1: 13
  Thick along r/R (cubic Bezier): 0.2: 0.5, 0.233333: 0.3, 0.266667: 0.225, 0.3: 0.2, 0.4: 0.125, 0.5: 0.115, 0.6: 0.1, 0.733333: 0.075, 0.866667: 0.055, 1: 0.03
  CLI along r/R (cubic Bezier): 0.2: 0, 0.266667: 0.7, 0.333333: 0.7, 0.4: 0.7, 0.466667: 0.7, 0.533333: 0.7, 0.6: 0.7, 0.733333: 0.7, 0.866667: 0.7, 1: 0.2

Fuselage "Motor", child of "FuselageGeom"
  location (X Y Z) 0 0 0, rotation 0 0 180
  bounding box size 0.07 0.05 0.05
  Design: Length=0.07
  cross sections:
    n  XLocPercent  YLocPercent  ZLocPercent  shape
    0  0            0            0            point
    1  0            0            0            circle Circle_Diameter=0.05
    2  1            0            0            as above
    3  1            0            0            point

Wing "Wing"
  location (X Y Z) 0.1524 0 0.055, rotation 0 0 0
  symmetric about XZ
  bounding box size 0.3556 1.52591 0.053097
  mass: Density=1 Shell_Flag=1 Mass_Area=1 Mass_Prior=0
  totals: TotalSpan=1.524 TotalProjectedSpan=1.524 TotalChord=0.312205 TotalArea=0.512584 TotalAR=4.53111
  root: chord 0.3556, twist 0, NACA 4-series Camber=0 CamberLoc=0.2 ThickChord=0.14
  sections:
    n  Span       Root_Chord  Tip_Chord  Area       Sweep  Sweep_Location  Dihedral  Twist  Twist_Location  tip airfoil
    1  0.0769697  0.3556      0.3556     0.0273704  0      0               0         0      0.25            as above
    2  0.292485   0.3556      0.3556     0.104008   0      0               0         0      0.25            as above
    3  0.315576   0.3556      0.34458    0.11048    0      0               0         0      0.25            NACA 4-series Camber=0 CamberLoc=0.2 ThickChord=0.145
    4  0.0769697  0.34458     0.03048    0.0144341  -2     1               0         0      0.25            NACA 4-series Camber=0 CamberLoc=0.2 ThickChord=0.25
  SS_Control "Flap": UStart=0.2 UEnd=0.399 Length_C_Start=0.16063 Length_C_End=0.16063 Length_Start=0.05712 Length_End=0.05712 LE_Flag=0 Surf_Type=2
  SS_Control "Aileron": UStart=0.401 UEnd=0.6 Length_C_Start=0.160655 Length_C_End=0.132683 Length_Start=0.05712 Length_End=0.04572 LE_Flag=0 Surf_Type=2

Wing "H-Tail"
  location (X Y Z) 0.9245 0 -0.042, rotation 0 0 0
  symmetric about XZ
  bounding box size 0.22479 0.581494 0.0113261
  totals: TotalSpan=0.57912 TotalProjectedSpan=0.57912 TotalChord=0.176212 TotalArea=0.123517 TotalAR=2.71524
  root: chord 0.22479, twist 0, NACA 4-series Camber=0 CamberLoc=0.2 ThickChord=0.05
  sections:
    n  Span     Root_Chord  Tip_Chord  Area       Sweep  Sweep_Location  Dihedral  Twist  Twist_Location  tip airfoil
    1  0.25527  0.22479     0.22479    0.0573821  0      0               0         0      0.25            as above
    2  0.03429  0.22479     0.03048    0.0043766  0      1               0         0      0.25            NACA 4-series Camber=0 CamberLoc=0.2 ThickChord=0.25
  SS_Control "Elevator": UStart=0 UEnd=0.333333 Length_C_Start=0.254237 Length_C_End=0.254237 Length_Start=0.05715 Length_End=0.05715 LE_Flag=0 Surf_Type=2

Wing "V-Tail"
  location (X Y Z) 0.78 0 -0.035, rotation 90 0 0
  bounding box size 0.39624 0.00766634 0.185296
  totals: TotalSpan=0.18288 TotalProjectedSpan=0.18288 TotalChord=0.24765 TotalArea=0.0452902 TotalAR=0.738462
  root: chord 0.39624, twist 0, NACA 4-series Camber=0 CamberLoc=0.2 ThickChord=0.0192
  sections:
    n  Span     Root_Chord  Tip_Chord  Area       Sweep    Sweep_Location  Dihedral  Twist  Twist_Location  tip airfoil
    1  0.18288  0.39624     0.09906    0.0452902  10.9091  0.654545        0         0      0.25            NACA 4-series Camber=0 CamberLoc=0.2 ThickChord=0.0588
  SS_Control "Rudder": UStart=0 UEnd=1 Length_C_Start=0.272436 Length_C_End=0.512821 Length_Start=0.10795 Length_End=0.0508 LE_Flag=0 Surf_Type=2

VSPAERO settings: Sref=0.512584 bref=1.524 cref=0.312205 Xcg=0.26035 Ycg=0 Zcg=0.03 AlphaStart=-6 AlphaEnd=14 AlphaNpts=11 BetaStart=-5 BetaEnd=5 BetaNpts=3 MachStart=0.05 MachEnd=0.1 MachNpts=2 ReCref=1e+07 Vinf=20 Rho=1.225
  control group "AilR": DeflectionAngle=0
  control group "AilL": DeflectionAngle=0
  control group "Rud": DeflectionAngle=0
  control group "FlapR": DeflectionAngle=0
  control group "FlapL": DeflectionAngle=0
  control group "Elev": DeflectionAngle=0
