OpenVSP model (file version 4), 4 components.
Geometry view with OpenVSP parameter names; values to 6 digits, angles in degrees, lengths in the model's unit.
Overall bounding box: X_Min=-5.8997e-05 X_Len=1.76148 Y_Min=-2.15247 Y_Len=4.30494 Z_Min=-0.0920287 Z_Len=0.489737

Wing "Wing"
  location (X Y Z) 0 0 0, rotation 0 0 0
  symmetric about XZ
  bounding box size 1.49862 4.26795 0.211402
  totals: TotalSpan=4.27084 TotalProjectedSpan=4.2673 TotalChord=0.631525 TotalArea=1.71229 TotalAR=10.6348
  root: chord 1.15, twist 0, airfoil file "mAE-2-Centerline"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 ThickChord=0.240909
  sections:
    n  Span     Root_Chord  Tip_Chord  Area       Sweep  Sweep_Location  Dihedral  Twist  Twist_Location  tip airfoil
    1  0.134    1.15        0.87       0.13534    -22    1               0         0      0.25            airfoil file "mAE-2-WS_5.0"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 ThickChord=0.202273
    2  0.1079   0.87        0.62375    0.0805878  -22    1               4.8914    0      0.25            airfoil file "mAE-2-WS_9-5"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 ThickChord=0.218182
    3  0.39445  0.62375     0.3049     0.183153   -22    1               3.87644   0      0.25            airfoil file "mAE-2-WS_Outboard"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 ThickChord=0.240909
    4  1.49907  0.3049      0.3049     0.457066   22     0               1.44028   0      0.25            airfoil file "mAE-2-WS_Outboard"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 ThickChord=0.2
  SS_Control "TE1": UStart=0.443 UEnd=0.592 Length_C_Start=0.119397 Length_C_End=0.208696 Length_Start=0.066294 Length_End=0.066294 LE_Flag=0 Surf_Type=2
  SS_Control "TE2": UStart=0.6025 UEnd=0.65 Length_C_Start=0.217422 Length_C_End=0.217422 Length_Start=0.066294 Length_End=0.066294 LE_Flag=0 Surf_Type=2
  SS_Control "TE3": UStart=0.65 UEnd=0.6975 Length_C_Start=0.217422 Length_C_End=0.217422 Length_Start=0.066294 Length_End=0.066294 LE_Flag=0 Surf_Type=2
  SS_Control "TE4": UStart=0.6975 UEnd=0.745 Length_C_Start=0.217441 Length_C_End=0.217441 Length_Start=0.0663 Length_End=0.0663 LE_Flag=0 Surf_Type=2
  SS_Control "TE5": UStart=0.745 UEnd=0.7925 Length_C_Start=0.217441 Length_C_End=0.217441 Length_Start=0.0663 Length_End=0.0663 LE_Flag=0 Surf_Type=2
  SS_Control "LE": UStart=0.749 UEnd=0.796 Length_C_Start=0.147585 Length_C_End=0.147585 Length_Start=0.045 Length_End=0.045 LE_Flag=1 Surf_Type=2

Wing "Winglet", child of "Wing"
  location (X Y Z) 1.37028 2.13365 0.0205461, rotation 90 0 0; relative location -0.12828 0 -0.053, rotation 90 0 0
  symmetric about XZ
  bounding box size 0.574113 4.30494 0.379052
  totals: TotalSpan=0.74168 TotalProjectedSpan=0.74168 TotalChord=0.252516 TotalArea=0.180468 TotalAR=3.04812
  root: chord 0.1, twist 0, NACA 4-series Camber=0 CamberLoc=0.2 ThickChord=0.1
  sections:
    n  Span      Root_Chord  Tip_Chord  Area       Sweep  Sweep_Location  Dihedral  Twist  Twist_Location  tip airfoil
    1  0.0508    0.1         0.37413    0.0120429  -20    0.6             0         0      0.25            as above
    2  0.109982  0.37413     0.2482     0.0342225  32     1               0         0      0.25            as above
    3  0.210058  0.2482      0.170434   0.0439687  32     1               0         0      0.25            as above

Custom "Duct"
  location (X Y Z) 0.736842 0.109256 0.16, rotation 0 0 0
  symmetric about XZ
  bounding box size 0.0635208 0.308512 0.091227
  Design: Camber=0 CamberLoc=0.5 Chord=0.0635208 Height=0.09 InvertFlag=0 Shape=0 ThickChord=0 Width=0.09
  custom script Duct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

Custom "Disk", child of "Duct"
  location (X Y Z) 0.736842 0.109256 0.16, rotation 0 0 0; relative location 0 0 0, rotation 0 0 0
  symmetric about XZ
  bounding box size 0 0.308512 0.09
  Design: Diameter=0.09
  custom script Disk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

VSPAERO settings: Sref=1.71229 bref=4.27084 cref=0.631525 Xcg=0.78 Ycg=2.60522e-05 Zcg=0.068 AlphaStart=-6 AlphaEnd=14 AlphaNpts=6 BetaStart=-10 BetaEnd=10 BetaNpts=5 MachStart=0.05 MachEnd=0.12 MachNpts=3 ReCref=1e+07 Vinf=30 Rho=1.225
  control group "TE1R": DeflectionAngle=0
  control group "TE1L": DeflectionAngle=0
  control group "TE2R": DeflectionAngle=0
  control group "TE2L": DeflectionAngle=0
  control group "TE3R": DeflectionAngle=0
  control group "TE3L": DeflectionAngle=0
  control group "TE4R": DeflectionAngle=0
  control group "TE4L": DeflectionAngle=0
  control group "TE5R": DeflectionAngle=0
  control group "TE5L": DeflectionAngle=0
  control group "LER": DeflectionAngle=0
  control group "LEL": DeflectionAngle=0
