<?xml version="1.0" ?>

<aerodynamics>

    <function name="aero/coefficient/CL__zero">

        <description>CL__zero</description>

        <table>

            <independentVar lookup="row">aero/alpha-deg</independentVar>

            <tableData>

                -6.0    0.006061868107775981
                -2.0    0.005186306351824516
                2.0    0.005030078635953089
                6.0    -0.008950957361539003
                10.0    0.06958937577467461
                14.0    0.5484594641601963
                </tableData>

        </table>

    </function>

    <function name="aero/coefficient/dCL__alpha_rad">

        <description>dCL__alpha_rad</description>

        <table>

            <independentVar lookup="row">aero/alpha-deg</independentVar>

            <tableData>

                -6.0    4.44908
                -2.0    4.5913058
                2.0    4.3201339
                6.0    4.5296836
                10.0    3.9949667
                14.0    1.9620315
                </tableData>

        </table>

    </function>

    <function name="aero/coefficient/CL__alpha_rad">

        <description>CL__alpha_rad = dCL__alpha_rad * alpha_rad</description>

        <product>

            <property>aero/coefficient/dCL__alpha_rad</property>

            <property>aero/alpha-rad</property>

        </product>

    </function>

    <function name="aero/coefficient/CL">

        <description>CL summation</description>

        <sum>

            <property>aero/coefficient/CL__zero</property>

            <property>aero/coefficient/CL__alpha_rad</property>

        </sum>

    </function>

    <function name="aero/coefficient/CD__zero">

        <description>CD__zero</description>

        <table>

            <independentVar lookup="row">aero/alpha-deg</independentVar>

            <tableData>

                -6.0    0.08043257848673464
                -2.0    0.10572201126241258
                2.0    0.10297960166355985
                6.0    0.07855485172402729
                10.0    0.04333485741155965
                14.0    0.05578271227602019
                </tableData>

        </table>

    </function>

    <function name="aero/coefficient/dCD__alpha_rad">

        <description>dCD__alpha_rad</description>

        <table>

            <independentVar lookup="row">aero/alpha-deg</independentVar>

            <tableData>

                -6.0    -0.2499644
                -2.0    -0.0586965
                2.0    0.0981677
                6.0    0.2545162
                10.0    0.3744501
                14.0    0.3574399
                </tableData>

        </table>

    </function>

    <function name="aero/coefficient/CD__alpha_rad">

        <description>CD__alpha_rad = dCD__alpha_rad * alpha_rad</description>

        <product>

            <property>aero/coefficient/dCD__alpha_rad</property>

            <property>aero/alpha-rad</property>

        </product>

    </function>

    <function name="aero/coefficient/CD">

        <description>CD summation</description>

        <sum>

            <property>aero/coefficient/CD__zero</property>

            <property>aero/coefficient/CD__alpha_rad</property>

        </sum>

    </function>

    <function name="aero/coefficient/CY__zero">

        <description>CY__zero</description>

        <value> 0 </value>

    </function>

    <function name="aero/coefficient/CY">

        <description>CY summation</description>

        <sum>

            <property>aero/coefficient/CY__zero</property>

        </sum>

    </function>

    <function name="aero/coefficient/CMl__zero">
        <description>CMl__zero</description>
        <value> 0 </value>
    </function>
    <function name="aero/coefficient/CMl">
        <description>CMl summation</description>
        <sum>
            <property>aero/coefficient/CMl__zero</property>
        </sum>
    </function>
    <function name="aero/coefficient/CMm__zero">
        <description>CMm__zero</description>
        <value> 0 </value>
    </function>
    <function name="aero/coefficient/CMm">
        <description>CM summation</description>
        <sum>
            <property>aero/coefficient/CMm__zero</property>
        </sum>
    </function>
    <function name="aero/coefficient/CMn__zero">
        <description>CMn__zero</description>
        <value> 0 </value>
    </function>
    <function name="aero/coefficient/CMn">
        <description>CMn summation</description>
        <sum>
            <property>aero/coefficient/CMn__zero</property>
        </sum>
    </function>

    <axis name="LIFT">

        <function name="aero/force/LIFT__CL">

            <description>LIFT from CL</description>

            <product>

                <property>aero/qbar-area</property>

                <property>aero/coefficient/CL</property>

            </product>

        </function>

    </axis>

    <axis name="DRAG">

        <function name="aero/force/DRAG__CD">

            <description>DRAG from CD</description>

            <product>

                <property>aero/qbar-area</property>

                <property>aero/coefficient/CD</property>

            </product>

        </function>

    </axis>

    <axis name="SIDE">

        <function name="aero/force/SIDE__CY">

            <description>SIDE from CY</description>

            <product>

                <property>aero/qbar-area</property>

                <property>aero/coefficient/CY</property>

            </product>

        </function>

    </axis>

    <axis name="ROLL">

        <function name="aero/moment/ROLL__CMl">

            <description>ROLL from CMl</description>

            <product>

                <property>aero/qbar-area</property>

                <property>metrics/bw-ft</property>

                <property>aero/coefficient/CMl</property>

            </product>

        </function>

    </axis>

    <axis name="PITCH">

        <function name="aero/moment/PITCH__CMm">

            <description>PITCH from CMm</description>

            <product>

                <property>aero/qbar-area</property>

                <property>metrics/cbarw-ft</property>

                <property>aero/coefficient/CMm</property>

            </product>

        </function>

    </axis>

    <axis name="YAW">

        <function name="aero/moment/YAW__CMn">

            <description>YAW from CMn</description>

            <product>

                <property>aero/qbar-area</property>

                <property>metrics/bw-ft</property>

                <property>aero/coefficient/CMn</property>

            </product>

        </function>

    </axis>

</aerodynamics>
