<?xml version="1.0" ?>

<fdm_config release="Alpha" version="2.0">

    <flight_control file="FlightControl.xml"/>

    <system file="EffectorsClosedLoop.xml"/>


    <mass_balance file="Mass.xml"/>

    <ground_reactions file="Gear.xml"/>

    <propulsion file="Propulsion.xml"/>

    <metrics file="Metrics.xml"/>

    <aerodynamics file="Aero.xml"/>


    <system file="SensorImu.xml"/>

    <system file="SensorBaro.xml"/>
    <system file="SensorGps.xml"/>

</fdm_config>
