<?xml version="1.0" ?>
<propulsion>
    <engine name="front right left">
        <electric_engine>
            <power unit="WATTS"> 3 </power>
        </electric_engine>
        <thruster>
            <direct name="Direct"> </direct>
            <location unit="M">
                <x>-0.1651</x>
                <y>0.1651</y>
                <z>0.025</z>
            </location>
            <orient unit="DEG">
                <roll>0</roll>
                <pitch>90</pitch>
                <yaw>0</yaw>
            </orient>
            <sense>-1.0</sense>
            <p_factor>0.0</p_factor>
        </thruster>
    </engine>

    <engine name="aft left">
        <electric_engine>
            <power unit="WATTS"> 3 </power>
        </electric_engine>
        <thruster>
            <direct name="Direct"> </direct>
            <location unit="M">
                <x>0.1651</x>
                <y>-0.1651</y>
                <z>0.025</z>
            </location>
            <orient unit="DEG">
                <roll>0</roll>
                <pitch>90</pitch>
                <yaw>0</yaw>
            </orient>
            <sense>-1.0</sense>
            <p_factor>0.0</p_factor>
        </thruster>
    </engine>

    <engine name="front left">
        <electric_engine>
            <power unit="WATTS"> 3 </power>
        </electric_engine>
        <thruster>
            <direct name="Direct"> </direct>
            <location unit="M">
                <x>-0.1651</x>
                <y>-0.1651</y>
                <z>0.025</z>
            </location>
            <orient unit="DEG">
                <roll>0</roll>
                <pitch>90</pitch>
                <yaw>0</yaw>
            </orient>
            <sense>1.0</sense>
            <p_factor>0.0</p_factor>
        </thruster>
    </engine>

      <engine name="aft right">
          <electric_engine>
              <power unit="WATTS"> 3 </power>
          </electric_engine>
          <thruster>
              <direct name="Direct"> </direct>
            <location unit="M">
                <x>0.1651</x>
                <y>0.1651</y>
                <z>0.025</z>
            </location>
            <orient unit="DEG">
                <roll>0</roll>
                <pitch>90</pitch>
                <yaw>0</yaw>
            </orient>
            <sense>1.0</sense>
            <p_factor>0.0</p_factor>
        </thruster>
    </engine>
</propulsion>
