<?xml version="1.0" ?>

<flight_control name="FCS: quad-copter">
 <channel name="Control Input">
  <summer name="Pitch Command Sum">
	<input>fcs/elevator-cmd-norm</input>
   <input>fcs/pitch-trim-cmd-norm</input>
   <clipto>
    <min>-1</min>
    <max>1</max>
   </clipto>
  </summer>
  <summer name="Roll Command Sum">
   <input>fcs/aileron-cmd-norm</input>
   <input>fcs/roll-trim-cmd-norm</input>
   <clipto>
    <min>-1</min>
    <max>1</max>
   </clipto>
  </summer>
  <summer name="Yaw Command Sum">
   <input>fcs/rudder-cmd-norm</input>
   <input>fcs/yaw-trim-cmd-norm</input>
   <clipto>
    <min> -1 </min>
    <max>  1 </max>
   </clipto>
  </summer>
 </channel>
 <channel name="Power">
  <fcs_function name="Power FWD">
   <function>
    <sum>
     <product>
      <property>fcs/throttle-cmd-norm[0]</property>
      <value>0.58</value>
     </product>
     <product>
      <property>fcs/roll-command-sum</property>
      <value>0.0</value>
     </product>
     <product>
      <property>fcs/pitch-command-sum</property>
      <value>-0.28</value>
     </product>
     <product>
      <property>fcs/yaw-command-sum</property>
      <value>-0.14</value>
     </product>
    </sum>
    <clipto>
     <min>0</min>
     <max>1</max>
    </clipto>
   </function>
   <output>fcs/throttle-pos-norm[0]</output>
  </fcs_function>
  <fcs_function name="Power Aft">
   <function>
    <sum>
     <product>
      <property>fcs/throttle-cmd-norm[1]</property>
      <value>0.58</value>
     </product>
     <product>
      <property>fcs/roll-command-sum</property>
      <value>0.0</value>
     </product>
     <product>
      <property>fcs/pitch-command-sum</property>
      <value>0.28</value>
     </product>
     <product>
      <property>fcs/yaw-command-sum</property>
      <value>-0.14</value>
     </product>
    </sum>
    <clipto>
     <min>0</min>
     <max>1</max>
    </clipto>
   </function>
   <output>fcs/throttle-pos-norm[1]</output>
  </fcs_function>
  <fcs_function name="Power Left">
   <function>
    <sum>
     <product>
      <property>fcs/throttle-cmd-norm[2]</property>
      <value>0.58</value>
     </product>
     <product>
      <property>fcs/roll-command-sum</property>
      <value>-0.28</value>
     </product>
     <product>
      <property>fcs/pitch-command-sum</property>
      <value>0.0</value>
     </product>
     <product>
      <property>fcs/yaw-command-sum</property>
      <value>0.14</value>
     </product>
    </sum>
    <clipto>
     <min>0</min>
     <max>1</max>
    </clipto>
   </function>
   <output>fcs/throttle-pos-norm[2]</output>
  </fcs_function>
  <fcs_function name="Power Right">
   <function>
    <sum>
     <product>
      <property>fcs/throttle-cmd-norm[3]</property>
      <value>0.58</value>
     </product>
     <product>
      <property>fcs/roll-command-sum</property>
      <value>0.28</value>
     </product>
     <product>
      <property>fcs/pitch-command-sum</property>
      <value>0.0</value>
     </product>
     <product>
      <property>fcs/yaw-command-sum</property>
      <value>0.14</value>
     </product>
    </sum>
    <clipto>
     <min>0</min>
     <max>1</max>
    </clipto>
   </function>
   <output>fcs/throttle-pos-norm[3]</output>
  </fcs_function>
 </channel>
</flight_control>
