<?xml version="1.0" ?>
<aerodynamics>
    <function name="aero/coefficient/CL__zero">
        <description>CL__zero</description>
        <table>
            <independentVar lookup="row">aero/beta-deg</independentVar>
            <independentVar lookup="column">velocities/vt-fps</independentVar>
            <independentVar lookup="table">aero/alpha-deg</independentVar>
            <tableData breakPoint="-4.0">
                      39.373565103312565      61.8727451623483      84.37192522138405
                -10.0    0.36822605 0.36870956 0.3691271
                -5.0    0.37611058 0.37653478 0.37712694
                0.0    0.37902591 0.37944761 0.3800584
                5.0    0.37596378 0.37639548 0.37699849
                10.0    0.36803768 0.36855373 0.36981158
                </tableData>
            <tableData breakPoint="-2.4">
                      39.373565103312565      61.8727451623483      84.37192522138405
                -10.0    0.37373151 0.37410803 0.37561492
                -5.0    0.37676861 0.37706891 0.3774907
                0.0    0.37790448 0.37819645 0.37861822
                5.0    0.37707322 0.37737952 0.37781267
                10.0    0.37429282 0.3747022  0.37548951
                </tableData>
            <tableData breakPoint="-0.8">
                      39.373565103312565      61.8727451623483      84.37192522138405
                -10.0    0.38192505 0.38232178 0.38292015
                -5.0    0.3787604  0.37907564 0.37952679
                0.0    0.37826209 0.37857414 0.37902603
                5.0    0.37913954 0.37946256 0.37992128
                10.0    0.38340281 0.38381702 0.38554705
                </tableData>
            <tableData breakPoint="0.8">
                      39.373565103312565      61.8727451623483      84.37192522138405
                -10.0    0.38811306 0.38847116 0.38898961
                -5.0    0.38072763 0.38102678 0.38145004
                0.0    0.37800627 0.37828415 0.37868463
                5.0    0.38060475 0.38088584 0.38128636
                10.0    0.39095793 0.39135481 0.39266194
                </tableData>
            <tableData breakPoint="2.4">
                      39.373565103312565      61.8727451623483      84.37192522138405
                -10.0    0.39515862 0.39565265 0.39659844
                -5.0    0.38210059 0.38228008 0.38253192
                0.0    0.37674303 0.37683199 0.37696066
                5.0    0.38066065 0.38075197 0.38087608
                10.0    0.40023718 0.40124808 0.40292553
                </tableData>
            <tableData breakPoint="4.0">
                      39.373565103312565      61.8727451623483      84.37192522138405
                -10.0    0.42742345 0.42815483 0.42941505
                -5.0    0.38857592 0.38986929 0.39160146
                0.0    0.37819044 0.37816043 0.37921506
                5.0    0.38619932 0.38740849 0.38964493
                10.0    0.43087927 0.43208951 0.43483408
                </tableData>
            <tableData breakPoint="5.6">
                      39.373565103312565      61.8727451623483      84.37192522138405
                -10.0    0.46507891 0.46583597 0.46521057
                -5.0    0.43271162 0.43276586 0.43472553
                0.0    0.40773485 0.40853519 0.40973903
                5.0    0.43039196 0.43036924 0.43291191
                10.0    0.47101603 0.47258085 0.47482724
                </tableData>
            <tableData breakPoint="7.2">
                      39.373565103312565      61.8727451623483      84.37192522138405
                -10.0    0.65370152 0.65947737 0.6657582
                -5.0    0.68217947 0.68543642 0.69012124
                0.0    0.70630417 0.70876637 0.71239756
                5.0    0.68463598 0.68708324 0.69149483
                10.0    0.66080319 0.66688356 0.67698641
                </tableData>
            <tableData breakPoint="8.8">
                      39.373565103312565      61.8727451623483      84.37192522138405
                -10.0    0.88128739 0.88355289 0.88740227
                -5.0    0.92092673 0.92312389 0.9263006
                0.0    0.94626878 0.9492883  0.95353823
                5.0    0.92216161 0.9240265  0.92721284
                10.0    0.88371325 0.88578831 0.88892027
                </tableData>
            <tableData breakPoint="10.4">
                      39.373565103312565      61.8727451623483      84.37192522138405
                -10.0    1.01096874 1.01231057 1.01412851
                -5.0    1.03658883 1.03655482 1.03650537
                0.0    1.03644096 1.03610095 1.03636078
                5.0    1.03680973 1.0367808  1.03673715
                10.0    1.0113144  1.01381323 1.01419483
                </tableData>
            <tableData breakPoint="12.0">
                      39.373565103312565      61.8727451623483      84.37192522138405
                -10.0    1.03915006 1.03916079 1.03910036
                -5.0    1.03673328 1.03668628 1.03662267
                0.0    1.03667686 1.03663118 1.0365692
                5.0    1.03653985 1.03649359 1.03642932
                10.0    1.03930569 1.03908815 1.03924851
                </tableData>
        </table>
    </function>
    <function name="aero/coefficient/dCL__alpha_rad">
        <description>dCL__alpha_rad</description>
        <table>
            <independentVar lookup="row">aero/beta-deg</independentVar>
            <independentVar lookup="column">velocities/vt-fps</independentVar>
            <independentVar lookup="table">aero/alpha-deg</independentVar>
            <tableData breakPoint="-4.0">
                      39.373565103312565      61.8727451623483      84.37192522138405
                -10.0    4.7411817 4.7478269 4.7529208
                -5.0    4.8423421 4.8491722 4.8589515
                0.0    4.8769654 4.8838666 4.8938646
                5.0    4.8423372 4.8491666 4.8589491
                10.0    4.7408559 4.7475051 4.7526153
                </tableData>
            <tableData breakPoint="-2.4">
                      39.373565103312565      61.8727451623483      84.37192522138405
                -10.0    4.7177703 4.7220214 4.7329005
                -5.0    4.8169051 4.8210497 4.8270759
                0.0    4.8529091 4.857098  4.8631398
                5.0    4.8170195 4.8211638 4.8271875
                10.0    4.7176491 4.7219173 4.7328003
                </tableData>
            <tableData breakPoint="-0.8">
                      39.373565103312565      61.8727451623483      84.37192522138405
                -10.0    4.7338658 4.7396301 4.7479377
                -5.0    4.8336456 4.8391722 4.8472827
                0.0    4.8753117 4.880973  4.8891726
                5.0    4.8335865 4.8391689 4.8472888
                10.0    4.7344312 4.7402137 4.7478702
                </tableData>
            <tableData breakPoint="0.8">
                      39.373565103312565      61.8727451623483      84.37192522138405
                -10.0    4.7600889 4.7693328 4.7825489
                -5.0    4.8641996 4.8732698 4.8864667
                0.0    4.9099995 4.919455  4.9332215
                5.0    4.8641593 4.873245  4.8864561
                10.0    4.7600556 4.7692373 4.7825106
                </tableData>
            <tableData breakPoint="2.4">
                      39.373565103312565      61.8727451623483      84.37192522138405
                -10.0    4.758834  4.7640722 4.7738777
                -5.0    4.8974572 4.9109981 4.9306791
                0.0    4.9444722 4.9590359 4.9801381
                5.0    4.8974015 4.9109316 4.9305723
                10.0    4.758765  4.7640001 4.7737926
                </tableData>
            <tableData breakPoint="4.0">
                      39.373565103312565      61.8727451623483      84.37192522138405
                -10.0    4.4294163 4.4329323 4.440701
                -5.0    4.8531286 4.8512123 4.848439
                0.0    4.9266443 4.9417706 4.9475356
                5.0    4.8530709 4.8511624 4.8483699
                10.0    4.4293583 4.4329895 4.4406734
                </tableData>
            <tableData breakPoint="5.6">
                      39.373565103312565      61.8727451623483      84.37192522138405
                -10.0    4.2882621 4.2867213 4.2874176
                -5.0    4.4522164 4.4636402 4.4608931
                0.0    4.616697  4.6181453 4.6198024
                5.0    4.4517942 4.4635795 4.4607948
                10.0    4.2881443 4.2865559 4.2872793
                </tableData>
            <tableData breakPoint="7.2">
                      39.373565103312565      61.8727451623483      84.37192522138405
                -10.0    2.8388427 2.8012954 2.743403
                -5.0    2.4273493 2.4076913 2.3797346
                0.0    2.1696299 2.1557579 2.1351498
                5.0    2.4270199 2.4076339 2.3797122
                10.0    2.8392536 2.8016394 2.7437531
                </tableData>
            <tableData breakPoint="8.8">
                      39.373565103312565      61.8727451623483      84.37192522138405
                -10.0    1.1258028 1.114814  1.0989323
                -5.0    0.7373026 0.7251076 0.7075073
                0.0    0.5547893 0.5372482 0.5125581
                5.0    0.7358781 0.7249904 0.7073725
                10.0    1.1258618 1.1148617 1.0990175
                </tableData>
            <tableData breakPoint="10.4">
                      39.373565103312565      61.8727451623483      84.37192522138405
                -10.0    0.241416  0.2339361 0.2302347
                -5.0    0.0256538 0.0259977 0.026465
                0.0    0.0279424 0.0299384 0.0286827
                5.0    0.0255287 0.0258725 0.0263566
                10.0    0.2410769 0.2352017 0.2299017
                </tableData>
            <tableData breakPoint="12.0">
                      39.373565103312565      61.8727451623483      84.37192522138405
                -10.0    0.021415  0.0218622 0.0227814
                -5.0    0.0264465 0.026849  0.027387
                0.0    0.0268676 0.0272361 0.0277426
                5.0    0.0263851 0.026792  0.027356
                10.0    0.0208384 0.021424  0.0223619
                </tableData>
        </table>
    </function>
    <function name="aero/coefficient/CL__alpha_rad">
        <description>CL__alpha_rad = dCL__alpha_rad * alpha_rad</description>
        <product>
            <property>aero/coefficient/dCL__alpha_rad</property>
            <property>aero/alpha-rad</property>
        </product>
    </function>
    <function name="aero/coefficient/dCL__beta_rad">
        <description>dCL__beta_rad</description>
        <table>
            <independentVar lookup="row">aero/beta-deg</independentVar>
            <independentVar lookup="column">velocities/vt-fps</independentVar>
            <independentVar lookup="table">aero/alpha-deg</independentVar>
            <tableData breakPoint="-4.0">
                      39.373565103312565      61.8727451623483      84.37192522138405
                -10.0    -0.0182033 -0.017486  -0.0159183
                -5.0    -0.0117843 -0.011638  -0.0112709
                0.0    0.0024674 0.0024905 0.0025088
                5.0    0.0134271 0.0131942 0.0127053
                10.0    0.0191643 0.0182622 0.0118858
                </tableData>
            <tableData breakPoint="-2.4">
                      39.373565103312565      61.8727451623483      84.37192522138405
                -10.0    0.0196336 0.0204005 0.0266732
                -5.0    0.0098338 0.01004   0.010514
                0.0    -0.0006037 -0.0006084 -0.0005984
                5.0    -0.0133015 -0.0135766 -0.0141808
                10.0    -0.0228965 -0.0238493 -0.0259993
                </tableData>
            <tableData breakPoint="-0.8">
                      39.373565103312565      61.8727451623483      84.37192522138405
                -10.0    0.0653929 0.0661403 0.0676883
                -5.0    0.0294623 0.0295984 0.0300603
                0.0    -0.005677  -0.0056533 -0.0056775
                5.0    -0.0338187 -0.0340442 -0.0345936
                10.0    -0.0738931 -0.0747398 -0.0827596
                </tableData>
            <tableData breakPoint="0.8">
                      39.373565103312565      61.8727451623483      84.37192522138405
                -10.0    0.1010058 0.1017161 0.1030464
                -5.0    0.0550827 0.0553977 0.0560729
                0.0    -0.0118262 -0.0119501 -0.0120899
                5.0    -0.0536761 -0.0537901 -0.0542071
                10.0    -0.1173294 -0.1182506 -0.12411
                </tableData>
            <tableData breakPoint="2.4">
                      39.373565103312565      61.8727451623483      84.37192522138405
                -10.0    0.139812  0.1401898 0.1431
                -5.0    0.0847874 0.0856204 0.0870715
                0.0    -0.0199696 -0.020273  -0.0208116
                5.0    -0.0682774 -0.0680937 -0.0680606
                10.0    -0.1689295 -0.1722675 -0.1793661
                </tableData>
            <tableData breakPoint="4.0">
                      39.373565103312565      61.8727451623483      84.37192522138405
                -10.0    0.1943401 0.1949253 0.1985159
                -5.0    0.1233167 0.1248956 0.12586
                0.0    -0.0267241 -0.0286909 -0.0298724
                5.0    -0.0960757 -0.096696  -0.1034224
                10.0    -0.2141694 -0.2175398 -0.2296075
                </tableData>
            <tableData breakPoint="5.6">
                      39.373565103312565      61.8727451623483      84.37192522138405
                -10.0    0.3373504 0.3346    0.3229704
                -5.0    0.2209921 0.222359  0.2245749
                0.0    -0.0190618 -0.0189938 -0.0190982
                5.0    -0.1940032 -0.1948965 -0.203743
                10.0    -0.3713658 -0.373214  -0.378056
                </tableData>
            <tableData breakPoint="7.2">
                      39.373565103312565      61.8727451623483      84.37192522138405
                -10.0    0.376878  0.3762885 0.3612487
                -5.0    0.1911786 0.1912055 0.1919776
                0.0    -0.0088347 -0.0088104 -0.008773
                5.0    -0.2188251 -0.2100239 -0.2077211
                10.0    -0.4179539 -0.4190536 -0.4259173
                </tableData>
            <tableData breakPoint="8.8">
                      39.373565103312565      61.8727451623483      84.37192522138405
                -10.0    0.238524  0.2394994 0.2448349
                -5.0    0.0760358 0.076159  0.076662
                0.0    -0.011268 -0.011422 -0.011229
                5.0    -0.0874456 -0.0863348 -0.0869069
                10.0    -0.2525186 -0.2523895 -0.2536521
                </tableData>
            <tableData breakPoint="10.4">
                      39.373565103312565      61.8727451623483      84.37192522138405
                -10.0    0.0979539 0.0970138 0.1033724
                -5.0    -0.004261  -0.0042058 -0.0039323
                0.0    4.490e-05 9.360e-05 1.195e-04
                5.0    0.0019497 0.0018412 0.0014662
                10.0    -0.0995588 -0.107076  -0.1033826
                </tableData>
            <tableData breakPoint="12.0">
                      39.373565103312565      61.8727451623483      84.37192522138405
                -10.0    0.0086408 0.009153  0.0100834
                -5.0    -0.0006587 -0.0006163 -0.0003473
                0.0    -2.19e-05  2.13e-05  7.06e-05
                5.0    0.0029687 0.0029073 0.0025823
                10.0    -0.008828  -0.0081978 -0.0104174
                </tableData>
        </table>
    </function>
    <function name="aero/coefficient/CL__beta_rad">
        <description>CL__beta_rad = dCL__beta_rad * beta_rad</description>
        <product>
            <property>aero/coefficient/dCL__beta_rad</property>
            <property>aero/beta-rad</property>
        </product>
    </function>
    <function name="aero/coefficient/dCL__dpHat_rps">
        <description>dCL__dpHat_rps</description>
        <table>
            <independentVar lookup="row">aero/beta-deg</independentVar>
            <independentVar lookup="column">velocities/vt-fps</independentVar>
            <independentVar lookup="table">aero/alpha-deg</independentVar>
            <tableData breakPoint="-4.0">
                      39.373565103312565      61.8727451623483      84.37192522138405
                -10.0    -0.0280465 -0.030016  -0.0328402
                -5.0    -0.0314597 -0.033729  -0.0369981
                0.0    -0.0283571 -0.0308485 -0.0344561
                5.0    -0.0258759 -0.028593  -0.0325326
                10.0    -0.0278073 -0.0307077 -0.0361736
                </tableData>
            <tableData breakPoint="-2.4">
                      39.373565103312565      61.8727451623483      84.37192522138405
                -10.0    -0.0256558 -0.0266101 -0.0268183
                -5.0    -0.0222031 -0.023285  -0.0248372
                0.0    -0.0149162 -0.0160243 -0.0176341
                5.0    -0.0091604 -0.0102357 -0.0118027
                10.0    -0.0062009 -0.0072134 -0.0087514
                </tableData>
            <tableData breakPoint="-0.8">
                      39.373565103312565      61.8727451623483      84.37192522138405
                -10.0    -0.0120722 -0.0117483 -0.0112402
                -5.0    -0.0036604 -0.0031768 -0.0024604
                0.0    0.009796  0.0106125 0.0117971
                5.0    0.0157276 0.0166751 0.0180378
                10.0    0.0198326 0.020928  0.0216301
                </tableData>
            <tableData breakPoint="0.8">
                      39.373565103312565      61.8727451623483      84.37192522138405
                -10.0    -0.0033263 -0.0022752 -0.0007527
                -5.0    0.0076153 0.0099123 0.0122023
                0.0    0.0237737 0.0252111 0.0270492
                5.0    0.0300181 0.0310279 0.0334385
                10.0    0.0218899 0.022341  0.0229664
                </tableData>
            <tableData breakPoint="2.4">
                      39.373565103312565      61.8727451623483      84.37192522138405
                -10.0    0.0062617 0.0080059 0.0097408
                -5.0    0.0039002 0.0043629 0.0051434
                0.0    0.0096605 0.0074242 0.0041866
                5.0     2.1087e-03  4.6800e-05 -2.9471e-03
                10.0    -0.0173804 -0.0198471 -0.0229424
                </tableData>
            <tableData breakPoint="4.0">
                      39.373565103312565      61.8727451623483      84.37192522138405
                -10.0    0.007567  0.0072915 0.0074848
                -5.0    -0.0103596 -0.0140584 -0.0193747
                0.0    -0.0418129 -0.0455158 -0.0504695
                5.0    -0.0466321 -0.0505734 -0.0563138
                10.0    -0.0543221 -0.057213  -0.0618002
                </tableData>
            <tableData breakPoint="5.6">
                      39.373565103312565      61.8727451623483      84.37192522138405
                -10.0     0.0010111 -0.0008037 -0.0027082
                -5.0    -0.0284897 -0.0292738 -0.0304098
                0.0    -0.058648  -0.0569423 -0.0544887
                5.0    -0.0616954 -0.0635351 -0.0663307
                10.0    -0.0937846 -0.0973514 -0.1027534
                </tableData>
            <tableData breakPoint="7.2">
                      39.373565103312565      61.8727451623483      84.37192522138405
                -10.0    -0.1979126 -0.2053015 -0.2159664
                -5.0    -0.2976893 -0.2976311 -0.2975491
                0.0    -0.3717955 -0.3736464 -0.3765977
                5.0    -0.4171437 -0.418894  -0.4214301
                10.0    -0.3703377 -0.3781984 -0.3905144
                </tableData>
            <tableData breakPoint="8.8">
                      39.373565103312565      61.8727451623483      84.37192522138405
                -10.0    -0.261204  -0.2613303 -0.2606075
                -5.0    -0.3585688 -0.3589344 -0.3594333
                0.0    -0.4449437 -0.4450744 -0.445695
                5.0    -0.489729  -0.4864909 -0.4845027
                10.0    -0.5082454 -0.5046959 -0.499512
                </tableData>
            <tableData breakPoint="10.4">
                      39.373565103312565      61.8727451623483      84.37192522138405
                -10.0    -0.1326109 -0.131696  -0.1285403
                -5.0    -0.1711888 -0.1684739 -0.164553
                0.0    -0.2104321 -0.2076301 -0.2035884
                5.0    -0.2908354 -0.2906286 -0.2867019
                10.0    -0.3737377 -0.3710394 -0.3693054
                </tableData>
            <tableData breakPoint="12.0">
                      39.373565103312565      61.8727451623483      84.37192522138405
                -10.0    -0.0017601 -0.0012754 -0.0006228
                -5.0    -0.0006608 -0.0006739 -0.0006708
                0.0    -0.0060249 -0.0051784 -0.0039573
                5.0    -0.0638671 -0.0616974 -0.0589352
                10.0    -0.1756875 -0.1708499 -0.1705526
                </tableData>
        </table>
    </function>
    <function name="aero/coefficient/CL__dpHat_rps">
        <description>CL__dpHat_rps = dCL__dpHat_rps * dpHat_rps</description>
        <product>
            <property>aero/coefficient/dCL__dpHat_rps</property>
            <property>velocities/p-aero-rad_sec</property>
            <property>aero/bi2vel</property>
        </product>
    </function>
    <function name="aero/coefficient/dCL__dqHat_rps">
        <description>dCL__dqHat_rps</description>
        <table>
            <independentVar lookup="row">aero/beta-deg</independentVar>
            <independentVar lookup="column">velocities/vt-fps</independentVar>
            <independentVar lookup="table">aero/alpha-deg</independentVar>
            <tableData breakPoint="-4.0">
                      39.373565103312565      61.8727451623483      84.37192522138405
                -10.0    7.2897765 7.2984711 7.3016374
                -5.0    7.3881763 7.3968987 7.4096891
                0.0    7.4156124 7.424389  7.4371012
                5.0    7.3881313 7.3968527 7.4096559
                10.0    7.2885555 7.2972556 7.300443
                </tableData>
            <tableData breakPoint="-2.4">
                      39.373565103312565      61.8727451623483      84.37192522138405
                -10.0    7.2025184 7.2086216 7.2176008
                -5.0    7.3038878 7.309953  7.3188889
                0.0    7.3352061 7.3412686 7.3500484
                5.0    7.3039131 7.3099807 7.3188729
                10.0    7.201935  7.2080828 7.2161059
                </tableData>
            <tableData breakPoint="-0.8">
                      39.373565103312565      61.8727451623483      84.37192522138405
                -10.0    7.1490542 7.1559074 7.1659113
                -5.0    7.2524516 7.258916  7.2685537
                0.0    7.2952999 7.3015349 7.3109779
                5.0    7.2504225 7.2569891 7.2666511
                10.0    7.1486564 7.1555235 7.1642292
                </tableData>
            <tableData breakPoint="0.8">
                      39.373565103312565      61.8727451623483      84.37192522138405
                -10.0    7.1280149 7.1379709 7.1522471
                -5.0    7.2238931 7.2332993 7.2471657
                0.0    7.2747638 7.2836302 7.2913899
                5.0    7.2238452 7.2329682 7.2471715
                10.0    7.1280119 7.1378914 7.1522376
                </tableData>
            <tableData breakPoint="2.4">
                      39.373565103312565      61.8727451623483      84.37192522138405
                -10.0    7.0799331 7.0876566 7.1026712
                -5.0    7.2014673 7.2146431 7.2338335
                0.0    7.2482021 7.2726002 7.2927041
                5.0    7.2013467 7.2145279 7.2337434
                10.0    7.0799268 7.0876568 7.1027041
                </tableData>
            <tableData breakPoint="4.0">
                      39.373565103312565      61.8727451623483      84.37192522138405
                -10.0    6.6079879 6.6025229 6.5995703
                -5.0    7.1367355 7.1342047 7.1282448
                0.0    7.1843185 7.197121  7.2190648
                5.0    7.1366895 7.1537909 7.1281523
                10.0    6.6081384 6.6026738 6.5997554
                </tableData>
            <tableData breakPoint="5.6">
                      39.373565103312565      61.8727451623483      84.37192522138405
                -10.0    6.3669365 6.3525755 6.3302715
                -5.0    6.4812612 6.4930416 6.5101539
                0.0    6.9661966 6.9751173 6.987836
                5.0    6.4811976 6.4930143 6.510309
                10.0    6.3666938 6.3522837 6.3300746
                </tableData>
            <tableData breakPoint="7.2">
                      39.373565103312565      61.8727451623483      84.37192522138405
                -10.0    4.8217664 4.7669359 4.6646446
                -5.0    4.2234776 4.1953603 4.1557061
                0.0    3.7509686 3.724966  3.6873179
                5.0    4.222722  4.1950833 4.1556635
                10.0    4.8225095 4.7675462 4.6652694
                </tableData>
            <tableData breakPoint="8.8">
                      39.373565103312565      61.8727451623483      84.37192522138405
                -10.0    2.3463159 2.3343196 2.3167971
                -5.0    1.8580587 1.8412974 1.817208
                0.0    1.7266225 1.7042629 1.6734808
                5.0    1.8551401 1.8411245 1.8169124
                10.0    2.3468632 2.3346023 2.3171957
                </tableData>
            <tableData breakPoint="10.4">
                      39.373565103312565      61.8727451623483      84.37192522138405
                -10.0    1.1167475 1.1044179 1.0950301
                -5.0    0.734652  0.7354137 0.7365208
                0.0    0.7326942 0.7333756 0.7342644
                5.0    0.7359805 0.7366883 0.7377963
                10.0    1.116613  1.1074951 1.0948712
                </tableData>
            <tableData breakPoint="12.0">
                      39.373565103312565      61.8727451623483      84.37192522138405
                -10.0    0.7424777 0.7438203 0.7464371
                -5.0    0.7424264 0.7432302 0.744408
                0.0    0.744432 0.745184 0.746227
                5.0    0.7423875 0.7431889 0.7443761
                10.0    0.7427298 0.743693  0.7463418
                </tableData>
        </table>
    </function>
    <function name="aero/coefficient/CL__dqHat_rps">
        <description>CL__dqHat_rps = dCL__dqHat_rps * dqHat_rps</description>
        <product>
            <property>aero/coefficient/dCL__dqHat_rps</property>
            <property>velocities/q-aero-rad_sec</property>
            <property>aero/ci2vel</property>
        </product>
    </function>
    <function name="aero/coefficient/dCL__drHat_rps">
        <description>dCL__drHat_rps</description>
        <table>
            <independentVar lookup="row">aero/beta-deg</independentVar>
            <independentVar lookup="column">velocities/vt-fps</independentVar>
            <independentVar lookup="table">aero/alpha-deg</independentVar>
            <tableData breakPoint="-4.0">
                      39.373565103312565      61.8727451623483      84.37192522138405
                -10.0    0.0371109 0.0372967 0.0353983
                -5.0    0.0240692 0.0240015 0.023795
                0.0    0.0084831 0.0084761 0.0084741
                5.0    -0.0062909 -0.006294  -0.0058046
                10.0    -0.0195998 -0.0193866 -0.0188671
                </tableData>
            <tableData breakPoint="-2.4">
                      39.373565103312565      61.8727451623483      84.37192522138405
                -10.0    0.0380202 0.0381785 0.0374564
                -5.0    0.024378  0.0242523 0.0240375
                0.0    0.0088076 0.0088002 0.0087967
                5.0    -0.0062317 -0.0062216 -0.0057189
                10.0    -0.0203081 -0.0200843 -0.0184275
                </tableData>
            <tableData breakPoint="-0.8">
                      39.373565103312565      61.8727451623483      84.37192522138405
                -10.0    0.0393204 0.0394834 0.0379347
                -5.0    0.0251359 0.0250662 0.0248644
                0.0    0.00918   0.0091743 0.009177
                5.0    -0.0068722 -0.0068749 -0.0063936
                10.0    -0.0210282 -0.0208283 -0.0205044
                </tableData>
            <tableData breakPoint="0.8">
                      39.373565103312565      61.8727451623483      84.37192522138405
                -10.0    0.0410788 0.0413344 0.0399816
                -5.0    0.0256247 0.0256055 0.0254687
                0.0    0.0090742 0.0090702 0.0090904
                5.0    -0.0067652 -0.0067899 -0.0063605
                10.0    -0.0223418 -0.0221914 -0.0217943
                </tableData>
            <tableData breakPoint="2.4">
                      39.373565103312565      61.8727451623483      84.37192522138405
                -10.0    0.0374839 0.0371304 0.0355273
                -5.0    0.0260177 0.0260497 0.0259785
                0.0    0.0091949 0.0092105 0.007809
                5.0    -0.0068056 -0.0068529 -0.0064763
                10.0    -0.0204422 -0.0203571 -0.0195752
                </tableData>
            <tableData breakPoint="4.0">
                      39.373565103312565      61.8727451623483      84.37192522138405
                -10.0    0.0262727 0.0248769 0.021943
                -5.0    0.0190546 0.0177066 0.0146444
                0.0    0.0060391 0.0065792 0.0077783
                5.0    -0.0040936 -0.0033118 -0.0030421
                10.0    -0.0111966 -0.0108364 -0.0095455
                </tableData>
            <tableData breakPoint="5.6">
                      39.373565103312565      61.8727451623483      84.37192522138405
                -10.0    0.0203286 0.0200698 0.018884
                -5.0    0.0120232 0.0116632 0.0110044
                0.0    0.0019662 0.0052073 0.0073909
                5.0    0.0067095 0.0070602 0.0080043
                10.0    -0.0037406 -0.0062945 -0.0090891
                </tableData>
            <tableData breakPoint="7.2">
                      39.373565103312565      61.8727451623483      84.37192522138405
                -10.0    -0.0138426 -0.0162948 -0.0226828
                -5.0    -0.0313931 -0.0266314 -0.0264625
                0.0    -0.0300496 -0.0308366 -0.03197
                5.0    -0.04067   -0.0403565 -0.0403601
                10.0    -0.0138287 -0.017712  -0.0230931
                </tableData>
            <tableData breakPoint="8.8">
                      39.373565103312565      61.8727451623483      84.37192522138405
                -10.0    -0.0879133 -0.0890997 -0.0916871
                -5.0    -0.1095449 -0.1106655 -0.1123988
                0.0    -0.0934975 -0.0946066 -0.0960456
                5.0    -0.021357  -0.0210992 -0.020914
                10.0    -0.0151433 -0.0147345 -0.0130869
                </tableData>
            <tableData breakPoint="10.4">
                      39.373565103312565      61.8727451623483      84.37192522138405
                -10.0    -0.0981381 -0.0972473 -0.0960419
                -5.0    -0.0471599 -0.0450683 -0.0420914
                0.0    -0.0044131 -0.0035839 -0.0023748
                5.0    -0.0087921 -0.0088201 -0.008518
                10.0    0.0275568 0.0270025 0.0272189
                </tableData>
            <tableData breakPoint="12.0">
                      39.373565103312565      61.8727451623483      84.37192522138405
                -10.0    0.0054675 0.0072404 0.0084276
                -5.0    0.0150475 0.0150625 0.0148618
                0.0    0.0025903 0.0025857 0.0025972
                5.0    -0.0087512 -0.0087637 -0.0084835
                10.0    -0.0203394 -0.020192  -0.0198258
                </tableData>
        </table>
    </function>
    <function name="aero/coefficient/CL__drHat_rps">
        <description>CL__drHat_rps = dCL__drHat_rps * drHat_rps</description>
        <product>
            <property>aero/coefficient/dCL__drHat_rps</property>
            <property>velocities/r-aero-rad_sec</property>
            <property>aero/bi2vel</property>
        </product>
    </function>
    <function name="aero/coefficient/dCL__dAilL_rad">
        <description>dCL__dAilL_rad</description>
        <table>
            <independentVar lookup="row">aero/beta-deg</independentVar>
            <independentVar lookup="column">velocities/vt-fps</independentVar>
            <independentVar lookup="table">aero/alpha-deg</independentVar>
            <tableData breakPoint="-4.0">
                      39.373565103312565      61.8727451623483      84.37192522138405
                -10.0    0.4961343 0.4966825 0.4927137
                -5.0    0.5072313 0.5078287 0.5086816
                0.0    0.5102403 0.510858  0.5117566
                5.0    0.5061233 0.5067646 0.5077018
                10.0    0.4928264 0.4934704 0.4944108
                </tableData>
            <tableData breakPoint="-2.4">
                      39.373565103312565      61.8727451623483      84.37192522138405
                -10.0    0.4956023 0.4959715 0.4964612
                -5.0    0.5062704 0.5066898 0.5072922
                0.0    0.5083849 0.5088242 0.5088195
                5.0    0.5034687 0.5039212 0.5045763
                10.0    0.4902637 0.4907385 0.4914477
                </tableData>
            <tableData breakPoint="-0.8">
                      39.373565103312565      61.8727451623483      84.37192522138405
                -10.0    0.4973315 0.4973711 0.4980285
                -5.0    0.5074064 0.5078093 0.506715
                0.0    0.5092184 0.5096361 0.5102875
                5.0    0.5025017 0.5029145 0.5034469
                10.0    0.4882706 0.4886822 0.4886452
                </tableData>
            <tableData breakPoint="0.8">
                      39.373565103312565      61.8727451623483      84.37192522138405
                -10.0    0.4998657 0.5004727 0.5016139
                -5.0    0.5090756 0.5097368 0.5107062
                0.0    0.5113495 0.5119907 0.5129613
                5.0    0.5038835 0.5044865 0.5053232
                10.0    0.4898458 0.4903987 0.4912054
                </tableData>
            <tableData breakPoint="2.4">
                      39.373565103312565      61.8727451623483      84.37192522138405
                -10.0    0.5003252 0.4994141 0.4990469
                -5.0    0.5108447 0.5117722 0.5131324
                0.0    0.5132048 0.5141638 0.5155552
                5.0    0.50537   0.506221  0.5074443
                10.0    0.4917442 0.4925442 0.4935369
                </tableData>
            <tableData breakPoint="4.0">
                      39.373565103312565      61.8727451623483      84.37192522138405
                -10.0    0.4929637 0.4927458 0.4876402
                -5.0    0.5076714 0.5087481 0.5053286
                0.0    0.5119473 0.5122401 0.5138363
                5.0    0.5070517 0.5082048 0.5098702
                10.0    0.4930551 0.4941291 0.4954762
                </tableData>
            <tableData breakPoint="5.6">
                      39.373565103312565      61.8727451623483      84.37192522138405
                -10.0    0.4762215 0.4768601 0.4771698
                -5.0    0.4865521 0.487144  0.4881436
                0.0    0.4984195 0.4990772 0.4999348
                5.0    0.4913444 0.4924543 0.4940255
                10.0    0.4833053 0.4847346 0.4754259
                </tableData>
            <tableData breakPoint="7.2">
                      39.373565103312565      61.8727451623483      84.37192522138405
                -10.0    0.4581062 0.4587493 0.4495287
                -5.0    0.4419178 0.4423031 0.4428237
                0.0    0.4344854 0.4351135 0.4358133
                5.0    0.43816   0.4386363 0.4396598
                10.0    0.474607  0.4754661 0.4756681
                </tableData>
            <tableData breakPoint="8.8">
                      39.373565103312565      61.8727451623483      84.37192522138405
                -10.0    0.2081353 0.2048878 0.2000989
                -5.0    0.1674427 0.1640427 0.159178
                0.0    0.1974036 0.1933979 0.1883596
                5.0    0.2392346 0.2388137 0.2362604
                10.0    0.2695417 0.2678774 0.2655758
                </tableData>
            <tableData breakPoint="10.4">
                      39.373565103312565      61.8727451623483      84.37192522138405
                -10.0    0.0154068 0.0029036 0.0044746
                -5.0    0.0013385 0.0013954 0.0013857
                0.0    0.0016122 0.0016151 0.0016048
                5.0    0.0018012 0.0017936 0.0018057
                10.0    0.1300274 0.1195554 0.117165
                </tableData>
            <tableData breakPoint="12.0">
                      39.373565103312565      61.8727451623483      84.37192522138405
                -10.0    0.0011112 0.0011001 0.0014888
                -5.0    0.0016016 0.0016082 0.0015979
                0.0    0.0018583 0.0018666 0.0018721
                5.0    0.0020015 0.0020079 0.0020224
                10.0    0.0019628 0.0019718 0.0019344
                </tableData>
        </table>
    </function>
    <function name="aero/coefficient/CL__dAilL_rad">
        <description>CL__dAilL_rad = dCL__dAilL_rad * dAilL_rad</description>
        <product>
            <property>aero/coefficient/dCL__dAilL_rad</property>
            <property>fcs/posAilL_rad</property>
        </product>
    </function>
    <function name="aero/coefficient/dCL__dAilR_rad">
        <description>dCL__dAilR_rad</description>
        <table>
            <independentVar lookup="row">aero/beta-deg</independentVar>
            <independentVar lookup="column">velocities/vt-fps</independentVar>
            <independentVar lookup="table">aero/alpha-deg</independentVar>
            <tableData breakPoint="-4.0">
                      39.373565103312565      61.8727451623483      84.37192522138405
                -10.0    0.4929822 0.4936245 0.4945667
                -5.0    0.5061737 0.5068064 0.5077493
                0.0    0.5099951 0.5109325 0.5118265
                5.0    0.5073876 0.5079855 0.5088492
                10.0    0.4962599 0.4968038 0.4928451
                </tableData>
            <tableData breakPoint="-2.4">
                      39.373565103312565      61.8727451623483      84.37192522138405
                -10.0    0.4902313 0.490687  0.4914001
                -5.0    0.5034635 0.5039028 0.504553
                0.0    0.5083116 0.5087509 0.5086978
                5.0    0.5062543 0.5066933 0.5072757
                10.0    0.4952744 0.4956618 0.4961759
                </tableData>
            <tableData breakPoint="-0.8">
                      39.373565103312565      61.8727451623483      84.37192522138405
                -10.0    0.4883582 0.4887649 0.4893598
                -5.0    0.5025336 0.5028956 0.5034921
                0.0    0.5091889 0.5096344 0.5102753
                5.0    0.5062746 0.506733  0.5073872
                10.0    0.4971941 0.4970884 0.4965038
                </tableData>
            <tableData breakPoint="0.8">
                      39.373565103312565      61.8727451623483      84.37192522138405
                -10.0    0.4898176 0.490434  0.4911936
                -5.0    0.5038862 0.5044667 0.5053345
                0.0    0.5113448 0.51198   0.5129638
                5.0    0.509034  0.5097236 0.5106799
                10.0    0.4998665 0.5005794 0.5016008
                </tableData>
            <tableData breakPoint="2.4">
                      39.373565103312565      61.8727451623483      84.37192522138405
                -10.0    0.4917086 0.4925162 0.4935497
                -5.0    0.5053646 0.5061963 0.5074294
                0.0    0.5131912 0.5141439 0.5154899
                5.0    0.5108048 0.5117397 0.5130872
                10.0    0.5003492 0.4994151 0.4990446
                </tableData>
            <tableData breakPoint="4.0">
                      39.373565103312565      61.8727451623483      84.37192522138405
                -10.0    0.4930118 0.4939522 0.4954233
                -5.0    0.5069957 0.508177  0.5098328
                0.0    0.5119213 0.5122492 0.5138055
                5.0    0.5076528 0.5038078 0.50531
                10.0    0.4929718 0.4927317 0.4880809
                </tableData>
            <tableData breakPoint="5.6">
                      39.373565103312565      61.8727451623483      84.37192522138405
                -10.0    0.4833589 0.4847222 0.475547
                -5.0    0.4913025 0.4924153 0.4940024
                0.0    0.4983962 0.4990392 0.4999138
                5.0    0.4865104 0.4871611 0.4880433
                10.0    0.4761855 0.4768833 0.4771357
                </tableData>
            <tableData breakPoint="7.2">
                      39.373565103312565      61.8727451623483      84.37192522138405
                -10.0    0.4746163 0.4755085 0.4756422
                -5.0    0.4384417 0.4386446 0.4394264
                0.0    0.4345324 0.4350792 0.4358645
                5.0    0.4415689 0.4420541 0.4427956
                10.0    0.4582048 0.4587581 0.4495371
                </tableData>
            <tableData breakPoint="8.8">
                      39.373565103312565      61.8727451623483      84.37192522138405
                -10.0    0.2695016 0.267888  0.2654726
                -5.0    0.240593  0.2388112 0.2363344
                0.0    0.1973999 0.1934086 0.1883456
                5.0    0.1660988 0.1640494 0.1591369
                10.0    0.2081469 0.2048919 0.2001668
                </tableData>
            <tableData breakPoint="10.4">
                      39.373565103312565      61.8727451623483      84.37192522138405
                -10.0    0.1212349 0.1197548 0.1171273
                -5.0    0.0018085 0.0018152 0.001828
                0.0    0.0016671 0.0016748 0.0016516
                5.0    0.0014555 0.0014531 0.001469
                10.0    0.0045316 0.0045258 0.0045193
                </tableData>
            <tableData breakPoint="12.0">
                      39.373565103312565      61.8727451623483      84.37192522138405
                -10.0    0.002248  0.0022605 0.0022145
                -5.0    0.0020423 0.0020493 0.0020643
                0.0    0.0019209 0.0019227 0.0019296
                5.0    0.0016585 0.0016647 0.0016601
                10.0    0.0011904 0.0012614 0.0012616
                </tableData>
        </table>
    </function>
    <function name="aero/coefficient/CL__dAilR_rad">
        <description>CL__dAilR_rad = dCL__dAilR_rad * dAilR_rad</description>
        <product>
            <property>aero/coefficient/dCL__dAilR_rad</property>
            <property>fcs/posAilR_rad</property>
        </product>
    </function>
    <function name="aero/coefficient/dCL__dRudevL_rad">
        <description>dCL__dRudevL_rad</description>
        <table>
            <independentVar lookup="row">aero/beta-deg</independentVar>
            <independentVar lookup="column">velocities/vt-fps</independentVar>
            <independentVar lookup="table">aero/alpha-deg</independentVar>
            <tableData breakPoint="-4.0">
                      39.373565103312565      61.8727451623483      84.37192522138405
                -10.0    0.1254826 0.1255319 0.1208384
                -5.0    0.1237435 0.1237984 0.1238668
                0.0    0.1175066 0.117569  0.1176612
                5.0    0.1107472 0.1108109 0.1109248
                10.0    0.1033737 0.1034814 0.1036438
                </tableData>
            <tableData breakPoint="-2.4">
                      39.373565103312565      61.8727451623483      84.37192522138405
                -10.0    0.1252416 0.1252811 0.125281
                -5.0    0.1236554 0.1237031 0.1246787
                0.0    0.1170989 0.1171513 0.1172274
                5.0    0.1101364 0.1102002 0.1103041
                10.0    0.1012963 0.101398  0.1008872
                </tableData>
            <tableData breakPoint="-0.8">
                      39.373565103312565      61.8727451623483      84.37192522138405
                -10.0    0.1253978 0.1254432 0.1255056
                -5.0    0.1234815 0.1234778 0.1235295
                0.0    0.1172709 0.1173186 0.1174018
                5.0    0.1089349 0.1089911 0.1090909
                10.0    0.1000358 0.1001284 0.0996511
                </tableData>
            <tableData breakPoint="0.8">
                      39.373565103312565      61.8727451623483      84.37192522138405
                -10.0    0.1259965 0.1261137 0.1261525
                -5.0    0.1232079 0.1232651 0.1233493
                0.0    0.1171379 0.1171737 0.117279
                5.0    0.1074975 0.1075698 0.1076734
                10.0    0.0970881 0.097148  0.0972833
                </tableData>
            <tableData breakPoint="2.4">
                      39.373565103312565      61.8727451623483      84.37192522138405
                -10.0    0.1260866 0.1262112 0.1262354
                -5.0    0.1228756 0.1229466 0.1230478
                0.0    0.1168036 0.1168709 0.1169716
                5.0    0.1062032 0.1062488 0.1064251
                10.0    0.0952224 0.0953129 0.0954506
                </tableData>
            <tableData breakPoint="4.0">
                      39.373565103312565      61.8727451623483      84.37192522138405
                -10.0    0.1255471 0.1256458 0.1256479
                -5.0    0.1224903 0.1225766 0.122686
                0.0    0.116208  0.1161443 0.1162588
                5.0    0.1049038 0.1049898 0.1051057
                10.0    0.0936511 0.0937304 0.0938335
                </tableData>
            <tableData breakPoint="5.6">
                      39.373565103312565      61.8727451623483      84.37192522138405
                -10.0    0.1249635 0.1250599 0.1251191
                -5.0    0.1233977 0.1235036 0.1236372
                0.0    0.1149962 0.1150843 0.1151341
                5.0    0.0863919 0.0864539 0.0864882
                10.0    0.0786922 0.0787563 0.0788263
                </tableData>
            <tableData breakPoint="7.2">
                      39.373565103312565      61.8727451623483      84.37192522138405
                -10.0    0.1255311 0.1256407 0.122144
                -5.0    0.1143319 0.114056  0.1142502
                0.0    0.0983084 0.0983647 0.0984181
                5.0    0.079712  0.0797451 0.0798231
                10.0    0.0770218 0.0769997 0.0771001
                </tableData>
            <tableData breakPoint="8.8">
                      39.373565103312565      61.8727451623483      84.37192522138405
                -10.0    0.1064208 0.106507  0.1065519
                -5.0    0.0948266 0.0948556 0.0949697
                0.0    0.0904567 0.0902824 0.0904035
                5.0    0.0839441 0.0853291 0.0853993
                10.0    0.065272  0.0653131 0.058896
                </tableData>
            <tableData breakPoint="10.4">
                      39.373565103312565      61.8727451623483      84.37192522138405
                -10.0    0.0967925 0.0952231 0.0968886
                -5.0    0.0916165 0.0916808 0.0917493
                0.0    0.0869622 0.0870273 0.0870827
                5.0    0.0819473 0.0819821 0.0820448
                10.0    0.0773503 0.0774271 0.0776059
                </tableData>
            <tableData breakPoint="12.0">
                      39.373565103312565      61.8727451623483      84.37192522138405
                -10.0    0.0958532 0.0959063 0.0960757
                -5.0    0.0913511 0.0914043 0.0914702
                0.0    0.086542  0.0865908 0.0866753
                5.0    0.0812797 0.0841482 0.081405
                10.0    0.075326  0.0754002 0.0753913
                </tableData>
        </table>
    </function>
    <function name="aero/coefficient/CL__dRudevL_rad">
        <description>CL__dRudevL_rad = dCL__dRudevL_rad * dRudevL_rad</description>
        <product>
            <property>aero/coefficient/dCL__dRudevL_rad</property>
            <property>fcs/posRudevL_rad</property>
        </product>
    </function>
    <function name="aero/coefficient/dCL__dRudevR_rad">
        <description>dCL__dRudevR_rad</description>
        <table>
            <independentVar lookup="row">aero/beta-deg</independentVar>
            <independentVar lookup="column">velocities/vt-fps</independentVar>
            <independentVar lookup="table">aero/alpha-deg</independentVar>
            <tableData breakPoint="-4.0">
                      39.373565103312565      61.8727451623483      84.37192522138405
                -10.0    0.1036855 0.103892  0.1040394
                -5.0    0.1108149 0.1109013 0.1109997
                0.0    0.1175338 0.1175976 0.1176893
                5.0    0.1239466 0.1239999 0.1240748
                10.0    0.1253204 0.1253697 0.1207078
                </tableData>
            <tableData breakPoint="-2.4">
                      39.373565103312565      61.8727451623483      84.37192522138405
                -10.0    0.1016423 0.1017265 0.1019148
                -5.0    0.1101119 0.1101736 0.1102778
                0.0    0.1169991 0.1170539 0.1171262
                5.0    0.1236278 0.1236735 0.1237393
                10.0    0.124879  0.12494   0.1249556
                </tableData>
            <tableData breakPoint="-0.8">
                      39.373565103312565      61.8727451623483      84.37192522138405
                -10.0    0.1000199 0.1000937 0.100231
                -5.0    0.1089871 0.1089931 0.1090784
                0.0    0.117267  0.117331  0.1174113
                5.0    0.1223994 0.1234805 0.1235295
                10.0    0.1253584 0.1254179 0.1248479
                </tableData>
            <tableData breakPoint="0.8">
                      39.373565103312565      61.8727451623483      84.37192522138405
                -10.0    0.0970416 0.0971873 0.0972661
                -5.0    0.1074988 0.1075589 0.1076632
                0.0    0.1171424 0.1171743 0.1172839
                5.0    0.1231774 0.1232509 0.1233035
                10.0    0.1259854 0.126049  0.1261589
                </tableData>
            <tableData breakPoint="2.4">
                      39.373565103312565      61.8727451623483      84.37192522138405
                -10.0    0.0951949 0.0952901 0.0954352
                -5.0    0.1061604 0.1062555 0.1043255
                0.0    0.1168072 0.1168755 0.1169753
                5.0    0.1228628 0.1229394 0.1230432
                10.0    0.1261069 0.126186  0.1262347
                </tableData>
            <tableData breakPoint="4.0">
                      39.373565103312565      61.8727451623483      84.37192522138405
                -10.0    0.093599  0.0936852 0.093754
                -5.0    0.1048862 0.104962  0.1050718
                0.0    0.116207  0.1161452 0.1162639
                5.0    0.1224955 0.1225978 0.1227315
                10.0    0.1255775 0.1256738 0.1257121
                </tableData>
            <tableData breakPoint="5.6">
                      39.373565103312565      61.8727451623483      84.37192522138405
                -10.0    0.0786627 0.0787505 0.0787961
                -5.0    0.0863715 0.0864109 0.0864758
                0.0    0.114989  0.115088  0.1151349
                5.0    0.1233494 0.1235235 0.1236284
                10.0    0.1249652 0.1250573 0.1251281
                </tableData>
            <tableData breakPoint="7.2">
                      39.373565103312565      61.8727451623483      84.37192522138405
                -10.0    0.0768864 0.0769511 0.0770557
                -5.0    0.0799817 0.0797343 0.079783
                0.0    0.0982197 0.0982936 0.0983509
                5.0    0.1141682 0.1140464 0.1143265
                10.0    0.1255763 0.1256474 0.1223383
                </tableData>
            <tableData breakPoint="8.8">
                      39.373565103312565      61.8727451623483      84.37192522138405
                -10.0    0.0652839 0.0653392 0.0654238
                -5.0    0.0853034 0.0853279 0.0854515
                0.0    0.0904602 0.0902885 0.0904063
                5.0    0.0934564 0.0948457 0.0949086
                10.0    0.1063905 0.1064461 0.1065408
                </tableData>
            <tableData breakPoint="10.4">
                      39.373565103312565      61.8727451623483      84.37192522138405
                -10.0    0.0773143 0.075796  0.0775425
                -5.0    0.0819129 0.081974  0.0820513
                0.0    0.0869645 0.0870204 0.0870783
                5.0    0.091632  0.0916703 0.0917371
                10.0    0.0966471 0.0966994 0.0967367
                </tableData>
            <tableData breakPoint="12.0">
                      39.373565103312565      61.8727451623483      84.37192522138405
                -10.0    0.0753133 0.075398  0.0753702
                -5.0    0.0812711 0.0813196 0.0813974
                0.0    0.0865373 0.0865863 0.0866615
                5.0    0.0913419 0.0914133 0.0914385
                10.0    0.0958682 0.0959158 0.0961017
                </tableData>
        </table>
    </function>
    <function name="aero/coefficient/CL__dRudevR_rad">
        <description>CL__dRudevR_rad = dCL__dRudevR_rad * dRudevR_rad</description>
        <product>
            <property>aero/coefficient/dCL__dRudevR_rad</property>
            <property>fcs/posRudevR_rad</property>
        </product>
    </function>
    <function name="aero/coefficient/CL">
        <description>CL summation</description>
        <sum>
            <property>aero/coefficient/CL__zero</property>
            <property>aero/coefficient/CL__alpha_rad</property>
            <property>aero/coefficient/CL__beta_rad</property>
            <property>aero/coefficient/CL__dpHat_rps</property>
            <property>aero/coefficient/CL__dqHat_rps</property>
            <property>aero/coefficient/CL__drHat_rps</property>
            <property>aero/coefficient/CL__dAilL_rad</property>
            <property>aero/coefficient/CL__dAilR_rad</property>
            <property>aero/coefficient/CL__dRudevL_rad</property>
            <property>aero/coefficient/CL__dRudevR_rad</property>
        </sum>
    </function>
    <function name="aero/coefficient/CD__zero">
        <description>CD__zero</description>
        <table>
            <independentVar lookup="row">aero/beta-deg</independentVar>
            <independentVar lookup="column">velocities/vt-fps</independentVar>
            <independentVar lookup="table">aero/alpha-deg</independentVar>
            <tableData breakPoint="-4.0">
                      39.373565103312565      61.8727451623483      84.37192522138405
                -10.0    0.04653569 0.04653026 0.04652311
                -5.0    0.04761589 0.04761939 0.0476256
                0.0    0.04834247 0.04834799 0.04835604
                5.0    0.04749261 0.04749582 0.04750164
                10.0    0.04702626 0.04701941 0.04705677
                </tableData>
            <tableData breakPoint="-2.4">
                      39.373565103312565      61.8727451623483      84.37192522138405
                -10.0    0.05051867 0.05052145 0.05052847
                -5.0    0.0499256  0.04993457 0.04994837
                0.0    0.05083254 0.05084398 0.05086049
                5.0    0.0496742  0.0496821  0.04969495
                10.0    0.04913838 0.04913658 0.04915277
                </tableData>
            <tableData breakPoint="-0.8">
                      39.373565103312565      61.8727451623483      84.37192522138405
                -10.0    0.05035125 0.05035705 0.0503725
                -5.0    0.05099939 0.05103818 0.05105596
                0.0    0.05189436 0.05190829 0.05192866
                5.0    0.05058338 0.05059334 0.05063643
                10.0    0.05123766 0.0512413  0.05132775
                </tableData>
            <tableData breakPoint="0.8">
                      39.373565103312565      61.8727451623483      84.37192522138405
                -10.0    0.05113461 0.05113858 0.05115292
                -5.0    0.05101618 0.05102567 0.0510398
                0.0    0.05129509 0.05130729 0.05132499
                5.0    0.05037408 0.05038375 0.05039879
                10.0    0.05451479 0.05452423 0.05458393
                </tableData>
            <tableData breakPoint="2.4">
                      39.373565103312565      61.8727451623483      84.37192522138405
                -10.0    0.04921995 0.04923026 0.04924544
                -5.0    0.04860439 0.04859815 0.04859099
                0.0    0.04943396 0.04943876 0.04944589
                5.0    0.04964581 0.04965193 0.04966242
                10.0    0.05035713 0.05037216 0.05041909
                </tableData>
            <tableData breakPoint="4.0">
                      39.373565103312565      61.8727451623483      84.37192522138405
                -10.0    0.04636239 0.04638927 0.04643312
                -5.0    0.04620645 0.04619702 0.04626898
                0.0    0.0436445  0.043621   0.04360888
                5.0    0.04646272 0.04648573 0.04653344
                10.0    0.04616384 0.04619508 0.04628643
                </tableData>
            <tableData breakPoint="5.6">
                      39.373565103312565      61.8727451623483      84.37192522138405
                -10.0    0.04242141 0.04238205 0.04235962
                -5.0    0.04099533 0.04094905 0.04095005
                0.0    0.04287986 0.04287021 0.04285641
                5.0    0.04148163 0.04147674 0.04153932
                10.0    0.04110614 0.04103903 0.04098626
                </tableData>
            <tableData breakPoint="7.2">
                      39.373565103312565      61.8727451623483      84.37192522138405
                -10.0    0.04639563 0.04657868 0.04677107
                -5.0    0.04649685 0.0466002  0.04675231
                0.0    0.04878466 0.0488845  0.04903047
                5.0    0.04737685 0.04751094 0.04773423
                10.0    0.04551952 0.04574473 0.04609336
                </tableData>
            <tableData breakPoint="8.8">
                      39.373565103312565      61.8727451623483      84.37192522138405
                -10.0    0.05389822 0.05398558 0.05413159
                -5.0    0.05581485 0.05595426 0.05616111
                0.0    0.06066036 0.06086809 0.06112956
                5.0    0.05697486 0.05681213 0.05705828
                10.0    0.05242018 0.05257266 0.05270066
                </tableData>
            <tableData breakPoint="10.4">
                      39.373565103312565      61.8727451623483      84.37192522138405
                -10.0    0.05621832 0.05635852 0.05650527
                -5.0    0.05832826 0.05837944 0.05843114
                0.0    0.06960106 0.07118183 0.06977139
                5.0    0.05907813 0.05910296 0.05916241
                10.0    0.05273523 0.05209826 0.05225313
                </tableData>
            <tableData breakPoint="12.0">
                      39.373565103312565      61.8727451623483      84.37192522138405
                -10.0    0.05476052 0.05478599 0.05482958
                -5.0    0.06143202 0.06150061 0.06155433
                0.0    0.04706315 0.04708463 0.04709863
                5.0    0.06106107 0.06111782 0.0612024
                10.0    0.06537716 0.06546658 0.06558269
                </tableData>
        </table>
    </function>
    <function name="aero/coefficient/dCD__alpha_rad">
        <description>dCD__alpha_rad</description>
        <table>
            <independentVar lookup="row">aero/beta-deg</independentVar>
            <independentVar lookup="column">velocities/vt-fps</independentVar>
            <independentVar lookup="table">aero/alpha-deg</independentVar>
            <tableData breakPoint="-4.0">
                      39.373565103312565      61.8727451623483      84.37192522138405
                -10.0    0.0275801 0.0276475 0.0277209
                -5.0    0.030404  0.030476  0.0305773
                0.0    0.0308318 0.0308994 0.0309976
                5.0    0.0303317 0.0304035 0.0305056
                10.0    0.0275887 0.0276557 0.0277292
                </tableData>
            <tableData breakPoint="-2.4">
                      39.373565103312565      61.8727451623483      84.37192522138405
                -10.0    0.0844744 0.0846853 0.0850464
                -5.0    0.0839614 0.084153  0.0844289
                0.0    0.0838415 0.0840333 0.0843081
                5.0    0.0840089 0.0842008 0.0844747
                10.0    0.0845069 0.0847149 0.0850775
                </tableData>
            <tableData breakPoint="-0.8">
                      39.373565103312565      61.8727451623483      84.37192522138405
                -10.0    0.1364675 0.1368031 0.1372482
                -5.0    0.1353814 0.1360417 0.136527
                0.0    0.1381587 0.1384835 0.1389535
                5.0    0.1356911 0.1360298 0.1362122
                10.0    0.1364946 0.1368281 0.1372545
                </tableData>
            <tableData breakPoint="0.8">
                      39.373565103312565      61.8727451623483      84.37192522138405
                -10.0    0.1803373 0.1808253 0.1815552
                -5.0    0.1878017 0.1883208 0.1890915
                0.0    0.1914042 0.1918846 0.1925862
                5.0    0.1877956 0.1883184 0.1890806
                10.0    0.1803356 0.1808357 0.1815553
                </tableData>
            <tableData breakPoint="2.4">
                      39.373565103312565      61.8727451623483      84.37192522138405
                -10.0    0.2366228 0.2371578 0.2380285
                -5.0    0.2392601 0.2400394 0.2411478
                0.0    0.2421926 0.2428754 0.2438607
                5.0    0.2392618 0.2400368 0.241152
                10.0    0.2366279 0.2371669 0.2380389
                </tableData>
            <tableData breakPoint="4.0">
                      39.373565103312565      61.8727451623483      84.37192522138405
                -10.0    0.2810631 0.2815399 0.2823239
                -5.0    0.2837673 0.2844952 0.2855514
                0.0    0.3283364 0.3294693 0.3308046
                5.0    0.283768  0.2844927 0.2855547
                10.0    0.281053  0.2815351 0.2823207
                </tableData>
            <tableData breakPoint="5.6">
                      39.373565103312565      61.8727451623483      84.37192522138405
                -10.0    0.3261254 0.3274004 0.3292213
                -5.0    0.3427528 0.3439244 0.3449514
                0.0    0.3338517 0.334731  0.3360059
                5.0    0.3427122 0.3439202 0.3449488
                10.0    0.3261094 0.327394  0.3292035
                </tableData>
            <tableData breakPoint="7.2">
                      39.373565103312565      61.8727451623483      84.37192522138405
                -10.0    0.3035373 0.3025972 0.3011395
                -5.0    0.2988947 0.2985768 0.2981576
                0.0    0.2863702 0.2862935 0.2861728
                5.0    0.298828  0.2985291 0.2980981
                10.0    0.3034735 0.3025246 0.3010829
                </tableData>
            <tableData breakPoint="8.8">
                      39.373565103312565      61.8727451623483      84.37192522138405
                -10.0    0.2471549 0.2471268 0.2470877
                -5.0    0.2374845 0.2371114 0.2365359
                0.0    0.206045  0.2052596 0.2043574
                5.0    0.2360373 0.2369049 0.2363765
                10.0    0.2470173 0.2468574 0.2469398
                </tableData>
            <tableData breakPoint="10.4">
                      39.373565103312565      61.8727451623483      84.37192522138405
                -10.0    0.2230971 0.2219957 0.2229123
                -5.0    0.2212988 0.2214953 0.2218791
                0.0    0.1554073 0.1471062 0.1554738
                5.0    0.2210476 0.2213447 0.2216661
                10.0    0.2228907 0.2227509 0.2226734
                </tableData>
            <tableData breakPoint="12.0">
                      39.373565103312565      61.8727451623483      84.37192522138405
                -10.0    0.181911  0.1820456 0.182274
                -5.0    0.2209818 0.2211134 0.2214953
                0.0    0.2620291 0.2622899 0.2627559
                5.0    0.2206747 0.2208357 0.2210639
                10.0    0.1818754 0.1818912 0.1820459
                </tableData>
        </table>
    </function>
    <function name="aero/coefficient/CD__alpha_rad">
        <description>CD__alpha_rad = dCD__alpha_rad * alpha_rad</description>
        <product>
            <property>aero/coefficient/dCD__alpha_rad</property>
            <property>aero/alpha-rad</property>
        </product>
    </function>
    <function name="aero/coefficient/dCD__beta_rad">
        <description>dCD__beta_rad</description>
        <table>
            <independentVar lookup="row">aero/beta-deg</independentVar>
            <independentVar lookup="column">velocities/vt-fps</independentVar>
            <independentVar lookup="table">aero/alpha-deg</independentVar>
            <tableData breakPoint="-4.0">
                      39.373565103312565      61.8727451623483      84.37192522138405
                -10.0    -0.0183201 -0.0184223 -0.0185362
                -5.0    -0.0115131 -0.0115501 -0.0115806
                0.0    0.0012407 0.001247  0.001254
                5.0    0.0128737 0.012915  0.0129494
                10.0    0.0155145 0.0156247 0.0154836
                </tableData>
            <tableData breakPoint="-2.4">
                      39.373565103312565      61.8727451623483      84.37192522138405
                -10.0    -0.0104008 -0.0104928 -0.0106
                -5.0    -0.0139706 -0.0140102 -0.0140464
                0.0    0.0022912 0.0022952 0.0022991
                5.0    0.0168674 0.0169194 0.0169655
                10.0    0.0183194 0.0184369 0.0184925
                </tableData>
            <tableData breakPoint="-0.8">
                      39.373565103312565      61.8727451623483      84.37192522138405
                -10.0    -0.0177955 -0.0178848 -0.0179453
                -5.0    -0.0127196 -0.0124357 -0.01247
                0.0    0.001486  0.0014973 0.0014996
                5.0    0.0174778 0.017537  0.0172924
                10.0    0.0127206 0.0128227 0.0124772
                </tableData>
            <tableData breakPoint="0.8">
                      39.373565103312565      61.8727451623483      84.37192522138405
                -10.0    -0.0114741 -0.0115693 -0.0116224
                -5.0    -0.0076044 -0.0076498 -0.0076958
                0.0    -0.0034775 -0.0034746 -0.0034693
                5.0    0.0149657 0.0150084 0.0150453
                10.0    -0.0078859 -0.0078247 -0.008029
                </tableData>
            <tableData breakPoint="2.4">
                      39.373565103312565      61.8727451623483      84.37192522138405
                -10.0    -0.0106027 -0.0106547 -0.0106739
                -5.0    -0.0154161 -0.0155364 -0.0156857
                0.0    0.0002206 0.0002655 0.0003204
                5.0    0.0034826 0.0034633 0.0034071
                10.0    0.0040922 0.0041162 0.0039532
                </tableData>
            <tableData breakPoint="4.0">
                      39.373565103312565      61.8727451623483      84.37192522138405
                -10.0    -0.0105797 -0.010573  -0.0104671
                -5.0    -0.0105419 -0.0107552 -0.0100631
                0.0    0.0225308 0.0226932 0.0229032
                5.0    0.0076059 0.00745   0.0070311
                10.0    0.0117305 0.011695  0.0113157
                </tableData>
            <tableData breakPoint="5.6">
                      39.373565103312565      61.8727451623483      84.37192522138405
                -10.0    -0.0087829 -0.0087207 -0.0084357
                -5.0    -0.0080918 -0.0082622 -0.008463
                0.0    -0.0036573 -0.0035958 -0.0033692
                5.0    0.0025659 0.0022223 0.0017145
                10.0    0.0163341 0.0164261 0.0163207
                </tableData>
            <tableData breakPoint="7.2">
                      39.373565103312565      61.8727451623483      84.37192522138405
                -10.0    -0.0032048 -0.0034431 -0.0042595
                -5.0    -0.0089065 -0.0092811 -0.0097117
                0.0    -0.0009565 -0.0011365 -0.0013785
                5.0    -0.0010735 -0.0010807 -0.0014501
                10.0    0.0082728 0.0082764 0.0081844
                </tableData>
            <tableData breakPoint="8.8">
                      39.373565103312565      61.8727451623483      84.37192522138405
                -10.0    -0.0077373 -0.00778   -0.0077009
                -5.0    -0.0049269 -0.0049784 -0.0050464
                0.0    0.0019378 0.001894  0.0019855
                5.0    -0.0055461 -0.004491  -0.0049515
                10.0    0.0163132 0.0161125 0.0160165
                </tableData>
            <tableData breakPoint="10.4">
                      39.373565103312565      61.8727451623483      84.37192522138405
                -10.0    -0.0169898 -0.0179141 -0.0166947
                -5.0    -0.006836  -0.0067346 -0.006625
                0.0    0.0036408 0.0038183 0.004005
                5.0    -0.001255  -0.0012763 -0.0013495
                10.0    0.0371502 0.0414276 0.0412975
                </tableData>
            <tableData breakPoint="12.0">
                      39.373565103312565      61.8727451623483      84.37192522138405
                -10.0    -0.073592  -0.0737733 -0.0739353
                -5.0    0.0280204 0.0281642 0.0283155
                0.0    0.0741772 0.074323  0.0745176
                5.0    -0.0231197 -0.0232018 -0.0233345
                10.0    0.0127549 0.01271   0.0125461
                </tableData>
        </table>
    </function>
    <function name="aero/coefficient/CD__beta_rad">
        <description>CD__beta_rad = dCD__beta_rad * beta_rad</description>
        <product>
            <property>aero/coefficient/dCD__beta_rad</property>
            <property>aero/beta-rad</property>
        </product>
    </function>
    <function name="aero/coefficient/dCD__dpHat_rps">
        <description>dCD__dpHat_rps</description>
        <table>
            <independentVar lookup="row">aero/beta-deg</independentVar>
            <independentVar lookup="column">velocities/vt-fps</independentVar>
            <independentVar lookup="table">aero/alpha-deg</independentVar>
            <tableData breakPoint="-4.0">
                      39.373565103312565      61.8727451623483      84.37192522138405
                -10.0    0.0124199 0.0124657 0.0125291
                -5.0    0.0153095 0.015369  0.0154548
                0.0    0.0200082 0.0200863 0.0201999
                5.0    0.0246551 0.024742  0.0248697
                10.0    0.0278549 0.0279373 0.0280557
                </tableData>
            <tableData breakPoint="-2.4">
                      39.373565103312565      61.8727451623483      84.37192522138405
                -10.0    0.0142986 0.0143351 0.0143899
                -5.0    0.0176276 0.0176736 0.0177406
                0.0    0.0191446 0.0191988 0.0192778
                5.0    0.0223905 0.0224593 0.0225593
                10.0    0.0263192 0.026396  0.0265059
                </tableData>
            <tableData breakPoint="-0.8">
                      39.373565103312565      61.8727451623483      84.37192522138405
                -10.0    0.0154247 0.0154589 0.0155067
                -5.0    0.0208541 0.0209832 0.0210585
                0.0    0.0193464 0.0193949 0.0194657
                5.0    0.0192482 0.0193254 0.0193628
                10.0    0.0249111 0.025014  0.0251526
                </tableData>
            <tableData breakPoint="0.8">
                      39.373565103312565      61.8727451623483      84.37192522138405
                -10.0    0.016524  0.0165469 0.0165895
                -5.0    0.0234837 0.0234152 0.0235078
                0.0    0.019602  0.0196755 0.019729
                5.0    0.0167804 0.0169317 0.0170993
                10.0    0.0232188 0.0233093 0.0234406
                </tableData>
            <tableData breakPoint="2.4">
                      39.373565103312565      61.8727451623483      84.37192522138405
                -10.0    0.0170548 0.0170136 0.0169942
                -5.0    0.0252603 0.0253789 0.0255606
                0.0    0.0196038 0.0196473 0.0197107
                5.0    0.0149836 0.0150034 0.0150268
                10.0    0.0206218 0.0206296 0.0206532
                </tableData>
            <tableData breakPoint="4.0">
                      39.373565103312565      61.8727451623483      84.37192522138405
                -10.0    0.0192081 0.0192794 0.0194099
                -5.0    0.0264627 0.0264649 0.0264691
                0.0    0.0191453 0.0191464 0.0191414
                5.0    0.0119847 0.0119475 0.0118908
                10.0    0.01729   0.0173121 0.0173318
                </tableData>
            <tableData breakPoint="5.6">
                      39.373565103312565      61.8727451623483      84.37192522138405
                -10.0    0.0197078 0.0198295 0.0199984
                -5.0    0.0274471 0.0274621 0.0274868
                0.0    0.0176871 0.0177328 0.0178036
                5.0    0.0077602 0.0076951 0.007582
                10.0    0.0145224 0.0145862 0.0146288
                </tableData>
            <tableData breakPoint="7.2">
                      39.373565103312565      61.8727451623483      84.37192522138405
                -10.0    0.0120548 0.0117624 0.0113463
                -5.0    0.0144496 0.014402  0.0143446
                0.0     6.080e-05 -1.698e-04 -4.540e-04
                5.0    -0.0133162 -0.0135487 -0.0138974
                10.0    -0.0045842 -0.0050445 -0.0057563
                </tableData>
            <tableData breakPoint="8.8">
                      39.373565103312565      61.8727451623483      84.37192522138405
                -10.0    0.0033524 0.0032105 0.0030576
                -5.0    -0.0007803 -0.0009011 -0.0010614
                0.0    -0.0157283 -0.0158394 -0.015983
                5.0    -0.0267524 -0.0263656 -0.026435
                10.0    -0.0222083 -0.0223429 -0.0224978
                </tableData>
            <tableData breakPoint="10.4">
                      39.373565103312565      61.8727451623483      84.37192522138405
                -10.0    0.0017152 0.0014635 0.0017272
                -5.0    -0.0033884 -0.0033293 -0.0031993
                0.0    -0.0105039 -0.0103964 -0.0102436
                5.0    -0.0190732 -0.0172085 -0.0170396
                10.0    -0.0240619 -0.0239728 -0.0241012
                </tableData>
            <tableData breakPoint="12.0">
                      39.373565103312565      61.8727451623483      84.37192522138405
                -10.0    0.0025574 0.0043846 0.0044123
                -5.0    0.0030142 0.0029924 0.0030013
                0.0    -0.0013888 -0.0013438 -0.0012765
                5.0    -0.0085801 -0.0084449 -0.0082942
                10.0    -0.0159014 -0.0177191 -0.0156719
                </tableData>
        </table>
    </function>
    <function name="aero/coefficient/CD__dpHat_rps">
        <description>CD__dpHat_rps = dCD__dpHat_rps * dpHat_rps</description>
        <product>
            <property>aero/coefficient/dCD__dpHat_rps</property>
            <property>velocities/p-aero-rad_sec</property>
            <property>aero/bi2vel</property>
        </product>
    </function>
    <function name="aero/coefficient/dCD__dqHat_rps">
        <description>dCD__dqHat_rps</description>
        <table>
            <independentVar lookup="row">aero/beta-deg</independentVar>
            <independentVar lookup="column">velocities/vt-fps</independentVar>
            <independentVar lookup="table">aero/alpha-deg</independentVar>
            <tableData breakPoint="-4.0">
                      39.373565103312565      61.8727451623483      84.37192522138405
                -10.0    0.0289817 0.0290495 0.029088
                -5.0    0.0182147 0.0182545 0.0183156
                0.0    0.0219027 0.0219512 0.0220211
                5.0    0.0181117 0.0181521 0.0182132
                10.0    0.0289939 0.029061  0.0291001
                </tableData>
            <tableData breakPoint="-2.4">
                      39.373565103312565      61.8727451623483      84.37192522138405
                -10.0    0.1112571 0.1115165 0.111849
                -5.0    0.103983  0.1042221 0.1045659
                0.0    0.1046872 0.1049308 0.1052824
                5.0    0.1040698 0.1043089 0.1046578
                10.0    0.1114232 0.1116798 0.112471
                </tableData>
            <tableData breakPoint="-0.8">
                      39.373565103312565      61.8727451623483      84.37192522138405
                -10.0    0.202934  0.2034256 0.2041217
                -5.0    0.1866096 0.187705  0.1883375
                0.0    0.1883823 0.1888044 0.1894312
                5.0    0.1872588 0.1876996 0.1877205
                10.0    0.2029482 0.2034361 0.2040889
                </tableData>
            <tableData breakPoint="0.8">
                      39.373565103312565      61.8727451623483      84.37192522138405
                -10.0    0.2929135 0.2936274 0.2947156
                -5.0    0.2739318 0.2746268 0.275631
                0.0    0.2881908 0.2888876 0.2896308
                5.0    0.273922  0.2746901 0.2756062
                10.0    0.2929109 0.2936498 0.2947097
                </tableData>
            <tableData breakPoint="2.4">
                      39.373565103312565      61.8727451623483      84.37192522138405
                -10.0    0.3731445 0.3740774 0.3754448
                -5.0    0.3639823 0.3649883 0.3664404
                0.0    0.3723367 0.3729966 0.3743162
                5.0    0.363974  0.3649804 0.3664335
                10.0    0.3731425 0.3740797 0.3754541
                </tableData>
            <tableData breakPoint="4.0">
                      39.373565103312565      61.8727451623483      84.37192522138405
                -10.0    0.4536447 0.4542597 0.4553086
                -5.0    0.4509503 0.4521542 0.4539661
                0.0    0.4551547 0.456473  0.4583364
                5.0    0.4509413 0.4560775 0.4539599
                10.0    0.4536202 0.4542585 0.4553165
                </tableData>
            <tableData breakPoint="5.6">
                      39.373565103312565      61.8727451623483      84.37192522138405
                -10.0    0.5202772 0.5222604 0.5248484
                -5.0    0.5212162 0.5227628 0.5250107
                0.0    0.5431426 0.5445451 0.5466058
                5.0    0.5212028 0.5227543 0.5249874
                10.0    0.5202712 0.5222568 0.5248413
                </tableData>
            <tableData breakPoint="7.2">
                      39.373565103312565      61.8727451623483      84.37192522138405
                -10.0    0.5189758 0.5175598 0.5147182
                -5.0    0.5047893 0.5046737 0.5045737
                0.0    0.4896608 0.4895846 0.4894856
                5.0    0.5046591 0.504514  0.5044778
                10.0    0.5189957 0.517573  0.5147703
                </tableData>
            <tableData breakPoint="8.8">
                      39.373565103312565      61.8727451623483      84.37192522138405
                -10.0    0.4439536 0.4441421 0.4443682
                -5.0    0.4428348 0.4427331 0.442535
                0.0    0.4251231 0.4246515 0.4242592
                5.0    0.4399751 0.4426622 0.4424223
                10.0    0.4441087 0.4439187 0.4444762
                </tableData>
            <tableData breakPoint="10.4">
                      39.373565103312565      61.8727451623483      84.37192522138405
                -10.0    0.3823618 0.3802733 0.3821732
                -5.0    0.4352176 0.4358926 0.4368913
                0.0    0.3813632 0.3818658 0.3825334
                5.0    0.4356892 0.4365223 0.437541
                10.0    0.382462  0.3824697 0.3822617
                </tableData>
            <tableData breakPoint="12.0">
                      39.373565103312565      61.8727451623483      84.37192522138405
                -10.0    0.3543284 0.3543006 0.3550541
                -5.0    0.4706193 0.4713689 0.4725319
                0.0    0.3291714 0.3295733 0.330202
                5.0    0.4707039 0.471505  0.4725599
                10.0    0.3535711 0.3542007 0.3548695
                </tableData>
        </table>
    </function>
    <function name="aero/coefficient/CD__dqHat_rps">
        <description>CD__dqHat_rps = dCD__dqHat_rps * dqHat_rps</description>
        <product>
            <property>aero/coefficient/dCD__dqHat_rps</property>
            <property>velocities/q-aero-rad_sec</property>
            <property>aero/ci2vel</property>
        </product>
    </function>
    <function name="aero/coefficient/dCD__drHat_rps">
        <description>dCD__drHat_rps</description>
        <table>
            <independentVar lookup="row">aero/beta-deg</independentVar>
            <independentVar lookup="column">velocities/vt-fps</independentVar>
            <independentVar lookup="table">aero/alpha-deg</independentVar>
            <tableData breakPoint="-4.0">
                      39.373565103312565      61.8727451623483      84.37192522138405
                -10.0    0.0110623 0.0110805 0.0110709
                -5.0    0.0057014 0.0057198 0.0057352
                0.0    0.001152  0.0011541 0.0011554
                5.0    -0.0033315 -0.0033409 -0.003345
                10.0    -0.0087048 -0.0087473 -0.0087923
                </tableData>
            <tableData breakPoint="-2.4">
                      39.373565103312565      61.8727451623483      84.37192522138405
                -10.0    0.0105481 0.0105682 0.0105574
                -5.0    0.0051746 0.0051834 0.005199
                0.0    0.0011173 0.0011194 0.0011204
                5.0    -0.0028579 -0.0028675 -0.0028719
                10.0    -0.0082213 -0.0082642 -0.0083051
                </tableData>
            <tableData breakPoint="-0.8">
                      39.373565103312565      61.8727451623483      84.37192522138405
                -10.0    0.0110734 0.011097  0.0110724
                -5.0    0.0041709 0.0042666 0.0042808
                0.0    0.0010751 0.0010769 0.0010782
                5.0    -0.002056  -0.0020644 -0.0021386
                10.0    -0.008761  -0.0088077 -0.0088606
                </tableData>
            <tableData breakPoint="0.8">
                      39.373565103312565      61.8727451623483      84.37192522138405
                -10.0    0.0110708 0.0110925 0.0110563
                -5.0    0.0040577 0.0040764 0.0040943
                0.0    0.0010456 0.0010477 0.0010491
                5.0    -0.0019148 -0.0019249 -0.001926
                10.0    -0.0088378 -0.0088876 -0.0089362
                </tableData>
            <tableData breakPoint="2.4">
                      39.373565103312565      61.8727451623483      84.37192522138405
                -10.0    0.0105015 0.0105222 0.010468
                -5.0    0.0041772 0.0042002 0.0042224
                0.0    0.0010567 0.0010591 0.0011728
                5.0    -0.0020568 -0.0020698 -0.0020736
                10.0    -0.008336  -0.008389  -0.0084401
                </tableData>
            <tableData breakPoint="4.0">
                      39.373565103312565      61.8727451623483      84.37192522138405
                -10.0    0.0100596 0.0100088 0.0098935
                -5.0    0.0042801 0.0042628 0.0041952
                0.0    0.001159  0.0011511 0.0011303
                5.0    -0.0023134 -0.0023284 -0.0022884
                10.0    -0.0080656 -0.0081121 -0.00815
                </tableData>
            <tableData breakPoint="5.6">
                      39.373565103312565      61.8727451623483      84.37192522138405
                -10.0    0.0107018 0.0107128 0.0106494
                -5.0    0.0043424 0.004359  0.0043675
                0.0    0.0010594 0.0011189 0.0011601
                5.0    -0.002422  -0.0024259 -0.0024114
                10.0    -0.0085942 -0.0085638 -0.0085247
                </tableData>
            <tableData breakPoint="7.2">
                      39.373565103312565      61.8727451623483      84.37192522138405
                -10.0    0.0090684 0.0089098 0.0085801
                -5.0    0.0031696 0.0033557 0.0033774
                0.0    -0.0003056 -0.0003333 -0.0003805
                5.0    -0.0049882 -0.00498   -0.0049863
                10.0    -0.0094691 -0.0096528 -0.0099109
                </tableData>
            <tableData breakPoint="8.8">
                      39.373565103312565      61.8727451623483      84.37192522138405
                -10.0    0.0065931 0.006496  0.0063514
                -5.0    -0.0002316 -0.0002675 -0.0003431
                0.0    -0.003816  -0.003902  -0.0039725
                5.0    -0.0049807 -0.0046731 -0.004679
                10.0    -0.0100269 -0.0101001 -0.0100904
                </tableData>
            <tableData breakPoint="10.4">
                      39.373565103312565      61.8727451623483      84.37192522138405
                -10.0    0.0074132 0.0071929 0.0074521
                -5.0    0.00381   0.0039629 0.0041823
                0.0    0.0014496 0.001505  0.001575
                5.0    -0.0047073 -0.0047183 -0.004716
                10.0    -0.0097716 -0.0098605 -0.0099585
                </tableData>
            <tableData breakPoint="12.0">
                      39.373565103312565      61.8727451623483      84.37192522138405
                -10.0    0.0171846 0.0172676 0.0174472
                -5.0    0.0074693 0.007452  0.0075151
                0.0    0.0021747 0.002177  0.0021884
                5.0    -0.0040136 -0.0040183 -0.0040215
                10.0    -0.0155727 -0.015614  -0.0156687
                </tableData>
        </table>
    </function>
    <function name="aero/coefficient/CD__drHat_rps">
        <description>CD__drHat_rps = dCD__drHat_rps * drHat_rps</description>
        <product>
            <property>aero/coefficient/dCD__drHat_rps</property>
            <property>velocities/r-aero-rad_sec</property>
            <property>aero/bi2vel</property>
        </product>
    </function>
    <function name="aero/coefficient/dCD__dAilL_rad">
        <description>dCD__dAilL_rad</description>
        <table>
            <independentVar lookup="row">aero/beta-deg</independentVar>
            <independentVar lookup="column">velocities/vt-fps</independentVar>
            <independentVar lookup="table">aero/alpha-deg</independentVar>
            <tableData breakPoint="-4.0">
                      39.373565103312565      61.8727451623483      84.37192522138405
                -10.0    0.0043695 0.0043812 0.0043921
                -5.0    0.0045064 0.0045172 0.0045336
                0.0    0.0039202 0.0039284 0.0039404
                5.0    0.0042172 0.0042263 0.0042404
                10.0    0.004123  0.0041328 0.0041471
                </tableData>
            <tableData breakPoint="-2.4">
                      39.373565103312565      61.8727451623483      84.37192522138405
                -10.0    0.0096297 0.0096524 0.009684
                -5.0    0.0100148 0.0100361 0.010068
                0.0    0.0094823 0.0095026 0.0094668
                5.0    0.0110113 0.0110345 0.0110687
                10.0    0.0104482 0.0104708 0.0105064
                </tableData>
            <tableData breakPoint="-0.8">
                      39.373565103312565      61.8727451623483      84.37192522138405
                -10.0    0.014923  0.0149259 0.0149757
                -5.0    0.0146826 0.0150382 0.0152783
                0.0    0.0152575 0.0152909 0.0153386
                5.0    0.0178822 0.0179209 0.0176728
                10.0    0.016667  0.0167023 0.0167347
                </tableData>
            <tableData breakPoint="0.8">
                      39.373565103312565      61.8727451623483      84.37192522138405
                -10.0    0.020144  0.0201844 0.0202607
                -5.0    0.0203544 0.0204038 0.0204733
                0.0    0.0210396 0.0210839 0.0211502
                5.0    0.0243355 0.0243888 0.0244657
                10.0    0.0227814 0.022832  0.0229067
                </tableData>
            <tableData breakPoint="2.4">
                      39.373565103312565      61.8727451623483      84.37192522138405
                -10.0    0.025085  0.0251457 0.0252204
                -5.0    0.025823  0.0258909 0.0259859
                0.0    0.0266224 0.0266788 0.0267608
                5.0    0.0306802 0.0307474 0.0308494
                10.0    0.0284083 0.0284646 0.0285495
                </tableData>
            <tableData breakPoint="4.0">
                      39.373565103312565      61.8727451623483      84.37192522138405
                -10.0    0.0302844 0.0303332 0.0302034
                -5.0    0.0308549 0.030945  0.0309164
                0.0    0.0323557 0.0324462 0.0325597
                5.0    0.0363407 0.0364239 0.0365523
                10.0    0.0342505 0.0343337 0.0344182
                </tableData>
            <tableData breakPoint="5.6">
                      39.373565103312565      61.8727451623483      84.37192522138405
                -10.0    0.0358593 0.0359599 0.0361082
                -5.0    0.0346696 0.0347747 0.0348925
                0.0    0.0354528 0.0355389 0.0356723
                5.0    0.0415295 0.0416541 0.0418289
                10.0    0.0394333 0.0395199 0.0399463
                </tableData>
            <tableData breakPoint="7.2">
                      39.373565103312565      61.8727451623483      84.37192522138405
                -10.0    0.0393764 0.0394819 0.0391708
                -5.0    0.0379863 0.0380428 0.0382435
                0.0    0.0404366 0.040531  0.040717
                5.0    0.0452675 0.0453872 0.0455895
                10.0    0.0454014 0.0455256 0.0456615
                </tableData>
            <tableData breakPoint="8.8">
                      39.373565103312565      61.8727451623483      84.37192522138405
                -10.0    0.0322009 0.0321285 0.0320339
                -5.0    0.0309374 0.0308446 0.0306726
                0.0    0.0349529 0.0347509 0.0346468
                5.0    0.0381736 0.0395369 0.0394768
                10.0    0.0414293 0.0412761 0.041415
                </tableData>
            <tableData breakPoint="10.4">
                      39.373565103312565      61.8727451623483      84.37192522138405
                -10.0    0.0168875 0.0215906 0.0226647
                -5.0    0.0228805 0.0230867 0.0231071
                0.0    0.0243161 0.0243373 0.0242999
                5.0    0.0261131 0.0261967 0.026265
                10.0    0.0311366 0.0354577 0.0353994
                </tableData>
            <tableData breakPoint="12.0">
                      39.373565103312565      61.8727451623483      84.37192522138405
                -10.0    0.0219662 0.0219974 0.0219141
                -5.0    0.0230842 0.0231149 0.0232017
                0.0    0.0242394 0.024268  0.0243231
                5.0    0.0259386 0.025991  0.0260289
                10.0    0.0274055 0.0274463 0.0274793
                </tableData>
        </table>
    </function>
    <function name="aero/coefficient/CD__dAilL_rad">
        <description>CD__dAilL_rad = dCD__dAilL_rad * dAilL_rad</description>
        <product>
            <property>aero/coefficient/dCD__dAilL_rad</property>
            <property>fcs/posAilL_rad</property>
        </product>
    </function>
    <function name="aero/coefficient/dCD__dAilR_rad">
        <description>dCD__dAilR_rad</description>
        <table>
            <independentVar lookup="row">aero/beta-deg</independentVar>
            <independentVar lookup="column">velocities/vt-fps</independentVar>
            <independentVar lookup="table">aero/alpha-deg</independentVar>
            <tableData breakPoint="-4.0">
                      39.373565103312565      61.8727451623483      84.37192522138405
                -10.0    0.0041457 0.0041558 0.0041698
                -5.0    0.0042347 0.0042434 0.004258
                0.0    0.0039256 0.0039285 0.0039405
                5.0    0.004509  0.0045197 0.0045359
                10.0    0.0043764 0.0043876 0.0043998
                </tableData>
            <tableData breakPoint="-2.4">
                      39.373565103312565      61.8727451623483      84.37192522138405
                -10.0    0.0104492 0.0104735 0.010509
                -5.0    0.0110104 0.011035  0.0110702
                0.0    0.0094826 0.0095029 0.0094718
                5.0    0.0100063 0.0100259 0.0100599
                10.0    0.009712  0.0097333 0.0097668
                </tableData>
            <tableData breakPoint="-0.8">
                      39.373565103312565      61.8727451623483      84.37192522138405
                -10.0    0.0166517 0.0166889 0.0167434
                -5.0    0.0175608 0.0179223 0.0179791
                0.0    0.0152531 0.0152854 0.0153332
                5.0    0.0149783 0.0150139 0.0147617
                10.0    0.0150397 0.014916  0.0152007
                </tableData>
            <tableData breakPoint="0.8">
                      39.373565103312565      61.8727451623483      84.37192522138405
                -10.0    0.0227763 0.0228126 0.0229015
                -5.0    0.0243344 0.0243895 0.0244686
                0.0    0.0210485 0.0210935 0.021161
                5.0    0.0203545 0.0204012 0.0204709
                10.0    0.0201303 0.0201766 0.0202514
                </tableData>
            <tableData breakPoint="2.4">
                      39.373565103312565      61.8727451623483      84.37192522138405
                -10.0    0.0284053 0.0284606 0.0285371
                -5.0    0.0306805 0.0307505 0.0308498
                0.0    0.0266337 0.0266902 0.0267715
                5.0    0.025825  0.0258942 0.0259878
                10.0    0.0250814 0.0251303 0.0252133
                </tableData>
            <tableData breakPoint="4.0">
                      39.373565103312565      61.8727451623483      84.37192522138405
                -10.0    0.0342678 0.0343276 0.0344046
                -5.0    0.036348  0.0364286 0.0365503
                0.0    0.032374  0.0324536 0.0325784
                5.0    0.0308633 0.0312062 0.0309258
                10.0    0.0302902 0.0303336 0.0302148
                </tableData>
            <tableData breakPoint="5.6">
                      39.373565103312565      61.8727451623483      84.37192522138405
                -10.0    0.0394272 0.0395047 0.0399125
                -5.0    0.0415415 0.0416651 0.041839
                0.0    0.0354777 0.035563  0.035697
                5.0    0.034685  0.0347769 0.034911
                10.0    0.0358636 0.0359596 0.0361103
                </tableData>
            <tableData breakPoint="7.2">
                      39.373565103312565      61.8727451623483      84.37192522138405
                -10.0    0.0454015 0.0455538 0.0456671
                -5.0    0.0453261 0.0454309 0.0456092
                0.0    0.0404805 0.0405961 0.0407633
                5.0    0.0379736 0.0380796 0.0382294
                10.0    0.0393793 0.0394757 0.0392294
                </tableData>
            <tableData breakPoint="8.8">
                      39.373565103312565      61.8727451623483      84.37192522138405
                -10.0    0.0413973 0.0413711 0.0413001
                -5.0    0.039594  0.0395802 0.0395176
                0.0    0.0350015 0.034812  0.0346882
                5.0    0.029552  0.0308249 0.0306417
                10.0    0.0322154 0.0320326 0.0320512
                </tableData>
            <tableData breakPoint="10.4">
                      39.373565103312565      61.8727451623483      84.37192522138405
                -10.0    0.0355102 0.0350292 0.0353762
                -5.0    0.0262178 0.0262514 0.0262823
                0.0    0.0243983 0.0244024 0.0244089
                5.0    0.0229761 0.0231085 0.0231262
                10.0    0.0226182 0.0226583 0.0226896
                </tableData>
            <tableData breakPoint="12.0">
                      39.373565103312565      61.8727451623483      84.37192522138405
                -10.0    0.0273145 0.0273328 0.0273811
                -5.0    0.0259578 0.0259954 0.0260372
                0.0    0.0243142 0.0243615 0.0244144
                5.0    0.0231479 0.0231846 0.023261
                10.0    0.0219878 0.0220042 0.0220643
                </tableData>
        </table>
    </function>
    <function name="aero/coefficient/CD__dAilR_rad">
        <description>CD__dAilR_rad = dCD__dAilR_rad * dAilR_rad</description>
        <product>
            <property>aero/coefficient/dCD__dAilR_rad</property>
            <property>fcs/posAilR_rad</property>
        </product>
    </function>
    <function name="aero/coefficient/dCD__dRudevL_rad">
        <description>dCD__dRudevL_rad</description>
        <table>
            <independentVar lookup="row">aero/beta-deg</independentVar>
            <independentVar lookup="column">velocities/vt-fps</independentVar>
            <independentVar lookup="table">aero/alpha-deg</independentVar>
            <tableData breakPoint="-4.0">
                      39.373565103312565      61.8727451623483      84.37192522138405
                -10.0    0.0051847 0.0051941 0.0052009
                -5.0    0.0006566 0.0006573 0.0006588
                0.0    -0.0028876 -0.0028928 -0.0029002
                5.0    -0.0062614 -0.0062718 -0.0062873
                10.0    -0.0098166 -0.0098325 -0.0098549
                </tableData>
            <tableData breakPoint="-2.4">
                      39.373565103312565      61.8727451623483      84.37192522138405
                -10.0    0.0067647 0.0067788 0.0067959
                -5.0    0.0019607 0.0019632 0.0022087
                0.0    -0.0011645 -0.0011667 -0.00117
                5.0    -0.0042764 -0.0042844 -0.004295
                10.0    -0.0074997 -0.0075126 -0.0075033
                </tableData>
            <tableData breakPoint="-0.8">
                      39.373565103312565      61.8727451623483      84.37192522138405
                -10.0    0.0095579 0.0095765 0.009603
                -5.0    0.0026531 0.0029811 0.0029881
                0.0    0.0003539 0.0003551 0.000356
                5.0    -0.0021832 -0.002187  -0.0024946
                10.0    -0.0059546 -0.0059669 -0.0060032
                </tableData>
            <tableData breakPoint="0.8">
                      39.373565103312565      61.8727451623483      84.37192522138405
                -10.0    0.012088  0.0120973 0.012145
                -5.0    0.004925  0.0049335 0.0049466
                0.0    0.0036374 0.0036463 0.0036572
                5.0    -0.0003049 -0.0003062 -0.0003054
                10.0    -0.0039722 -0.0039795 -0.003987
                </tableData>
            <tableData breakPoint="2.4">
                      39.373565103312565      61.8727451623483      84.37192522138405
                -10.0    0.0134166 0.0134362 0.0134736
                -5.0    0.0072086 0.007223  0.0072404
                0.0    0.0051791 0.0051898 0.005205
                5.0    0.0014628 0.0014662 0.0014759
                10.0    -0.0019909 -0.0019932 -0.0019992
                </tableData>
            <tableData breakPoint="4.0">
                      39.373565103312565      61.8727451623483      84.37192522138405
                -10.0    0.0153993 0.0154288 0.0154659
                -5.0    0.0096276 0.0096446 0.0096708
                0.0    0.0066803 0.0066933 0.0067133
                5.0    0.003271  0.0032789 0.0032924
                10.0    -0.0001872 -0.0001571 -0.0001503
                </tableData>
            <tableData breakPoint="5.6">
                      39.373565103312565      61.8727451623483      84.37192522138405
                -10.0    0.0174391 0.0174722 0.0175281
                -5.0    0.0123227 0.0123525 0.0123887
                0.0    0.0083891 0.0084013 0.0084312
                5.0    0.0041439 0.0041464 0.0041527
                10.0    -5.35e-05 -5.41e-05 -5.14e-05
                </tableData>
            <tableData breakPoint="7.2">
                      39.373565103312565      61.8727451623483      84.37192522138405
                -10.0    0.0195711 0.0196112 0.0195838
                -5.0    0.0149061 0.0148802 0.0149134
                0.0    0.0091095 0.0091177 0.0091309
                5.0    0.0041379 0.0041399 0.0041364
                10.0    -0.000209  -0.0002098 -0.0002119
                </tableData>
            <tableData breakPoint="8.8">
                      39.373565103312565      61.8727451623483      84.37192522138405
                -10.0    0.019633  0.0196518 0.0196994
                -5.0    0.0162705 0.0163083 0.0163257
                0.0    0.0092188 0.0091615 0.0092367
                5.0    0.0042496 0.005636  0.005628
                10.0    -0.0013896 -0.0015002 -0.0003826
                </tableData>
            <tableData breakPoint="10.4">
                      39.373565103312565      61.8727451623483      84.37192522138405
                -10.0    0.0190437 0.0180761 0.0191216
                -5.0    0.0196035 0.0196296 0.0196692
                0.0    0.0083008 0.008345  0.0083336
                5.0    0.0088151 0.0089054 0.0088997
                10.0    -0.0024569 -0.002445  -0.0024287
                </tableData>
            <tableData breakPoint="12.0">
                      39.373565103312565      61.8727451623483      84.37192522138405
                -10.0    0.0210411 0.021072  0.0211327
                -5.0    0.024721  0.0247669 0.0248213
                0.0    0.0045498 0.0045463 0.0045214
                5.0    0.0147497 0.007958  0.0148345
                10.0    -0.0056386 -0.0056117 -0.0055975
                </tableData>
        </table>
    </function>
    <function name="aero/coefficient/CD__dRudevL_rad">
        <description>CD__dRudevL_rad = dCD__dRudevL_rad * dRudevL_rad</description>
        <product>
            <property>aero/coefficient/dCD__dRudevL_rad</property>
            <property>fcs/posRudevL_rad</property>
        </product>
    </function>
    <function name="aero/coefficient/dCD__dRudevR_rad">
        <description>dCD__dRudevR_rad</description>
        <table>
            <independentVar lookup="row">aero/beta-deg</independentVar>
            <independentVar lookup="column">velocities/vt-fps</independentVar>
            <independentVar lookup="table">aero/alpha-deg</independentVar>
            <tableData breakPoint="-4.0">
                      39.373565103312565      61.8727451623483      84.37192522138405
                -10.0    -0.0098053 -0.0098057 -0.0098305
                -5.0    -0.0062447 -0.0062545 -0.0062718
                0.0    -0.0028939 -0.002899  -0.0029064
                5.0    0.0006697 0.0006703 0.0006717
                10.0    0.0051663 0.0051778 0.0051872
                </tableData>
            <tableData breakPoint="-2.4">
                      39.373565103312565      61.8727451623483      84.37192522138405
                -10.0    -0.007564  -0.0075763 -0.0075938
                -5.0    -0.004286  -0.0042926 -0.0043046
                0.0    -0.0011635 -0.0011657 -0.0011688
                5.0    0.0019662 0.0019695 0.0019734
                10.0    0.0068413 0.006854  0.006872
                </tableData>
            <tableData breakPoint="-0.8">
                      39.373565103312565      61.8727451623483      84.37192522138405
                -10.0    -0.0059483 -0.0059548 -0.0059694
                -5.0    -0.0024984 -0.0021795 -0.0021852
                0.0    0.0003557 0.0003558 0.000357
                5.0    0.002995  0.0029884 0.0026953
                10.0    0.0095683 0.0095848 0.0095888
                </tableData>
            <tableData breakPoint="0.8">
                      39.373565103312565      61.8727451623483      84.37192522138405
                -10.0    -0.0039655 -0.0039858 -0.0039789
                -5.0    -0.0003025 -0.0003008 -0.0003013
                0.0    0.0036338 0.0036417 0.0036554
                5.0    0.0049282 0.0049365 0.0049472
                10.0    0.01209   0.0121122 0.0121423
                </tableData>
            <tableData breakPoint="2.4">
                      39.373565103312565      61.8727451623483      84.37192522138405
                -10.0    -0.0019847 -0.0019909 -0.0020001
                -5.0    0.0014645 0.0014704 0.0019827
                0.0    0.0051792 0.0051898 0.0052052
                5.0    0.0072113 0.0072245 0.0072429
                10.0    0.013419  0.0134428 0.0134785
                </tableData>
            <tableData breakPoint="4.0">
                      39.373565103312565      61.8727451623483      84.37192522138405
                -10.0    -0.0001588 -0.0001507 -0.0001479
                -5.0    0.0032692 0.0032779 0.0032923
                0.0    0.0066819 0.0066922 0.0067167
                5.0    0.009632  0.0096492 0.0096743
                10.0    0.0153845 0.015435  0.0154702
                </tableData>
            <tableData breakPoint="5.6">
                      39.373565103312565      61.8727451623483      84.37192522138405
                -10.0    -4.77e-05 -4.84e-05 -5.04e-05
                -5.0    0.0041441 0.0041493 0.0041521
                0.0    0.008394  0.0084092 0.0084355
                5.0    0.0123362 0.0123542 0.012395
                10.0    0.0174439 0.0174798 0.0175365
                </tableData>
            <tableData breakPoint="7.2">
                      39.373565103312565      61.8727451623483      84.37192522138405
                -10.0    -0.0002161 -0.0002018 -0.0002195
                -5.0    0.0041458 0.00414   0.0041356
                0.0    0.0091044 0.0091116 0.0091248
                5.0    0.0148959 0.0148831 0.0149035
                10.0    0.0195898 0.0196131 0.019661
                </tableData>
            <tableData breakPoint="8.8">
                      39.373565103312565      61.8727451623483      84.37192522138405
                -10.0    -0.0013661 -0.0013705 -0.0013425
                -5.0    0.0056238 0.0056457 0.0056539
                0.0    0.0092063 0.009148  0.0092239
                5.0    0.0149104 0.016309  0.0163069
                10.0    0.0196502 0.0195305 0.0197115
                </tableData>
            <tableData breakPoint="10.4">
                      39.373565103312565      61.8727451623483      84.37192522138405
                -10.0    -0.0024633 -0.0034553 -0.002412
                -5.0    0.0088467 0.0088595 0.0088957
                0.0    0.0082526 0.008295  0.0082787
                5.0    0.0195682 0.0196613 0.0196807
                10.0    0.0190578 0.0190803 0.0190921
                </tableData>
            <tableData breakPoint="12.0">
                      39.373565103312565      61.8727451623483      84.37192522138405
                -10.0    -0.0056379 -0.0056779 -0.0056182
                -5.0    0.0147368 0.0147437 0.0148096
                0.0    0.004425  0.0044393 0.0044118
                5.0    0.0247142 0.0247545 0.0247731
                10.0    0.0210692 0.0210949 0.0211206
                </tableData>
        </table>
    </function>
    <function name="aero/coefficient/CD__dRudevR_rad">
        <description>CD__dRudevR_rad = dCD__dRudevR_rad * dRudevR_rad</description>
        <product>
            <property>aero/coefficient/dCD__dRudevR_rad</property>
            <property>fcs/posRudevR_rad</property>
        </product>
    </function>
    <function name="aero/coefficient/CD">
        <description>CD summation</description>
        <sum>
            <property>aero/coefficient/CD__zero</property>
            <property>aero/coefficient/CD__alpha_rad</property>
            <property>aero/coefficient/CD__beta_rad</property>
            <property>aero/coefficient/CD__dpHat_rps</property>
            <property>aero/coefficient/CD__dqHat_rps</property>
            <property>aero/coefficient/CD__drHat_rps</property>
            <property>aero/coefficient/CD__dAilL_rad</property>
            <property>aero/coefficient/CD__dAilR_rad</property>
            <property>aero/coefficient/CD__dRudevL_rad</property>
            <property>aero/coefficient/CD__dRudevR_rad</property>
        </sum>
    </function>
    <function name="aero/coefficient/CY__zero">
        <description>CY__zero</description>
        <table>
            <independentVar lookup="row">aero/beta-deg</independentVar>
            <independentVar lookup="column">velocities/vt-fps</independentVar>
            <independentVar lookup="table">aero/alpha-deg</independentVar>
            <tableData breakPoint="-4.0">
                      39.373565103312565      61.8727451623483      84.37192522138405
                -10.0    -0.00412332 -0.00464904 -0.00544164
                -5.0    0.00060764 0.00057342 0.0005255
                0.0    1.07099302e-05 1.07238928e-05 1.08844631e-05
                5.0    0.00063052 0.00071404 0.00082832
                10.0    0.00671248 0.00743655 0.00646166
                </tableData>
            <tableData breakPoint="-2.4">
                      39.373565103312565      61.8727451623483      84.37192522138405
                -10.0    -0.0047413  -0.00529581 -0.00598122
                -5.0     9.34321378e-06 -3.59480178e-05 -9.84184866e-05
                0.0    2.77463154e-07 2.77463154e-07 3.19351056e-07
                5.0    0.00060625 0.00069154 0.00081169
                10.0    0.0057667 0.0064878 0.0057737
                </tableData>
            <tableData breakPoint="-0.8">
                      39.373565103312565      61.8727451623483      84.37192522138405
                -10.0    -0.00306262 -0.00356916 -0.00429167
                -5.0    0.00030735 0.00025227 0.00018513
                0.0    2.58112098e-07 2.73470995e-07 2.80452312e-07
                5.0    0.00022624 0.00030823 0.00042469
                10.0    0.00497852 0.00570066 0.00497155
                </tableData>
            <tableData breakPoint="0.8">
                      39.373565103312565      61.8727451623483      84.37192522138405
                -10.0    -0.00225969 -0.00278197 -0.00354876
                -5.0    0.00095246 0.00090277 0.00082736
                0.0    4.94414946e-07 3.41356937e-07 3.23205513e-07
                5.0    -1.76106188e-04 -8.46555262e-05  5.00759535e-05
                10.0    0.00394306 0.00467539 0.00369179
                </tableData>
            <tableData breakPoint="2.4">
                      39.373565103312565      61.8727451623483      84.37192522138405
                -10.0     0.00030498 -0.0001932  -0.00092124
                -5.0    0.00173953 0.00168638 0.00160319
                0.0    -8.69615936e-08  6.80236440e-08  4.70796930e-08
                5.0    -0.00128801 -0.00119636 -0.00105749
                10.0    0.00100221 0.00151532 0.00038332
                </tableData>
            <tableData breakPoint="4.0">
                      39.373565103312565      61.8727451623483      84.37192522138405
                -10.0    -0.00230296 -0.00284155 -0.00364274
                -5.0    0.00327071 0.00326284 0.00320993
                0.0    -5.84758961e-07 -5.89478716e-07 -5.75516082e-07
                5.0    -0.00404019 -0.00401414 -0.00400344
                10.0    0.00537188 0.0055521  0.00443193
                </tableData>
            <tableData breakPoint="5.6">
                      39.373565103312565      61.8727451623483      84.37192522138405
                -10.0    -0.00856271 -0.00914391 -0.00984441
                -5.0    -0.00662832 -0.00667324 -0.00691545
                0.0    -4.37860325e-06 -1.45396239e-06 -9.84817890e-07
                5.0    0.00682353 0.0068992  0.00724983
                10.0    0.00844886 0.0082247  0.00722018
                </tableData>
            <tableData breakPoint="7.2">
                      39.373565103312565      61.8727451623483      84.37192522138405
                -10.0    -0.01073065 -0.01149071 -0.01235987
                -5.0    -0.00760221 -0.0074426  -0.00722828
                0.0    1.74601776e-06 1.67061954e-06 1.90938058e-06
                5.0    0.00796668 0.00784457 0.00769481
                10.0    0.01311335 0.0125488  0.01151625
                </tableData>
            <tableData breakPoint="8.8">
                      39.373565103312565      61.8727451623483      84.37192522138405
                -10.0    -0.0178479  -0.01853745 -0.01954351
                -5.0    -0.00061548 -0.00069023 -0.00081715
                0.0    -1.29297899e-06  1.17869610e-05 -2.02162945e-07
                5.0    0.00101594 0.00123603 0.00141744
                10.0    0.01639904 0.01560428 0.01372923
                </tableData>
            <tableData breakPoint="10.4">
                      39.373565103312565      61.8727451623483      84.37192522138405
                -10.0    -0.000683   -0.00124514 -0.00208034
                -5.0    0.00265265 0.00259495 0.00248157
                0.0    -5.83874059e-06  5.72371663e-06 -5.22159217e-06
                5.0    -0.00125039 -0.00115429 -0.00096245
                10.0     0.00015476 -0.00089896 -0.00298076
                </tableData>
            <tableData breakPoint="12.0">
                      39.373565103312565      61.8727451623483      84.37192522138405
                -10.0    0.00449827 0.00387027 0.003722
                -5.0    0.00462357 0.0045722  0.00447081
                0.0    2.52831841e-05 2.55297918e-05 2.54041281e-05
                5.0    -0.00429632 -0.00422473 -0.00406208
                10.0    -0.003683   -0.00446121 -0.00813759
                </tableData>
        </table>
    </function>
    <function name="aero/coefficient/dCY__alpha_rad">
        <description>dCY__alpha_rad</description>
        <table>
            <independentVar lookup="row">aero/beta-deg</independentVar>
            <independentVar lookup="column">velocities/vt-fps</independentVar>
            <independentVar lookup="table">aero/alpha-deg</independentVar>
            <tableData breakPoint="-4.0">
                      39.373565103312565      61.8727451623483      84.37192522138405
                -10.0    -0.0129533 -0.0130451 -0.0135444
                -5.0    -0.0073471 -0.0073639 -0.0072892
                0.0    0.0001663 0.0001665 0.0001688
                5.0    0.0071751 0.0071897 0.0071114
                10.0    0.0130483 0.013142  0.0136379
                </tableData>
            <tableData breakPoint="-2.4">
                      39.373565103312565      61.8727451623483      84.37192522138405
                -10.0    -0.0297054 -0.0297134 -0.0288326
                -5.0    -0.0133553 -0.0133707 -0.0132852
                0.0    -7.7e-06 -7.7e-06 -6.7e-06
                5.0    0.0133822 0.0133933 0.0133061
                10.0    0.0296906 0.0296806 0.0287928
                </tableData>
            <tableData breakPoint="-0.8">
                      39.373565103312565      61.8727451623483      84.37192522138405
                -10.0    -0.0433774 -0.0431729 -0.0426527
                -5.0    -0.0205753 -0.0206329 -0.0204499
                0.0    -3.0e-06 -1.9e-06 -1.4e-06
                5.0    0.0206713 0.0206193 0.0204423
                10.0    0.0435068 0.043309  0.0426574
                </tableData>
            <tableData breakPoint="0.8">
                      39.373565103312565      61.8727451623483      84.37192522138405
                -10.0    -0.0564251 -0.0561954 -0.0556916
                -5.0    -0.0252138 -0.0251407 -0.0249186
                0.0    4.0e-07 4.2e-06 5.5e-06
                5.0    0.0252192 0.0251449 0.024917
                10.0    0.0564317 0.0562381 0.0556985
                </tableData>
            <tableData breakPoint="2.4">
                      39.373565103312565      61.8727451623483      84.37192522138405
                -10.0    -0.071493  -0.0720574 -0.0722329
                -5.0    -0.0302895 -0.0302799 -0.030164
                0.0    1.64e-05 1.27e-05 1.32e-05
                5.0    0.0303124 0.0303003 0.0301858
                10.0    0.0714968 0.0720672 0.0722441
                </tableData>
            <tableData breakPoint="4.0">
                      39.373565103312565      61.8727451623483      84.37192522138405
                -10.0    -0.000973  -0.0008052 -0.000195
                -5.0    -0.0463254 -0.0471145 -0.0481631
                0.0    2.27e-05 2.42e-05 2.40e-05
                5.0    0.0463634 0.0471492 0.0482
                10.0    0.0010066 0.0008371 0.0002364
                </tableData>
            <tableData breakPoint="5.6">
                      39.373565103312565      61.8727451623483      84.37192522138405
                -10.0    0.0376838 0.0385716 0.0400288
                -5.0    0.0679669 0.0677971 0.0693228
                0.0    5.81e-05 2.92e-05 2.44e-05
                5.0    -0.0679341 -0.0677494 -0.0692739
                10.0    -0.0376612 -0.0385489 -0.0400071
                </tableData>
            <tableData breakPoint="7.2">
                      39.373565103312565      61.8727451623483      84.37192522138405
                -10.0    0.0846056 0.0864085 0.0890498
                -5.0    0.080534  0.0787853 0.0763923
                0.0    6.0e-06 6.6e-06 4.7e-06
                5.0    -0.0804816 -0.0787421 -0.0763546
                10.0    -0.0845247 -0.0863239 -0.0889664
                </tableData>
            <tableData breakPoint="8.8">
                      39.373565103312565      61.8727451623483      84.37192522138405
                -10.0    0.1346755 0.1354063 0.1367335
                -5.0    0.0065503 0.006477  0.0064762
                0.0     2.73e-05 -5.07e-05  2.15e-05
                5.0    -0.0060613 -0.0064229 -0.0064331
                10.0    -0.1346666 -0.1353676 -0.1367234
                </tableData>
            <tableData breakPoint="10.4">
                      39.373565103312565      61.8727451623483      84.37192522138405
                -10.0    -0.0146419 -0.0142361 -0.0146029
                -5.0    -0.0100763 -0.0100118 -0.0097822
                0.0     5.20e-05 -1.17e-05  4.86e-05
                5.0    0.0101222 0.0101166 0.0098737
                10.0    0.0148148 0.0149787 0.0147841
                </tableData>
            <tableData breakPoint="12.0">
                      39.373565103312565      61.8727451623483      84.37192522138405
                -10.0    -0.0355204 -0.0351934 -0.0372247
                -5.0    -0.0207954 -0.0208681 -0.0208383
                0.0    -9.78e-05 -9.85e-05 -9.79e-05
                5.0    0.0207849 0.0209275 0.0208654
                10.0    0.0364014 0.0358616 0.037878
                </tableData>
        </table>
    </function>
    <function name="aero/coefficient/CY__alpha_rad">
        <description>CY__alpha_rad = dCY__alpha_rad * alpha_rad</description>
        <product>
            <property>aero/coefficient/dCY__alpha_rad</property>
            <property>aero/alpha-rad</property>
        </product>
    </function>
    <function name="aero/coefficient/dCY__beta_rad">
        <description>dCY__beta_rad</description>
        <table>
            <independentVar lookup="row">aero/beta-deg</independentVar>
            <independentVar lookup="column">velocities/vt-fps</independentVar>
            <independentVar lookup="table">aero/alpha-deg</independentVar>
            <tableData breakPoint="-4.0">
                      39.373565103312565      61.8727451623483      84.37192522138405
                -10.0    -0.2614527 -0.2661562 -0.272628
                -5.0    -0.2226759 -0.2235404 -0.2244885
                0.0    -0.2135094 -0.2137435 -0.2118834
                5.0    -0.2369708 -0.2384009 -0.2401112
                10.0    -0.2762558 -0.282095  -0.2784406
                </tableData>
            <tableData breakPoint="-2.4">
                      39.373565103312565      61.8727451623483      84.37192522138405
                -10.0    -0.2598639 -0.2647505 -0.2709763
                -5.0    -0.2262591 -0.2272497 -0.228371
                0.0    -0.212093  -0.2123074 -0.2104305
                5.0    -0.2333015 -0.2347537 -0.2365367
                10.0    -0.2657328 -0.2715765 -0.2697848
                </tableData>
            <tableData breakPoint="-0.8">
                      39.373565103312565      61.8727451623483      84.37192522138405
                -10.0    -0.2487637 -0.2534006 -0.2597689
                -5.0    -0.2214845 -0.2226152 -0.2238218
                0.0    -0.2087016 -0.208937  -0.2070474
                5.0    -0.2275962 -0.2290311 -0.230803
                10.0    -0.259745  -0.2656178 -0.2636668
                </tableData>
            <tableData breakPoint="0.8">
                      39.373565103312565      61.8727451623483      84.37192522138405
                -10.0    -0.2447729 -0.2494951 -0.2561251
                -5.0    -0.2145428 -0.2156093 -0.2169123
                0.0    -0.2020898 -0.2023183 -0.2004564
                5.0    -0.223432  -0.2249757 -0.2269587
                10.0    -0.2544196 -0.260351  -0.2569457
                </tableData>
            <tableData breakPoint="2.4">
                      39.373565103312565      61.8727451623483      84.37192522138405
                -10.0    -0.2331475 -0.2379123 -0.2444623
                -5.0    -0.2076288 -0.2087592 -0.2101978
                0.0    -0.1917086 -0.1919379 -0.1900687
                5.0    -0.2128001 -0.2143716 -0.2164477
                10.0    -0.2406386 -0.245491  -0.2413841
                </tableData>
            <tableData breakPoint="4.0">
                      39.373565103312565      61.8727451623483      84.37192522138405
                -10.0    -0.2194966 -0.2242234 -0.2308771
                -5.0    -0.2023906 -0.2035991 -0.2055554
                0.0    -0.1808947 -0.1810744 -0.1791307
                5.0    -0.1935828 -0.1949958 -0.1964713
                10.0    -0.2370914 -0.2397659 -0.2354148
                </tableData>
            <tableData breakPoint="5.6">
                      39.373565103312565      61.8727451623483      84.37192522138405
                -10.0    -0.2361907 -0.2407224 -0.2462782
                -5.0    -0.1966316 -0.1977972 -0.1993681
                0.0    -0.1745178 -0.17464   -0.1727749
                5.0    -0.1988732 -0.2004078 -0.2032225
                10.0    -0.2355459 -0.2354638 -0.2312489
                </tableData>
            <tableData breakPoint="7.2">
                      39.373565103312565      61.8727451623483      84.37192522138405
                -10.0    -0.2155547 -0.2203928 -0.2259771
                -5.0    -0.1936392 -0.1950056 -0.1968734
                0.0    -0.226286  -0.2261246 -0.2237274
                5.0    -0.1978454 -0.1996259 -0.2022244
                10.0    -0.2292545 -0.2265075 -0.2211944
                </tableData>
            <tableData breakPoint="8.8">
                      39.373565103312565      61.8727451623483      84.37192522138405
                -10.0    -0.2140612 -0.2193548 -0.2267747
                -5.0    -0.2322614 -0.2336205 -0.2355633
                0.0    -0.2222593 -0.22183   -0.2189817
                5.0    -0.237727  -0.2399059 -0.2424481
                10.0    -0.2057459 -0.202563  -0.1934479
                </tableData>
            <tableData breakPoint="10.4">
                      39.373565103312565      61.8727451623483      84.37192522138405
                -10.0    -0.2652824 -0.2698167 -0.2776294
                -5.0    -0.2271863 -0.2280021 -0.2292305
                0.0    -0.2256331 -0.225218  -0.2225091
                5.0    -0.2432565 -0.2446463 -0.2467473
                10.0    -0.2624345 -0.2583598 -0.2488176
                </tableData>
            <tableData breakPoint="12.0">
                      39.373565103312565      61.8727451623483      84.37192522138405
                -10.0    -0.2591368 -0.2641176 -0.2698621
                -5.0    -0.2288016 -0.2298616 -0.2314102
                0.0    -0.2188787 -0.2184622 -0.2158084
                5.0    -0.2324267 -0.2338838 -0.2360581
                10.0    -0.2648961 -0.261564  -0.2453758
                </tableData>
        </table>
    </function>
    <function name="aero/coefficient/CY__beta_rad">
        <description>CY__beta_rad = dCY__beta_rad * beta_rad</description>
        <product>
            <property>aero/coefficient/dCY__beta_rad</property>
            <property>aero/beta-rad</property>
        </product>
    </function>
    <function name="aero/coefficient/dCY__dpHat_rps">
        <description>dCY__dpHat_rps</description>
        <table>
            <independentVar lookup="row">aero/beta-deg</independentVar>
            <independentVar lookup="column">velocities/vt-fps</independentVar>
            <independentVar lookup="table">aero/alpha-deg</independentVar>
            <tableData breakPoint="-4.0">
                      39.373565103312565      61.8727451623483      84.37192522138405
                -10.0    -0.06303   -0.0644179 -0.0664035
                -5.0    -0.0621707 -0.0632289 -0.0647243
                0.0    -0.0630203 -0.064     -0.0653562
                5.0    -0.0666613 -0.0677321 -0.0692477
                10.0    -0.0722171 -0.0736182 -0.0754425
                </tableData>
            <tableData breakPoint="-2.4">
                      39.373565103312565      61.8727451623483      84.37192522138405
                -10.0    -0.0446034 -0.0454381 -0.0464759
                -5.0    -0.0443458 -0.0448722 -0.0455995
                0.0    -0.044282  -0.0447396 -0.0453421
                5.0    -0.0498837 -0.0504801 -0.0513165
                10.0    -0.0556533 -0.0566473 -0.0580389
                </tableData>
            <tableData breakPoint="-0.8">
                      39.373565103312565      61.8727451623483      84.37192522138405
                -10.0    -0.0299813 -0.0306473 -0.0315817
                -5.0    -0.0292649 -0.0296496 -0.0301401
                0.0    -0.029434  -0.0297164 -0.0300665
                5.0    -0.0340826 -0.0345265 -0.0351412
                10.0    -0.0403874 -0.0412217 -0.0423824
                </tableData>
            <tableData breakPoint="0.8">
                      39.373565103312565      61.8727451623483      84.37192522138405
                -10.0    -0.0183906 -0.0192041 -0.0203794
                -5.0    -0.0155295 -0.0161861 -0.0168622
                0.0    -0.0167734 -0.0171009 -0.0170712
                5.0    -0.0199919 -0.0203927 -0.021017
                10.0    -0.0269595 -0.0276467 -0.0285944
                </tableData>
            <tableData breakPoint="2.4">
                      39.373565103312565      61.8727451623483      84.37192522138405
                -10.0    -0.0088702 -0.0100378 -0.0116204
                -5.0    -0.0045307 -0.0052189 -0.0061869
                0.0    -0.0049768 -0.0052904 -0.0056534
                5.0    -0.0103251 -0.0107414 -0.0112932
                10.0    -0.0181251 -0.0188001 -0.0197746
                </tableData>
            <tableData breakPoint="4.0">
                      39.373565103312565      61.8727451623483      84.37192522138405
                -10.0    2.3266e-03 1.3607e-03 6.8100e-05
                -5.0    0.0064999 0.0058762 0.0050722
                0.0    0.0040539 0.0036543 0.0032025
                5.0    -0.001998  -0.002585  -0.0033602
                10.0    -0.0121411 -0.0131342 -0.0144564
                </tableData>
            <tableData breakPoint="5.6">
                      39.373565103312565      61.8727451623483      84.37192522138405
                -10.0    0.0185196 0.0179768 0.0172962
                -5.0    0.0177126 0.0172795 0.0168119
                0.0    0.0098923 0.0095016 0.0090992
                5.0    0.0075343 0.0066527 0.0054806
                10.0    -0.0029511 -0.0043082 -0.0060623
                </tableData>
            <tableData breakPoint="7.2">
                      39.373565103312565      61.8727451623483      84.37192522138405
                -10.0    0.0232265 0.0223945 0.0213599
                -5.0    0.0204091 0.0196571 0.0187588
                0.0    0.0185137 0.0179213 0.0172663
                5.0    0.0072207 0.0063385 0.0052528
                10.0    -0.0027625 -0.0041341 -0.0058877
                </tableData>
            <tableData breakPoint="8.8">
                      39.373565103312565      61.8727451623483      84.37192522138405
                -10.0    0.0100592 0.0086479 0.0068798
                -5.0    0.0099681 0.0088905 0.0075699
                0.0    0.0046948 0.0039154 0.0030224
                5.0     0.0005189  0.0004673 -0.0005268
                10.0    -0.0124714 -0.0134332 -0.0138483
                </tableData>
            <tableData breakPoint="10.4">
                      39.373565103312565      61.8727451623483      84.37192522138405
                -10.0    -0.0112572 -0.0126684 -0.0147115
                -5.0    -0.0140497 -0.0151109 -0.0163446
                0.0    -0.0120772 -0.0129107 -0.0138048
                5.0    -0.0092667 -0.0105283 -0.0118265
                10.0    -0.0081577 -0.0092963 -0.0091109
                </tableData>
            <tableData breakPoint="12.0">
                      39.373565103312565      61.8727451623483      84.37192522138405
                -10.0    -0.0331353 -0.0340399 -0.0351392
                -5.0    -0.029713  -0.0306292 -0.0315869
                0.0    -0.0271178 -0.0278652 -0.0285695
                5.0    -0.0248231 -0.0259212 -0.0271161
                10.0    -0.0211796 -0.0230686 -0.0219052
                </tableData>
        </table>
    </function>
    <function name="aero/coefficient/CY__dpHat_rps">
        <description>CY__dpHat_rps = dCY__dpHat_rps * dpHat_rps</description>
        <product>
            <property>aero/coefficient/dCY__dpHat_rps</property>
            <property>velocities/p-aero-rad_sec</property>
            <property>aero/bi2vel</property>
        </product>
    </function>
    <function name="aero/coefficient/dCY__dqHat_rps">
        <description>dCY__dqHat_rps</description>
        <table>
            <independentVar lookup="row">aero/beta-deg</independentVar>
            <independentVar lookup="column">velocities/vt-fps</independentVar>
            <independentVar lookup="table">aero/alpha-deg</independentVar>
            <tableData breakPoint="-4.0">
                      39.373565103312565      61.8727451623483      84.37192522138405
                -10.0    -0.0660749 -0.0650398 -0.0638182
                -5.0    -0.0315872 -0.0315939 -0.0311656
                0.0    0.0001482 0.0001488 0.0001506
                5.0    0.0310899 0.0310946 0.0306609
                10.0    0.0661487 0.0651122 0.0638776
                </tableData>
            <tableData breakPoint="-2.4">
                      39.373565103312565      61.8727451623483      84.37192522138405
                -10.0    -0.0778619 -0.0768311 -0.0743064
                -5.0    -0.0373261 -0.0372935 -0.0368017
                0.0    -3.89e-05 -5.06e-05 -5.04e-05
                5.0    0.0373702 0.0373363 0.0368134
                10.0    0.0789335 0.0778828 0.0766885
                </tableData>
            <tableData breakPoint="-0.8">
                      39.373565103312565      61.8727451623483      84.37192522138405
                -10.0    -0.0890077 -0.0877197 -0.0849224
                -5.0    -0.0432877 -0.0433099 -0.0425947
                0.0     9.60e-06 -1.84e-05 -1.42e-05
                5.0    0.0432819 0.0430931 0.0423835
                10.0    0.0888354 0.0875578 0.0844692
                </tableData>
            <tableData breakPoint="0.8">
                      39.373565103312565      61.8727451623483      84.37192522138405
                -10.0    -0.1035465 -0.1022289 -0.099569
                -5.0    -0.0502842 -0.0500758 -0.0493483
                0.0    -1.94e-05  1.00e-06  4.77e-05
                5.0    0.0502401 0.0501053 0.049279
                10.0    0.1034825 0.102228  0.0994958
                </tableData>
            <tableData breakPoint="2.4">
                      39.373565103312565      61.8727451623483      84.37192522138405
                -10.0    -0.1133501 -0.1126033 -0.1103818
                -5.0    -0.0556882 -0.0555106 -0.0548192
                0.0    -2.475e-04 -2.140e-05 -1.600e-05
                5.0    0.0556389 0.0554669 0.0547724
                10.0    0.1132897 0.1125578 0.1103351
                </tableData>
            <tableData breakPoint="4.0">
                      39.373565103312565      61.8727451623483      84.37192522138405
                -10.0    -0.0349974 -0.0333514 -0.0298162
                -5.0    -0.0565989 -0.0570143 -0.0570736
                0.0    -1.26e-05 -1.62e-05 -1.87e-05
                5.0    0.0565751 0.0529915 0.05706
                10.0    0.0349272 0.0333036 0.0297792
                </tableData>
            <tableData breakPoint="5.6">
                      39.373565103312565      61.8727451623483      84.37192522138405
                -10.0    0.0325386 0.0353157 0.03945
                -5.0    0.0914526 0.0915005 0.0919762
                0.0    -1.59e-05 -2.00e-05 -2.82e-05
                5.0    -0.0914176 -0.0914619 -0.0919416
                10.0    -0.0326253 -0.0353936 -0.0395588
                </tableData>
            <tableData breakPoint="7.2">
                      39.373565103312565      61.8727451623483      84.37192522138405
                -10.0    0.0735883 0.0757758 0.0811819
                -5.0    0.1242261 0.1246274 0.1258121
                0.0    8.5e-06 5.4e-06 6.0e-06
                5.0    -0.1242105 -0.124633  -0.1258309
                10.0    -0.0736292 -0.0757861 -0.0812074
                </tableData>
            <tableData breakPoint="8.8">
                      39.373565103312565      61.8727451623483      84.37192522138405
                -10.0    0.1240161 0.1256833 0.1290893
                -5.0    0.0034723 0.0044665 0.0063245
                0.0     4.020e-05 -1.032e-04  1.300e-05
                5.0    -0.0026377 -0.0044389 -0.0063559
                10.0    -0.1243124 -0.1258359 -0.1292719
                </tableData>
            <tableData breakPoint="10.4">
                      39.373565103312565      61.8727451623483      84.37192522138405
                -10.0    -0.0146006 -0.0133232 -0.0177962
                -5.0    -0.0218261 -0.0216372 -0.0209081
                0.0    8.99e-05 8.71e-05 9.04e-05
                5.0    0.0206463 0.0205882 0.0198596
                10.0    0.0146686 0.0145752 0.017857
                </tableData>
            <tableData breakPoint="12.0">
                      39.373565103312565      61.8727451623483      84.37192522138405
                -10.0    -0.0466634 -0.045465  -0.0531485
                -5.0    -0.0277253 -0.0275805 -0.026808
                0.0    -0.0002208 -0.0002313 -0.0002289
                5.0    0.0278453 0.0276669 0.0269096
                10.0    0.0460502 0.0451658 0.0528316
                </tableData>
        </table>
    </function>
    <function name="aero/coefficient/CY__dqHat_rps">
        <description>CY__dqHat_rps = dCY__dqHat_rps * dqHat_rps</description>
        <product>
            <property>aero/coefficient/dCY__dqHat_rps</property>
            <property>velocities/q-aero-rad_sec</property>
            <property>aero/ci2vel</property>
        </product>
    </function>
    <function name="aero/coefficient/dCY__drHat_rps">
        <description>dCY__drHat_rps</description>
        <table>
            <independentVar lookup="row">aero/beta-deg</independentVar>
            <independentVar lookup="column">velocities/vt-fps</independentVar>
            <independentVar lookup="table">aero/alpha-deg</independentVar>
            <tableData breakPoint="-4.0">
                      39.373565103312565      61.8727451623483      84.37192522138405
                -10.0    0.1277395 0.1275574 0.1258301
                -5.0    0.1145584 0.1150708 0.1156659
                0.0    0.1111453 0.1113375 0.1098
                5.0    0.1129813 0.1124088 0.1169987
                10.0    0.1256652 0.1272733 0.1294343
                </tableData>
            <tableData breakPoint="-2.4">
                      39.373565103312565      61.8727451623483      84.37192522138405
                -10.0    0.1277661 0.1276045 0.1258568
                -5.0    0.1149549 0.1155451 0.1162182
                0.0    0.1115944 0.1118125 0.1103009
                5.0    0.1151305 0.1146772 0.1188699
                10.0    0.1255877 0.127199  0.1292415
                </tableData>
            <tableData breakPoint="-0.8">
                      39.373565103312565      61.8727451623483      84.37192522138405
                -10.0    0.1278626 0.1277282 0.1254192
                -5.0    0.1157876 0.1163547 0.1170938
                0.0    0.1127171 0.1129539 0.1114531
                5.0    0.1154683 0.114992  0.1192151
                10.0    0.1257523 0.1273814 0.1295699
                </tableData>
            <tableData breakPoint="0.8">
                      39.373565103312565      61.8727451623483      84.37192522138405
                -10.0    0.1278414 0.1277487 0.1248854
                -5.0    0.116057  0.1166852 0.1174881
                0.0    0.1137884 0.1140625 0.112599
                5.0    0.1155242 0.1150334 0.1192974
                10.0    0.1259391 0.1275911 0.1298787
                </tableData>
            <tableData breakPoint="2.4">
                      39.373565103312565      61.8727451623483      84.37192522138405
                -10.0    0.1276605 0.1275566 0.1240248
                -5.0    0.1168209 0.1175162 0.1184383
                0.0    0.1146404 0.1149706 0.113553
                5.0    0.1158999 0.1154249 0.1197733
                10.0    0.1264905 0.1282126 0.1305822
                </tableData>
            <tableData breakPoint="4.0">
                      39.373565103312565      61.8727451623483      84.37192522138405
                -10.0    0.126917  0.1264626 0.1224365
                -5.0    0.1175897 0.1182392 0.1190422
                0.0    0.1153817 0.115729  0.1143397
                5.0    0.1166452 0.1161707 0.1204797
                10.0    0.1266175 0.1283847 0.1308712
                </tableData>
            <tableData breakPoint="5.6">
                      39.373565103312565      61.8727451623483      84.37192522138405
                -10.0    0.1277084 0.126569  0.1225581
                -5.0    0.1164686 0.1171764 0.1181541
                0.0    0.1156421 0.1157684 0.1142032
                5.0    0.1152968 0.114758  0.1191246
                10.0    0.1278593 0.1293861 0.1315944
                </tableData>
            <tableData breakPoint="7.2">
                      39.373565103312565      61.8727451623483      84.37192522138405
                -10.0    0.1274272 0.1254316 0.1213737
                -5.0    0.1174622 0.1178956 0.1188671
                0.0    0.1158713 0.1161914 0.1147409
                5.0    0.1159547 0.1153351 0.1196297
                10.0    0.1279974 0.1295329 0.1317279
                </tableData>
            <tableData breakPoint="8.8">
                      39.373565103312565      61.8727451623483      84.37192522138405
                -10.0    0.1343156 0.1314869 0.1274806
                -5.0    0.1258761 0.1266986 0.1278679
                0.0    0.1241454 0.124609  0.1234022
                5.0    0.120976  0.1203931 0.1248023
                10.0    0.1335855 0.1354836 0.1381655
                </tableData>
            <tableData breakPoint="10.4">
                      39.373565103312565      61.8727451623483      84.37192522138405
                -10.0    0.1395221 0.1365948 0.1321704
                -5.0    0.1377355 0.1385969 0.1398376
                0.0    0.140367  0.1407531 0.1393633
                5.0    0.1392117 0.1388751 0.1427146
                10.0    0.1483926 0.1504367 0.1533571
                </tableData>
            <tableData breakPoint="12.0">
                      39.373565103312565      61.8727451623483      84.37192522138405
                -10.0    0.1492596 0.1461714 0.142255
                -5.0    0.1463841 0.1471151 0.1482065
                0.0    0.1432605 0.1435938 0.1421115
                5.0    0.1419598 0.1418788 0.1454739
                10.0    0.154956  0.1568535 0.1592202
                </tableData>
        </table>
    </function>
    <function name="aero/coefficient/CY__drHat_rps">
        <description>CY__drHat_rps = dCY__drHat_rps * drHat_rps</description>
        <product>
            <property>aero/coefficient/dCY__drHat_rps</property>
            <property>velocities/r-aero-rad_sec</property>
            <property>aero/bi2vel</property>
        </product>
    </function>
    <function name="aero/coefficient/dCY__dAilL_rad">
        <description>dCY__dAilL_rad</description>
        <table>
            <independentVar lookup="row">aero/beta-deg</independentVar>
            <independentVar lookup="column">velocities/vt-fps</independentVar>
            <independentVar lookup="table">aero/alpha-deg</independentVar>
            <tableData breakPoint="-4.0">
                      39.373565103312565      61.8727451623483      84.37192522138405
                -10.0    0.0023556 0.0025103 0.0020947
                -5.0    0.0034265 0.0034946 0.0035901
                0.0    0.0043105 0.0043614 0.0044284
                5.0    0.0065127 0.0065927 0.0067003
                10.0    0.0081398 0.0082914 0.0084984
                </tableData>
            <tableData breakPoint="-2.4">
                      39.373565103312565      61.8727451623483      84.37192522138405
                -10.0    0.0033491 0.0034675 0.0036338
                -5.0    0.0047256 0.0047619 0.0048076
                0.0    0.0063469 0.0063644 0.006204
                5.0    0.0089079 0.008953  0.0090112
                10.0    0.0109814 0.0110904 0.0112512
                </tableData>
            <tableData breakPoint="-0.8">
                      39.373565103312565      61.8727451623483      84.37192522138405
                -10.0    0.0047841 0.0049074 0.0051034
                -5.0    0.0066603 0.0065964 0.0067579
                0.0    0.0087843 0.0087981 0.008816
                5.0    0.0117133 0.011746  0.011762
                10.0    0.0138746 0.013985  0.0139881
                </tableData>
            <tableData breakPoint="0.8">
                      39.373565103312565      61.8727451623483      84.37192522138405
                -10.0    0.0061436 0.0063581 0.0065232
                -5.0    0.0084874 0.0085536 0.0086455
                0.0    0.0115433 0.0115886 0.0116408
                5.0    0.0146487 0.0147102 0.0147987
                10.0    0.0174287 0.0175585 0.0177431
                </tableData>
            <tableData breakPoint="2.4">
                      39.373565103312565      61.8727451623483      84.37192522138405
                -10.0    0.0079864 0.0080109 0.0081506
                -5.0    0.0107156 0.0108093 0.0109359
                0.0    0.0140103 0.0140781 0.0141684
                5.0    0.0176448 0.0177441 0.0178785
                10.0    0.0211014 0.0212741 0.0215252
                </tableData>
            <tableData breakPoint="4.0">
                      39.373565103312565      61.8727451623483      84.37192522138405
                -10.0    0.009393  0.0095079 0.0094487
                -5.0    0.0131939 0.0132992 0.0130614
                0.0    0.016297  0.0163636 0.0164762
                5.0    0.020488  0.0206201 0.0208146
                10.0    0.0246186 0.0248501 0.0251823
                </tableData>
            <tableData breakPoint="5.6">
                      39.373565103312565      61.8727451623483      84.37192522138405
                -10.0    0.0145621 0.0147236 0.015021
                -5.0    0.0177845 0.0178642 0.0179871
                0.0    0.0190163 0.0190697 0.0191328
                5.0    0.0198758 0.0200189 0.020225
                10.0    0.0238185 0.0240578 0.0234715
                </tableData>
            <tableData breakPoint="7.2">
                      39.373565103312565      61.8727451623483      84.37192522138405
                -10.0    0.017613  0.0177903 0.0178312
                -5.0    0.0216346 0.0217093 0.0218457
                0.0    0.0211142 0.0211813 0.0212436
                5.0    0.0223551 0.0224668 0.0226144
                10.0    0.0255993 0.0258469 0.025994
                </tableData>
            <tableData breakPoint="8.8">
                      39.373565103312565      61.8727451623483      84.37192522138405
                -10.0    0.0274132 0.0277817 0.0282838
                -5.0    0.0270817 0.027362  0.0277372
                0.0    0.0283657 0.0285371 0.0289147
                5.0    0.030007 0.029787 0.030021
                10.0    0.0287428 0.0289678 0.0292483
                </tableData>
            <tableData breakPoint="10.4">
                      39.373565103312565      61.8727451623483      84.37192522138405
                -10.0    0.0372444 0.036252  0.035882
                -5.0    0.037624  0.0378072 0.0378789
                0.0    0.0403853 0.0404026 0.0404174
                5.0    0.043974  0.0440823 0.0441485
                10.0    0.0354715 0.0393867 0.0397685
                </tableData>
            <tableData breakPoint="12.0">
                      39.373565103312565      61.8727451623483      84.37192522138405
                -10.0    0.0355864 0.0357353 0.0357225
                -5.0    0.0381415 0.0381862 0.0382481
                0.0    0.0406484 0.0406635 0.040659
                5.0    0.044244  0.0442981 0.0443551
                10.0    0.0485321 0.0486668 0.0482609
                </tableData>
        </table>
    </function>
    <function name="aero/coefficient/CY__dAilL_rad">
        <description>CY__dAilL_rad = dCY__dAilL_rad * dAilL_rad</description>
        <product>
            <property>aero/coefficient/dCY__dAilL_rad</property>
            <property>fcs/posAilL_rad</property>
        </product>
    </function>
    <function name="aero/coefficient/dCY__dAilR_rad">
        <description>dCY__dAilR_rad</description>
        <table>
            <independentVar lookup="row">aero/beta-deg</independentVar>
            <independentVar lookup="column">velocities/vt-fps</independentVar>
            <independentVar lookup="table">aero/alpha-deg</independentVar>
            <tableData breakPoint="-4.0">
                      39.373565103312565      61.8727451623483      84.37192522138405
                -10.0    -0.0080136 -0.0081645 -0.0083745
                -5.0    -0.0065824 -0.006659  -0.0067722
                0.0    -0.0042607 -0.0043785 -0.0044438
                5.0    -0.0033262 -0.0033962 -0.0034883
                10.0    -0.0023724 -0.0025269 -0.0021044
                </tableData>
            <tableData breakPoint="-2.4">
                      39.373565103312565      61.8727451623483      84.37192522138405
                -10.0    -0.0109232 -0.0110492 -0.0112107
                -5.0    -0.0088886 -0.0089378 -0.0089968
                0.0    -0.0063441 -0.0063615 -0.00631
                5.0    -0.0047129 -0.0047509 -0.0047943
                10.0    -0.0025721 -0.0026976 -0.0028724
                </tableData>
            <tableData breakPoint="-0.8">
                      39.373565103312565      61.8727451623483      84.37192522138405
                -10.0    -0.0138784 -0.0139848 -0.0141276
                -5.0    -0.0116113 -0.011756  -0.0118048
                0.0    -0.0087886 -0.008803  -0.0088147
                5.0    -0.0065395 -0.0065787 -0.0066268
                10.0    -0.004026  -0.004825  -0.0043882
                </tableData>
            <tableData breakPoint="0.8">
                      39.373565103312565      61.8727451623483      84.37192522138405
                -10.0    -0.0174298 -0.0175289 -0.0177469
                -5.0    -0.014649  -0.0147127 -0.0147998
                0.0    -0.0115563 -0.0115927 -0.0116429
                5.0    -0.0084871 -0.0085576 -0.0086472
                10.0    -0.0061305 -0.0062872 -0.0065143
                </tableData>
            <tableData breakPoint="2.4">
                      39.373565103312565      61.8727451623483      84.37192522138405
                -10.0    -0.0211029 -0.0212686 -0.0215187
                -5.0    -0.017649  -0.0177439 -0.0178793
                0.0    -0.0140125 -0.0140799 -0.014166
                5.0    -0.0107247 -0.0108117 -0.0109393
                10.0    -0.0079538 -0.0080007 -0.0081379
                </tableData>
            <tableData breakPoint="4.0">
                      39.373565103312565      61.8727451623483      84.37192522138405
                -10.0    -0.0246288 -0.024854  -0.0251738
                -5.0    -0.0204801 -0.0206154 -0.0208068
                0.0    -0.0162972 -0.0163715 -0.0164835
                5.0    -0.0131919 -0.0142294 -0.0130591
                10.0    -0.0093893 -0.009497  -0.0094398
                </tableData>
            <tableData breakPoint="5.6">
                      39.373565103312565      61.8727451623483      84.37192522138405
                -10.0    -0.0238074 -0.0240704 -0.0234574
                -5.0    -0.0198748 -0.02002   -0.0202226
                0.0    -0.019012  -0.0190719 -0.0191413
                5.0    -0.0177956 -0.0178824 -0.0179979
                10.0    -0.0145576 -0.0147228 -0.0150214
                </tableData>
            <tableData breakPoint="7.2">
                      39.373565103312565      61.8727451623483      84.37192522138405
                -10.0    -0.0255852 -0.0258311 -0.025992
                -5.0    -0.0223457 -0.0224692 -0.0226097
                0.0    -0.0211612 -0.0212213 -0.0212898
                5.0    -0.021638  -0.0217271 -0.0218664
                10.0    -0.0176287 -0.017797  -0.0178115
                </tableData>
            <tableData breakPoint="8.8">
                      39.373565103312565      61.8727451623483      84.37192522138405
                -10.0    -0.028743  -0.0289473 -0.0292401
                -5.0    -0.0296211 -0.0297977 -0.0300727
                0.0    -0.0283787 -0.0286641 -0.028939
                5.0    -0.026702  -0.0273847 -0.0277859
                10.0    -0.0274479 -0.0277888 -0.028312
                </tableData>
            <tableData breakPoint="10.4">
                      39.373565103312565      61.8727451623483      84.37192522138405
                -10.0    -0.0391126 -0.0393896 -0.0398016
                -5.0    -0.0440274 -0.0440884 -0.0441508
                0.0    -0.0403987 -0.0404155 -0.0404155
                5.0    -0.0377827 -0.0378145 -0.0379008
                10.0    -0.0355538 -0.0356861 -0.0359142
                </tableData>
            <tableData breakPoint="12.0">
                      39.373565103312565      61.8727451623483      84.37192522138405
                -10.0    -0.048013  -0.0481521 -0.0477507
                -5.0    -0.0442645 -0.0443304 -0.0443791
                0.0    -0.0406768 -0.0406937 -0.0406811
                5.0    -0.0381595 -0.0382225 -0.0382739
                10.0    -0.0356359 -0.03579   -0.0352125
                </tableData>
        </table>
    </function>
    <function name="aero/coefficient/CY__dAilR_rad">
        <description>CY__dAilR_rad = dCY__dAilR_rad * dAilR_rad</description>
        <product>
            <property>aero/coefficient/dCY__dAilR_rad</property>
            <property>fcs/posAilR_rad</property>
        </product>
    </function>
    <function name="aero/coefficient/dCY__dRudevL_rad">
        <description>dCY__dRudevL_rad</description>
        <table>
            <independentVar lookup="row">aero/beta-deg</independentVar>
            <independentVar lookup="column">velocities/vt-fps</independentVar>
            <independentVar lookup="table">aero/alpha-deg</independentVar>
            <tableData breakPoint="-4.0">
                      39.373565103312565      61.8727451623483      84.37192522138405
                -10.0    0.0778942 0.0780564 0.0776411
                -5.0    0.076669  0.0767214 0.0767887
                0.0    0.0741081 0.0741433 0.0741836
                5.0    0.0723648 0.0724233 0.0725108
                10.0    0.0717176 0.0719007 0.072163
                </tableData>
            <tableData breakPoint="-2.4">
                      39.373565103312565      61.8727451623483      84.37192522138405
                -10.0    0.0767594 0.0769134 0.0771285
                -5.0    0.075739  0.0757956 0.0750006
                0.0    0.0733288 0.0733623 0.0733999
                5.0    0.0717962 0.0718628 0.0719541
                10.0    0.0706442 0.0708101 0.0717593
                </tableData>
            <tableData breakPoint="-0.8">
                      39.373565103312565      61.8727451623483      84.37192522138405
                -10.0    0.0754386 0.0755954 0.0758165
                -5.0    0.0747986 0.0747524 0.0748292
                0.0    0.072562  0.0725918 0.0726317
                5.0    0.0712041 0.0712698 0.0713684
                10.0    0.0693429 0.0695203 0.0696161
                </tableData>
            <tableData breakPoint="0.8">
                      39.373565103312565      61.8727451623483      84.37192522138405
                -10.0    0.0741164 0.0743055 0.0744956
                -5.0    0.0735105 0.0735744 0.0736559
                0.0    0.0715987 0.0716337 0.071665
                5.0    0.0705284 0.0705929 0.0706833
                10.0    0.0687495 0.0689272 0.0691794
                </tableData>
            <tableData breakPoint="2.4">
                      39.373565103312565      61.8727451623483      84.37192522138405
                -10.0    0.0730196 0.0731812 0.0734032
                -5.0    0.0723011 0.0723669 0.0724537
                0.0    0.0705634 0.0705928 0.0706253
                5.0    0.069728  0.0697974 0.0698895
                10.0    0.0680134 0.0681986 0.0685066
                </tableData>
            <tableData breakPoint="4.0">
                      39.373565103312565      61.8727451623483      84.37192522138405
                -10.0    0.0717025 0.0718612 0.0720897
                -5.0    0.070896  0.070949  0.0710637
                0.0    0.0694342 0.0694603 0.0694923
                5.0    0.0688289 0.0688941 0.0689922
                10.0    0.0672549 0.0674702 0.0677474
                </tableData>
            <tableData breakPoint="5.6">
                      39.373565103312565      61.8727451623483      84.37192522138405
                -10.0    0.0709325 0.0710926 0.0713335
                -5.0    0.0693291 0.0693978 0.0695005
                0.0    0.0681984 0.0682268 0.0682535
                5.0    0.0633196 0.0633892 0.0634848
                10.0    0.0647624 0.0649723 0.0652663
                </tableData>
            <tableData breakPoint="7.2">
                      39.373565103312565      61.8727451623483      84.37192522138405
                -10.0    0.0695867 0.0697508 0.0696823
                -5.0    0.0683311 0.0683848 0.068502
                0.0    0.0598358 0.0598685 0.0599229
                5.0    0.0626029 0.0626738 0.0627765
                10.0    0.0647999 0.0650164 0.0653363
                </tableData>
            <tableData breakPoint="8.8">
                      39.373565103312565      61.8727451623483      84.37192522138405
                -10.0    0.0687494 0.0689236 0.0691615
                -5.0    0.0620921 0.0621662 0.062255
                0.0    0.0584008 0.058369  0.0584645
                5.0    0.0566277 0.0562967 0.0563925
                10.0    0.0644855 0.0647443 0.0659772
                </tableData>
            <tableData breakPoint="10.4">
                      39.373565103312565      61.8727451623483      84.37192522138405
                -10.0    0.0633312 0.0640712 0.0637458
                -5.0    0.0602952 0.0603806 0.0604931
                0.0    0.0571976 0.0572307 0.0572689
                5.0    0.0557478 0.05588   0.0559719
                10.0    0.0533955 0.0536497 0.0539772
                </tableData>
            <tableData breakPoint="12.0">
                      39.373565103312565      61.8727451623483      84.37192522138405
                -10.0    0.0616863 0.0618604 0.0612387
                -5.0    0.0586679 0.0587411 0.0588601
                0.0    0.0561426 0.0561783 0.0562243
                5.0    0.0553983 0.0511016 0.0556006
                10.0    0.0521269 0.0523853 0.0515581
                </tableData>
        </table>
    </function>
    <function name="aero/coefficient/CY__dRudevL_rad">
        <description>CY__dRudevL_rad = dCY__dRudevL_rad * dRudevL_rad</description>
        <product>
            <property>aero/coefficient/dCY__dRudevL_rad</property>
            <property>fcs/posRudevL_rad</property>
        </product>
    </function>
    <function name="aero/coefficient/dCY__dRudevR_rad">
        <description>dCY__dRudevR_rad</description>
        <table>
            <independentVar lookup="row">aero/beta-deg</independentVar>
            <independentVar lookup="column">velocities/vt-fps</independentVar>
            <independentVar lookup="table">aero/alpha-deg</independentVar>
            <tableData breakPoint="-4.0">
                      39.373565103312565      61.8727451623483      84.37192522138405
                -10.0    -0.0703038 -0.0703689 -0.0706045
                -5.0    -0.0723912 -0.0724598 -0.0725432
                0.0    -0.0740799 -0.0741144 -0.0741537
                5.0    -0.0765067 -0.0765611 -0.0766235
                10.0    -0.0763218 -0.0764734 -0.0760256
                </tableData>
            <tableData breakPoint="-2.4">
                      39.373565103312565      61.8727451623483      84.37192522138405
                -10.0    -0.0699265 -0.0700993 -0.0703346
                -5.0    -0.0717917 -0.0718592 -0.071946
                0.0    -0.0733545 -0.0733861 -0.0734251
                5.0    -0.0757444 -0.075801  -0.075875
                10.0    -0.0759158 -0.076078  -0.0762868
                </tableData>
            <tableData breakPoint="-0.8">
                      39.373565103312565      61.8727451623483      84.37192522138405
                -10.0    -0.0693455 -0.0695314 -0.069774
                -5.0    -0.07111   -0.0712845 -0.0713758
                0.0    -0.072569  -0.0726008 -0.0726345
                5.0    -0.0747456 -0.0747666 -0.0748324
                10.0    -0.0754721 -0.0756263 -0.0759892
                </tableData>
            <tableData breakPoint="0.8">
                      39.373565103312565      61.8727451623483      84.37192522138405
                -10.0    -0.0687614 -0.0689063 -0.0691913
                -5.0    -0.0705382 -0.0706062 -0.0706966
                0.0    -0.0716137 -0.0716391 -0.071672
                5.0    -0.0735206 -0.0735848 -0.0736604
                10.0    -0.0741294 -0.0742955 -0.0745092
                </tableData>
            <tableData breakPoint="2.4">
                      39.373565103312565      61.8727451623483      84.37192522138405
                -10.0    -0.0680185 -0.068195  -0.0685023
                -5.0    -0.0697394 -0.0698057 -0.0692898
                0.0    -0.0705679 -0.0705972 -0.0706292
                5.0    -0.0723039 -0.0723675 -0.0724557
                10.0    -0.0730407 -0.0731955 -0.0734171
                </tableData>
            <tableData breakPoint="4.0">
                      39.373565103312565      61.8727451623483      84.37192522138405
                -10.0    -0.0672921 -0.0674824 -0.0677595
                -5.0    -0.0688306 -0.0689    -0.0689924
                0.0    -0.0694339 -0.0694651 -0.0694972
                5.0    -0.070899  -0.0709691 -0.0710569
                10.0    -0.0717377 -0.0718875 -0.0721099
                </tableData>
            <tableData breakPoint="5.6">
                      39.373565103312565      61.8727451623483      84.37192522138405
                -10.0    -0.0647799 -0.0649824 -0.065282
                -5.0    -0.0633278 -0.0633984 -0.0634927
                0.0    -0.0681918 -0.0682239 -0.0682635
                5.0    -0.0693205 -0.0693895 -0.0694905
                10.0    -0.0709564 -0.0711184 -0.0713635
                </tableData>
            <tableData breakPoint="7.2">
                      39.373565103312565      61.8727451623483      84.37192522138405
                -10.0    -0.0648026 -0.0650177 -0.0653432
                -5.0    -0.0626    -0.0626815 -0.062785
                0.0    -0.0598174 -0.0598492 -0.0598858
                5.0    -0.068328  -0.0683815 -0.0684972
                10.0    -0.0695908 -0.0697762 -0.0696692
                </tableData>
            <tableData breakPoint="8.8">
                      39.373565103312565      61.8727451623483      84.37192522138405
                -10.0    -0.0645051 -0.0647403 -0.0650983
                -5.0    -0.0562379 -0.0563097 -0.0564311
                0.0    -0.0583972 -0.0584932 -0.058482
                5.0    -0.0616966 -0.0621746 -0.0622908
                10.0    -0.0687607 -0.0689288 -0.0691857
                </tableData>
            <tableData breakPoint="10.4">
                      39.373565103312565      61.8727451623483      84.37192522138405
                -10.0    -0.0534053 -0.0530855 -0.0540105
                -5.0    -0.0557836 -0.055855  -0.05596
                0.0    -0.0571719 -0.0571995 -0.0572518
                5.0    -0.0603411 -0.0603685 -0.0604867
                10.0    -0.0632554 -0.0634152 -0.0636778
                </tableData>
            <tableData breakPoint="12.0">
                      39.373565103312565      61.8727451623483      84.37192522138405
                -10.0    -0.0521474 -0.0523941 -0.0515734
                -5.0    -0.0553906 -0.0554813 -0.0555964
                0.0    -0.0561298 -0.0561659 -0.0562119
                5.0    -0.058632  -0.0587087 -0.0588517
                10.0    -0.0616696 -0.0618306 -0.0612287
                </tableData>
        </table>
    </function>
    <function name="aero/coefficient/CY__dRudevR_rad">
        <description>CY__dRudevR_rad = dCY__dRudevR_rad * dRudevR_rad</description>
        <product>
            <property>aero/coefficient/dCY__dRudevR_rad</property>
            <property>fcs/posRudevR_rad</property>
        </product>
    </function>
    <function name="aero/coefficient/CY">
        <description>CY summation</description>
        <sum>
            <property>aero/coefficient/CY__zero</property>
            <property>aero/coefficient/CY__alpha_rad</property>
            <property>aero/coefficient/CY__beta_rad</property>
            <property>aero/coefficient/CY__dpHat_rps</property>
            <property>aero/coefficient/CY__dqHat_rps</property>
            <property>aero/coefficient/CY__drHat_rps</property>
            <property>aero/coefficient/CY__dAilL_rad</property>
            <property>aero/coefficient/CY__dAilR_rad</property>
            <property>aero/coefficient/CY__dRudevL_rad</property>
            <property>aero/coefficient/CY__dRudevR_rad</property>
        </sum>
    </function>
    <function name="aero/coefficient/CMl__zero">
        <description>CMl__zero</description>
        <table>
            <independentVar lookup="row">aero/beta-deg</independentVar>
            <independentVar lookup="column">velocities/vt-fps</independentVar>
            <independentVar lookup="table">aero/alpha-deg</independentVar>
            <tableData breakPoint="-4.0">
                      39.373565103312565      61.8727451623483      84.37192522138405
                -10.0    0.00294313 0.00295834 0.00293957
                -5.0    0.00118446 0.00117871 0.00117052
                0.0    -2.7925268e-08 -2.7925268e-08 -4.1887902e-08
                5.0    -0.00127241 -0.00126941 -0.0012651
                10.0    -0.00329077 -0.0033235  -0.00339931
                </tableData>
            <tableData breakPoint="-2.4">
                      39.373565103312565      61.8727451623483      84.37192522138405
                -10.0    0.00216158 0.00218878 0.002345
                -5.0    0.00082527 0.00082466 0.00082388
                0.0    -6.77522083e-07 -6.77522083e-07  4.45073692e-07
                5.0    -0.00088378 -0.00088514 -0.00088737
                10.0    -0.00252623 -0.00256754 -0.00259474
                </tableData>
            <tableData breakPoint="-0.8">
                      39.373565103312565      61.8727451623483      84.37192522138405
                -10.0    0.00111593 0.00115113 0.00120203
                -5.0    0.00030559 0.0003518  0.00036055
                0.0    -3.71740398e-07 -3.41553568e-07 -1.45938990e-07
                5.0    -0.00033141 -0.00033872 -0.00038854
                10.0    -0.00117626 -0.00122327 -0.00138652
                </tableData>
            <tableData breakPoint="0.8">
                      39.373565103312565      61.8727451623483      84.37192522138405
                -10.0    -0.00060524 -0.00059722 -0.00058059
                -5.0    -0.00020918 -0.00020918 -0.00020807
                0.0     2.73667627e-07 -1.32979357e-07  1.09439510e-07
                5.0    0.00031124 0.00031383 0.00031674
                10.0    -0.000221   -0.00025612 -0.00032468
                </tableData>
            <tableData breakPoint="2.4">
                      39.373565103312565      61.8727451623483      84.37192522138405
                -10.0    -0.00028786 -0.00012782  0.00021082
                -5.0    -0.00067384 -0.00067766 -0.00068217
                0.0    -4.37168147e-07 -3.08554971e-08  1.40884901e-07
                5.0    0.00062894 0.00064205 0.00066065
                10.0    0.00086031 0.00049929 0.00016763
                </tableData>
            <tableData breakPoint="4.0">
                      39.373565103312565      61.8727451623483      84.37192522138405
                -10.0    0.00229663 0.00263219 0.00322554
                -5.0    0.00127209 0.00156761 0.00196326
                0.0    -1.73943031e-07  4.00786525e-07 -1.80924951e-08
                5.0    -0.00145067 -0.00180741 -0.0025641
                10.0    -0.00112063 -0.00155358 -0.00236236
                </tableData>
            <tableData breakPoint="5.6">
                      39.373565103312565      61.8727451623483      84.37192522138405
                -10.0    -0.00075406 -0.00101808 -0.00051688
                -5.0    0.00181596 0.00182095 0.0008914
                0.0    -2.10896747e-06  6.78839574e-07  7.86351856e-07
                5.0    -0.0039823  -0.00402451 -0.00281917
                10.0    0.00089192 0.00167886 0.00228021
                </tableData>
            <tableData breakPoint="7.2">
                      39.373565103312565      61.8727451623483      84.37192522138405
                -10.0    0.00506132 0.00450789 0.00479483
                -5.0    0.00070568 0.00082069 0.00099771
                0.0    -4.36513250e-06 -4.50336258e-06 -5.49610586e-06
                5.0    -0.00068005 -0.00081123 -0.0010227
                10.0    -0.00428456 -0.00364722 -0.00290393
                </tableData>
            <tableData breakPoint="8.8">
                      39.373565103312565      61.8727451623483      84.37192522138405
                -10.0    0.0183207  0.01866951 0.01925532
                -5.0    0.02012675 0.02018101 0.02026721
                0.0    -1.26642468e-05 -3.80833789e-06 -1.06826147e-05
                5.0    -0.01940384 -0.02004191 -0.02013225
                10.0    -0.0177642  -0.01801714 -0.01841972
                </tableData>
            <tableData breakPoint="10.4">
                      39.373565103312565      61.8727451623483      84.37192522138405
                -10.0    0.01154662 0.01104032 0.01034462
                -5.0    -0.00034589 -0.00034876 -0.0003499
                0.0    -2.92070763e-06  1.61714842e-06 -2.93885906e-06
                5.0    0.00031296 0.00031074 0.00030729
                10.0    -0.01213473 -0.01066071 -0.00966784
                </tableData>
            <tableData breakPoint="12.0">
                      39.373565103312565      61.8727451623483      84.37192522138405
                -10.0    -1.15678276e-04 -9.57957314e-05 -1.06168347e-04
                -5.0    -0.00028112 -0.00028701 -0.00028893
                0.0    8.83038286e-06 8.83038286e-06 8.83038286e-06
                5.0    0.00028827 0.00029128 0.00029171
                10.0    0.000116   0.00019874 0.00034224
                </tableData>
        </table>
    </function>
    <function name="aero/coefficient/dCMl__alpha_rad">
        <description>dCMl__alpha_rad</description>
        <table>
            <independentVar lookup="row">aero/beta-deg</independentVar>
            <independentVar lookup="column">velocities/vt-fps</independentVar>
            <independentVar lookup="table">aero/alpha-deg</independentVar>
            <tableData breakPoint="-4.0">
                      39.373565103312565      61.8727451623483      84.37192522138405
                -10.0    0.0363317 0.0361324 0.0352502
                -5.0    0.0182561 0.0181591 0.0180165
                0.0    -4.e-07 -4.e-07 -6.e-07
                5.0    -0.0182563 -0.0181594 -0.0180186
                10.0    -0.0362884 -0.0360885 -0.0352086
                </tableData>
            <tableData breakPoint="-2.4">
                      39.373565103312565      61.8727451623483      84.37192522138405
                -10.0    0.0414071 0.0413294 0.041789
                -5.0    0.0211182 0.0210556 0.0209624
                0.0    -1.14e-05 -1.14e-05  1.54e-05
                5.0    -0.0211258 -0.0210628 -0.0209699
                10.0    -0.0414166 -0.0413401 -0.0418004
                </tableData>
            <tableData breakPoint="-0.8">
                      39.373565103312565      61.8727451623483      84.37192522138405
                -10.0    0.050707  0.0512662 0.0520707
                -5.0    0.0237577 0.0244942 0.0248609
                0.0    -1.23e-05 -1.73e-05 -3.91e-05
                5.0    -0.0242355 -0.0244948 -0.0244334
                10.0    -0.0507376 -0.0513006 -0.0520639
                </tableData>
            <tableData breakPoint="0.8">
                      39.373565103312565      61.8727451623483      84.37192522138405
                -10.0    0.0466075 0.0474949 0.0487946
                -5.0    0.0227574 0.0231944 0.02377
                0.0    -1.96e-05 -4.80e-06 -1.50e-05
                5.0    -0.0227638 -0.0231809 -0.0237758
                10.0    -0.0466083 -0.047506  -0.0487908
                </tableData>
            <tableData breakPoint="2.4">
                      39.373565103312565      61.8727451623483      84.37192522138405
                -10.0    0.0233188 0.0201643 0.0164742
                -5.0    0.0202907 0.0207704 0.0214538
                0.0    -1.50e-06 -1.12e-05 -1.53e-05
                5.0    -0.0203064 -0.020784  -0.021473
                10.0    -0.0233254 -0.0201659 -0.0164745
                </tableData>
            <tableData breakPoint="4.0">
                      39.373565103312565      61.8727451623483      84.37192522138405
                -10.0    -0.0141232 -0.0190614 -0.0251832
                -5.0    -0.0078978 -0.0122822 -0.0186347
                0.0    -1.04e-05 -1.72e-05 -1.12e-05
                5.0    0.0078787 0.0122657 0.0186152
                10.0    0.0141339 0.0190892 0.025173
                </tableData>
            <tableData breakPoint="5.6">
                      39.373565103312565      61.8727451623483      84.37192522138405
                -10.0    -0.0045131  0.0005919  0.0064208
                -5.0    -0.0237108 -0.0251234 -0.0175758
                0.0     9.30e-06 -1.82e-05 -1.93e-05
                5.0    0.0236216 0.025102  0.0175546
                10.0     0.0045008 -0.0005912 -0.0064288
                </tableData>
            <tableData breakPoint="7.2">
                      39.373565103312565      61.8727451623483      84.37192522138405
                -10.0    -0.0379757 -0.034444  -0.0298468
                -5.0    -0.0035876 -0.004441  -0.0057956
                0.0    2.28e-05 2.39e-05 3.18e-05
                5.0    0.0035398 0.0044798 0.005855
                10.0    0.0379469 0.0344263 0.0298297
                </tableData>
            <tableData breakPoint="8.8">
                      39.373565103312565      61.8727451623483      84.37192522138405
                -10.0    -0.1154485 -0.1176679 -0.1209154
                -5.0    -0.131324  -0.1318429 -0.1326681
                0.0    7.92e-05 2.74e-05 6.76e-05
                5.0    0.1291168 0.1318839 0.1326935
                10.0    0.1154329 0.1176095 0.1209109
                </tableData>
            <tableData breakPoint="10.4">
                      39.373565103312565      61.8727451623483      84.37192522138405
                -10.0    -0.0903072 -0.0870762 -0.0836708
                -5.0    0.0011042 0.001136  0.0011673
                0.0     2.16e-05 -3.40e-06  2.17e-05
                5.0    -0.0010851 -0.0011114 -0.0011428
                10.0    0.0903262 0.0877864 0.0836869
                </tableData>
            <tableData breakPoint="12.0">
                      39.373565103312565      61.8727451623483      84.37192522138405
                -10.0    0.000369  0.0004464 0.0006692
                -5.0    0.0013234 0.0013632 0.0013923
                0.0    -3.5e-05 -3.5e-05 -3.5e-05
                5.0    -0.0012981 -0.0013311 -0.0013647
                10.0    -0.0002414 -0.0003653 -0.0005892
                </tableData>
        </table>
    </function>
    <function name="aero/coefficient/CMl__alpha_rad">
        <description>CMl__alpha_rad = dCMl__alpha_rad * alpha_rad</description>
        <product>
            <property>aero/coefficient/dCMl__alpha_rad</property>
            <property>aero/alpha-rad</property>
        </product>
    </function>
    <function name="aero/coefficient/dCMl__beta_rad">
        <description>dCMl__beta_rad</description>
        <table>
            <independentVar lookup="row">aero/beta-deg</independentVar>
            <independentVar lookup="column">velocities/vt-fps</independentVar>
            <independentVar lookup="table">aero/alpha-deg</independentVar>
            <tableData breakPoint="-4.0">
                      39.373565103312565      61.8727451623483      84.37192522138405
                -10.0    -0.0348364 -0.0346678 -0.0344311
                -5.0    -0.038948  -0.0389993 -0.0390811
                0.0    -0.0389447 -0.0390115 -0.0392524
                5.0    -0.0379369 -0.0379568 -0.0379955
                10.0    -0.0328301 -0.0325609 -0.0317832
                </tableData>
            <tableData breakPoint="-2.4">
                      39.373565103312565      61.8727451623483      84.37192522138405
                -10.0    -0.0406495 -0.0404435 -0.0395642
                -5.0    -0.0445134 -0.0445236 -0.0445474
                0.0    -0.0446935 -0.0447309 -0.044924
                5.0    -0.0438431 -0.0438306 -0.04382
                10.0    -0.0385585 -0.0382725 -0.0381326
                </tableData>
            <tableData breakPoint="-0.8">
                      39.373565103312565      61.8727451623483      84.37192522138405
                -10.0    -0.0478229 -0.0476436 -0.0473917
                -5.0    -0.0513374 -0.0508684 -0.0508921
                0.0    -0.0515834 -0.0516477 -0.0518749
                5.0    -0.0510194 -0.0510161 -0.0505866
                10.0    -0.0474717 -0.047225  -0.0463301
                </tableData>
            <tableData breakPoint="0.8">
                      39.373565103312565      61.8727451623483      84.37192522138405
                -10.0    -0.0579666 -0.0579293 -0.0578486
                -5.0    -0.0573671 -0.0574279 -0.0575201
                0.0    -0.0597775 -0.0599051 -0.0602662
                5.0    -0.0585345 -0.0586269 -0.0587622
                10.0    -0.0532279 -0.0530334 -0.0526581
                </tableData>
            <tableData breakPoint="2.4">
                      39.373565103312565      61.8727451623483      84.37192522138405
                -10.0    -0.0609397 -0.0610027 -0.0601847
                -5.0    -0.063988  -0.0640731 -0.0641978
                0.0    -0.0663035 -0.0666135 -0.0671526
                5.0    -0.0634659 -0.0636597 -0.063942
                10.0    -0.0642123 -0.0631261 -0.0623478
                </tableData>
            <tableData breakPoint="4.0">
                      39.373565103312565      61.8727451623483      84.37192522138405
                -10.0    -0.0598773 -0.0597907 -0.0585241
                -5.0    -0.0632944 -0.0635084 -0.0641952
                0.0    -0.0674551 -0.0677114 -0.0682033
                5.0    -0.0612374 -0.060753  -0.0572991
                10.0    -0.0666155 -0.0659772 -0.0634605
                </tableData>
            <tableData breakPoint="5.6">
                      39.373565103312565      61.8727451623483      84.37192522138405
                -10.0    -0.0714912 -0.0693149 -0.0621265
                -5.0    -0.0737591 -0.0743031 -0.0750819
                0.0    -0.0548999 -0.0548682 -0.0548486
                5.0    -0.0488462 -0.0490397 -0.0529778
                10.0    -0.0722713 -0.0730984 -0.0722223
                </tableData>
            <tableData breakPoint="7.2">
                      39.373565103312565      61.8727451623483      84.37192522138405
                -10.0    -0.0613921 -0.0615756 -0.055973
                -5.0    -0.0606298 -0.0606119 -0.0606543
                0.0    -0.065425  -0.0654572 -0.0656437
                5.0    -0.0608535 -0.0607933 -0.0604729
                10.0    -0.0658213 -0.0664947 -0.0667953
                </tableData>
            <tableData breakPoint="8.8">
                      39.373565103312565      61.8727451623483      84.37192522138405
                -10.0    -0.0529185 -0.0527275 -0.0519584
                -5.0    -0.0563924 -0.0564318 -0.0565331
                0.0    -0.0540366 -0.0537472 -0.053214
                5.0    -0.0603391 -0.0581003 -0.0581186
                10.0    -0.0560967 -0.0564116 -0.0567461
                </tableData>
            <tableData breakPoint="10.4">
                      39.373565103312565      61.8727451623483      84.37192522138405
                -10.0    -0.0623282 -0.0614632 -0.0614252
                -5.0    -0.0274328 -0.0274098 -0.0273601
                0.0    -0.0268656 -0.0268396 -0.0269381
                5.0    -0.0270734 -0.0270059 -0.0269033
                10.0    -0.0589755 -0.0644427 -0.0653162
                </tableData>
            <tableData breakPoint="12.0">
                      39.373565103312565      61.8727451623483      84.37192522138405
                -10.0    -0.0256702 -0.0254147 -0.0251214
                -5.0    -0.0260976 -0.0260914 -0.0260561
                0.0    -0.0278457 -0.0278445 -0.0279762
                5.0    -0.0262128 -0.0261899 -0.0261267
                10.0    -0.0258223 -0.026099  -0.0265677
                </tableData>
        </table>
    </function>
    <function name="aero/coefficient/CMl__beta_rad">
        <description>CMl__beta_rad = dCMl__beta_rad * beta_rad</description>
        <product>
            <property>aero/coefficient/dCMl__beta_rad</property>
            <property>aero/beta-rad</property>
        </product>
    </function>
    <function name="aero/coefficient/dCMl__dpHat_rps">
        <description>dCMl__dpHat_rps</description>
        <table>
            <independentVar lookup="row">aero/beta-deg</independentVar>
            <independentVar lookup="column">velocities/vt-fps</independentVar>
            <independentVar lookup="table">aero/alpha-deg</independentVar>
            <tableData breakPoint="-4.0">
                      39.373565103312565      61.8727451623483      84.37192522138405
                -10.0    -0.491108  -0.4929553 -0.495633
                -5.0    -0.4973632 -0.4993004 -0.5021047
                0.0    -0.5003881 -0.5023968 -0.5053063
                5.0    -0.5004198 -0.5024745 -0.5054497
                10.0    -0.4964768 -0.4985436 -0.5013841
                </tableData>
            <tableData breakPoint="-2.4">
                      39.373565103312565      61.8727451623483      84.37192522138405
                -10.0    -0.4832566 -0.4841904 -0.4853967
                -5.0    -0.4908437 -0.4918866 -0.4933967
                0.0    -0.4948591 -0.4960033 -0.4976617
                5.0    -0.4949057 -0.4961303 -0.497907
                10.0    -0.491716  -0.4930567 -0.4949847
                </tableData>
            <tableData breakPoint="-0.8">
                      39.373565103312565      61.8727451623483      84.37192522138405
                -10.0    -0.485132  -0.4858807 -0.4869655
                -5.0    -0.4920837 -0.4928587 -0.4941477
                0.0    -0.496707  -0.4977978 -0.4993844
                5.0    -0.4945899 -0.4957835 -0.4974073
                10.0    -0.4898674 -0.4911959 -0.4927647
                </tableData>
            <tableData breakPoint="0.8">
                      39.373565103312565      61.8727451623483      84.37192522138405
                -10.0    -0.4952989 -0.496711  -0.4987505
                -5.0    -0.4997691 -0.5013924 -0.5035886
                0.0    -0.5050071 -0.5063694 -0.5081114
                5.0    -0.4985414 -0.4998076 -0.501778
                10.0    -0.4839755 -0.4846883 -0.4857205
                </tableData>
            <tableData breakPoint="2.4">
                      39.373565103312565      61.8727451623483      84.37192522138405
                -10.0    -0.5106157 -0.5135481 -0.5169577
                -5.0    -0.5084477 -0.5103837 -0.5132194
                0.0    -0.5096725 -0.5101523 -0.5108471
                5.0    -0.4937323 -0.4939242 -0.494202
                10.0    -0.4740968 -0.4739197 -0.4739095
                </tableData>
            <tableData breakPoint="4.0">
                      39.373565103312565      61.8727451623483      84.37192522138405
                -10.0    -0.5037855 -0.5046422 -0.5056005
                -5.0    -0.51166   -0.5120982 -0.5127282
                0.0    -0.4987676 -0.4992076 -0.4998379
                5.0    -0.4839421 -0.4843842 -0.4850228
                10.0    -0.471574 -0.472322 -0.473552
                </tableData>
            <tableData breakPoint="5.6">
                      39.373565103312565      61.8727451623483      84.37192522138405
                -10.0    -0.4753511 -0.4731031 -0.4702051
                -5.0    -0.4852907 -0.4839801 -0.482066
                0.0    -0.4846315 -0.4846935 -0.4847745
                5.0    -0.4763344 -0.4777388 -0.479716
                10.0    -0.4650721 -0.4672098 -0.4698044
                </tableData>
            <tableData breakPoint="7.2">
                      39.373565103312565      61.8727451623483      84.37192522138405
                -10.0    -0.4145927 -0.4132739 -0.4113557
                -5.0    -0.4017586 -0.3999094 -0.3973027
                0.0    -0.3811845 -0.3788977 -0.3756509
                5.0    -0.3798421 -0.3774311 -0.3739229
                10.0    -0.3910054 -0.3899967 -0.3883914
                </tableData>
            <tableData breakPoint="8.8">
                      39.373565103312565      61.8727451623483      84.37192522138405
                -10.0    -0.2609066 -0.2592825 -0.2567983
                -5.0    -0.2134868 -0.2120057 -0.2098547
                0.0    -0.1911215 -0.18977   -0.1880783
                5.0    -0.1956013 -0.1927432 -0.1902458
                10.0    -0.2172581 -0.2142173 -0.2097972
                </tableData>
            <tableData breakPoint="10.4">
                      39.373565103312565      61.8727451623483      84.37192522138405
                -10.0    -0.0705563 -0.0686895 -0.0662691
                -5.0    -0.0445306 -0.0435932 -0.0422166
                0.0    -0.0620436 -0.0610741 -0.0596532
                5.0    -0.0950372 -0.0948192 -0.0934479
                10.0    -0.1251365 -0.1241121 -0.1238468
                </tableData>
            <tableData breakPoint="12.0">
                      39.373565103312565      61.8727451623483      84.37192522138405
                -10.0    0.0209341 0.0211493 0.0213546
                -5.0    0.0216378 0.0215792 0.0215216
                0.0    0.0193835 0.0196503 0.0200559
                5.0    -0.004703  -0.0039197 -0.0028752
                10.0    -0.0501574 -0.0483516 -0.0484547
                </tableData>
        </table>
    </function>
    <function name="aero/coefficient/CMl__dpHat_rps">
        <description>CMl__dpHat_rps = dCMl__dpHat_rps * dpHat_rps</description>
        <product>
            <property>aero/coefficient/dCMl__dpHat_rps</property>
            <property>velocities/p-aero-rad_sec</property>
            <property>aero/bi2vel</property>
        </product>
    </function>
    <function name="aero/coefficient/dCMl__dqHat_rps">
        <description>dCMl__dqHat_rps</description>
        <table>
            <independentVar lookup="row">aero/beta-deg</independentVar>
            <independentVar lookup="column">velocities/vt-fps</independentVar>
            <independentVar lookup="table">aero/alpha-deg</independentVar>
            <tableData breakPoint="-4.0">
                      39.373565103312565      61.8727451623483      84.37192522138405
                -10.0    0.0253543 0.0250349 0.0233433
                -5.0    0.0121538 0.0120063 0.0117824
                0.0    -3.5e-06 -4.5e-06 -2.9e-06
                5.0    -0.0121891 -0.0120445 -0.0118161
                10.0    -0.0252419 -0.0249222 -0.0232323
                </tableData>
            <tableData breakPoint="-2.4">
                      39.373565103312565      61.8727451623483      84.37192522138405
                -10.0    0.0306909 0.0304569 0.0300728
                -5.0    0.0149759 0.0148712 0.014703
                0.0    -5.08e-05  1.62e-05  1.69e-05
                5.0    -0.0149962 -0.0148929 -0.0147279
                10.0    -0.0309853 -0.0307552 -0.0309072
                </tableData>
            <tableData breakPoint="-0.8">
                      39.373565103312565      61.8727451623483      84.37192522138405
                -10.0    0.0404817 0.0408859 0.0414287
                -5.0    0.0183964 0.0195712 0.0198477
                0.0    -2.963e-04 -1.840e-05 -7.820e-05
                5.0    -0.0192508 -0.0194507 -0.0188556
                10.0    -0.0403979 -0.0408059 -0.0412681
                </tableData>
            <tableData breakPoint="0.8">
                      39.373565103312565      61.8727451623483      84.37192522138405
                -10.0    0.0412755 0.0420367 0.0431542
                -5.0    0.0188258 0.0191582 0.0196404
                0.0    -3.480e-05 -1.120e-05 -2.053e-04
                5.0    -0.0188158 -0.0191715 -0.0196322
                10.0    -0.0412953 -0.0420761 -0.0431603
                </tableData>
            <tableData breakPoint="2.4">
                      39.373565103312565      61.8727451623483      84.37192522138405
                -10.0    0.0199623 0.0178212 0.0165198
                -5.0    0.0183234 0.0187431 0.0193344
                0.0    -3.81e-04 -3.69e-05 -2.40e-05
                5.0    -0.0183106 -0.0187268 -0.0193158
                10.0    -0.0199884 -0.0178355 -0.0165384
                </tableData>
            <tableData breakPoint="4.0">
                      39.373565103312565      61.8727451623483      84.37192522138405
                -10.0    -0.0111184 -0.0183839 -0.0267548
                -5.0    -0.0083437 -0.0106242 -0.0128162
                0.0    -1.60e-06 -1.59e-05 -1.97e-05
                5.0    0.008344  0.0041403 0.0128242
                10.0    0.0111173 0.0183984 0.0267284
                </tableData>
            <tableData breakPoint="5.6">
                      39.373565103312565      61.8727451623483      84.37192522138405
                -10.0    -0.0127819 -0.0012014  0.0114738
                -5.0    -0.0125275 -0.0141781 -0.0165858
                0.0    -7.70e-06 -1.42e-05 -1.85e-05
                5.0    0.0125658 0.014219  0.0166021
                10.0     0.0127896  0.0012062 -0.0114743
                </tableData>
            <tableData breakPoint="7.2">
                      39.373565103312565      61.8727451623483      84.37192522138405
                -10.0    -0.0485635 -0.0463254 -0.0364175
                -5.0    0.0150633 0.0142208 0.012828
                0.0    3.38e-05 3.43e-05 4.95e-05
                5.0    -0.0151184 -0.0140838 -0.0126866
                10.0    0.0485345 0.0463317 0.036425
                </tableData>
            <tableData breakPoint="8.8">
                      39.373565103312565      61.8727451623483      84.37192522138405
                -10.0    -0.1207949 -0.1236095 -0.127708
                -5.0    -0.1445231 -0.1487167 -0.1549283
                0.0     1.399e-04 -2.400e-06  6.160e-05
                5.0    0.1399934 0.148807  0.1549275
                10.0    0.1207153 0.1234831 0.1276977
                </tableData>
            <tableData breakPoint="10.4">
                      39.373565103312565      61.8727451623483      84.37192522138405
                -10.0    -0.1552143 -0.1498207 -0.1452094
                -5.0    0.0015161 0.0015565 0.0015865
                0.0    2.86e-05 2.93e-05 3.02e-05
                5.0    -0.0016373 -0.0016629 -0.0016934
                10.0    0.1551775 0.151183  0.1451674
                </tableData>
            <tableData breakPoint="12.0">
                      39.373565103312565      61.8727451623483      84.37192522138405
                -10.0    0.0019529 0.0019959 0.0025726
                -5.0    0.0013864 0.0014258 0.0014598
                0.0    -6.18e-05 -6.36e-05 -6.32e-05
                5.0    -0.0013694 -0.001414  -0.0014447
                10.0    -0.001979  -0.0020235 -0.0025997
                </tableData>
        </table>
    </function>
    <function name="aero/coefficient/CMl__dqHat_rps">
        <description>CMl__dqHat_rps = dCMl__dqHat_rps * dqHat_rps</description>
        <product>
            <property>aero/coefficient/dCMl__dqHat_rps</property>
            <property>velocities/q-aero-rad_sec</property>
            <property>aero/ci2vel</property>
        </product>
    </function>
    <function name="aero/coefficient/dCMl__drHat_rps">
        <description>dCMl__drHat_rps</description>
        <table>
            <independentVar lookup="row">aero/beta-deg</independentVar>
            <independentVar lookup="column">velocities/vt-fps</independentVar>
            <independentVar lookup="table">aero/alpha-deg</independentVar>
            <tableData breakPoint="-4.0">
                      39.373565103312565      61.8727451623483      84.37192522138405
                -10.0    0.0598183 0.0598472 0.0597122
                -5.0    0.0610135 0.0609885 0.0609563
                0.0    0.0611674 0.0611548 0.0612477
                5.0    0.0610216 0.0610686 0.0607483
                10.0    0.0598094 0.0597248 0.0596069
                </tableData>
            <tableData breakPoint="-2.4">
                      39.373565103312565      61.8727451623483      84.37192522138405
                -10.0    0.0781022 0.078177  0.0782639
                -5.0    0.0794787 0.0795054 0.0795411
                0.0    0.0796852 0.0797217 0.0798868
                5.0    0.0793572 0.0794456 0.0792269
                10.0    0.0780888 0.0780527 0.077862
                </tableData>
            <tableData breakPoint="-0.8">
                      39.373565103312565      61.8727451623483      84.37192522138405
                -10.0    0.0966216 0.0967289 0.0967806
                -5.0    0.0981404 0.0983054 0.0983776
                0.0    0.0986709 0.09873   0.098925
                5.0    0.0981438 0.0982614 0.0981855
                10.0    0.0966284 0.0966233 0.0966292
                </tableData>
            <tableData breakPoint="0.8">
                      39.373565103312565      61.8727451623483      84.37192522138405
                -10.0    0.1157438 0.1159291 0.1161359
                -5.0    0.1174327 0.1175606 0.1177458
                0.0    0.1179225 0.1180683 0.1183856
                5.0    0.1173284 0.1175252 0.117457
                10.0    0.1157038 0.1157812 0.1158921
                </tableData>
            <tableData breakPoint="2.4">
                      39.373565103312565      61.8727451623483      84.37192522138405
                -10.0    0.1329912 0.1330002 0.1332099
                -5.0    0.1367202 0.1369926 0.1373871
                0.0    0.1372897 0.1375883 0.1381027
                5.0    0.1366262 0.136973  0.137117
                10.0    0.1339985 0.1342247 0.1343289
                </tableData>
            <tableData breakPoint="4.0">
                      39.373565103312565      61.8727451623483      84.37192522138405
                -10.0    0.1470489 0.1467562 0.1465856
                -5.0    0.1526192 0.1524168 0.1516477
                0.0    0.1551839 0.1551998 0.1553422
                5.0    0.1548228 0.1549819 0.1541914
                10.0    0.149085  0.1493912 0.1495574
                </tableData>
            <tableData breakPoint="5.6">
                      39.373565103312565      61.8727451623483      84.37192522138405
                -10.0    0.1642002 0.1647757 0.1651531
                -5.0    0.1645161 0.1648676 0.1653771
                0.0    0.1618548 0.1604583 0.1597937
                5.0    0.1647689 0.1652185 0.1655064
                10.0    0.163142  0.1618747 0.1604043
                </tableData>
            <tableData breakPoint="7.2">
                      39.373565103312565      61.8727451623483      84.37192522138405
                -10.0    0.1648119 0.1649633 0.1648193
                -5.0    0.165634  0.1632515 0.1623606
                0.0    0.1652946 0.1649895 0.1646574
                5.0    0.1680101 0.1676936 0.1669329
                10.0    0.1738011 0.1726386 0.1709608
                </tableData>
            <tableData breakPoint="8.8">
                      39.373565103312565      61.8727451623483      84.37192522138405
                -10.0    0.1039988 0.1033186 0.1022475
                -5.0    0.0938274 0.0930197 0.0918357
                0.0    0.096304  0.0951125 0.0935544
                5.0    0.1121778 0.1118409 0.110231
                10.0    0.1199896 0.1193686 0.1183796
                </tableData>
            <tableData breakPoint="10.4">
                      39.373565103312565      61.8727451623483      84.37192522138405
                -10.0    0.0646324 0.0647382 0.0644508
                -5.0    0.0398916 0.0390278 0.0377492
                0.0    0.0170455 0.0167094 0.0163418
                5.0    0.0148519 0.0148898 0.0146341
                10.0    0.0387312 0.0376213 0.0358927
                </tableData>
            <tableData breakPoint="12.0">
                      39.373565103312565      61.8727451623483      84.37192522138405
                -10.0    0.0258558 0.0255048 0.0248296
                -5.0    0.0165052 0.0164804 0.0164256
                0.0    0.0157609 0.0157452 0.015842
                5.0    0.0164466 0.016467  0.0162325
                10.0    0.0159114 0.0158251 0.0157118
                </tableData>
        </table>
    </function>
    <function name="aero/coefficient/CMl__drHat_rps">
        <description>CMl__drHat_rps = dCMl__drHat_rps * drHat_rps</description>
        <product>
            <property>aero/coefficient/dCMl__drHat_rps</property>
            <property>velocities/r-aero-rad_sec</property>
            <property>aero/bi2vel</property>
        </product>
    </function>
    <function name="aero/coefficient/dCMl__dAilL_rad">
        <description>dCMl__dAilL_rad</description>
        <table>
            <independentVar lookup="row">aero/beta-deg</independentVar>
            <independentVar lookup="column">velocities/vt-fps</independentVar>
            <independentVar lookup="table">aero/alpha-deg</independentVar>
            <tableData breakPoint="-4.0">
                      39.373565103312565      61.8727451623483      84.37192522138405
                -10.0    0.1378263 0.137975  0.1376058
                -5.0    0.1403836 0.1405536 0.1408007
                0.0    0.1406119 0.1407925 0.1410543
                5.0    0.1391552 0.1393454 0.1396224
                10.0    0.1349123 0.1350981 0.1353674
                </tableData>
            <tableData breakPoint="-2.4">
                      39.373565103312565      61.8727451623483      84.37192522138405
                -10.0    0.1376409 0.1377248 0.1378431
                -5.0    0.140003  0.1401043 0.1402506
                0.0    0.1400553 0.1401648 0.1403508
                5.0    0.1383097 0.1384221 0.1385857
                10.0    0.1340782 0.1341882 0.1343438
                </tableData>
            <tableData breakPoint="-0.8">
                      39.373565103312565      61.8727451623483      84.37192522138405
                -10.0    0.1384024 0.1383738 0.1385599
                -5.0    0.1400702 0.1406643 0.1409154
                0.0    0.1408296 0.1409539 0.1410639
                5.0    0.1381283 0.1382208 0.1387579
                10.0    0.1335043 0.1335768 0.1337232
                </tableData>
            <tableData breakPoint="0.8">
                      39.373565103312565      61.8727451623483      84.37192522138405
                -10.0    0.1394327 0.1396159 0.1400009
                -5.0    0.1413664 0.1415661 0.1418553
                0.0    0.1419058 0.1421089 0.1423816
                5.0    0.1391142 0.1392663 0.1394989
                10.0    0.1345737 0.1346975 0.1348792
                </tableData>
            <tableData breakPoint="2.4">
                      39.373565103312565      61.8727451623483      84.37192522138405
                -10.0    0.1393831 0.1387971 0.1383839
                -5.0    0.1422546 0.1425574 0.1429961
                0.0    0.1430174 0.1433254 0.1437718
                5.0    0.1401911 0.1404435 0.1408008
                10.0    0.136133  0.1363554 0.1367661
                </tableData>
            <tableData breakPoint="4.0">
                      39.373565103312565      61.8727451623483      84.37192522138405
                -10.0    0.1355295 0.1352481 0.1328106
                -5.0    0.1407176 0.1410574 0.1391069
                0.0    0.1425474 0.142718  0.1432332
                5.0    0.141624  0.1420076 0.1425628
                10.0    0.1377856 0.1381539 0.1388502
                </tableData>
            <tableData breakPoint="5.6">
                      39.373565103312565      61.8727451623483      84.37192522138405
                -10.0    0.1332761 0.1333765 0.1338438
                -5.0    0.1360406 0.1361613 0.1363357
                0.0    0.1368923 0.1370304 0.1372301
                5.0    0.1403761 0.1407345 0.1412901
                10.0    0.1397157 0.1402275 0.1353323
                </tableData>
            <tableData breakPoint="7.2">
                      39.373565103312565      61.8727451623483      84.37192522138405
                -10.0    0.1257112 0.1258335 0.125046
                -5.0    0.134578  0.1347763 0.1349498
                0.0    0.1351784 0.1353254 0.1355495
                5.0    0.1337275 0.133902  0.1341274
                10.0    0.1363076 0.136595  0.1364129
                </tableData>
            <tableData breakPoint="8.8">
                      39.373565103312565      61.8727451623483      84.37192522138405
                -10.0    0.06622   0.0650847 0.0634336
                -5.0    0.0577523 0.0565588 0.0547799
                0.0    0.07217   0.0708253 0.0689829
                5.0    0.0885524 0.0902578 0.0894431
                10.0    0.0966792 0.0961395 0.0954857
                </tableData>
            <tableData breakPoint="10.4">
                      39.373565103312565      61.8727451623483      84.37192522138405
                -10.0    -0.0036656  0.0013111  0.0006005
                -5.0    0.0025999 0.002629  0.0026349
                0.0    0.0030576 0.003062  0.0030703
                5.0    0.0034915 0.0035011 0.0035037
                10.0    0.0565746 0.0520138 0.0511024
                </tableData>
            <tableData breakPoint="12.0">
                      39.373565103312565      61.8727451623483      84.37192522138405
                -10.0    0.0024867 0.0024879 0.0025742
                -5.0    0.0029646 0.0029698 0.0029745
                0.0    0.0034526 0.003458  0.003465
                5.0    0.0038957 0.0038975 0.0039
                10.0    0.004446  0.0044426 0.0044724
                </tableData>
        </table>
    </function>
    <function name="aero/coefficient/CMl__dAilL_rad">
        <description>CMl__dAilL_rad = dCMl__dAilL_rad * dAilL_rad</description>
        <product>
            <property>aero/coefficient/dCMl__dAilL_rad</property>
            <property>fcs/posAilL_rad</property>
        </product>
    </function>
    <function name="aero/coefficient/dCMl__dAilR_rad">
        <description>dCMl__dAilR_rad</description>
        <table>
            <independentVar lookup="row">aero/beta-deg</independentVar>
            <independentVar lookup="column">velocities/vt-fps</independentVar>
            <independentVar lookup="table">aero/alpha-deg</independentVar>
            <tableData breakPoint="-4.0">
                      39.373565103312565      61.8727451623483      84.37192522138405
                -10.0    -0.1348772 -0.1350628 -0.1353326
                -5.0    -0.1391703 -0.1393603 -0.1396376
                0.0    -0.1405911 -0.1407965 -0.1410582
                5.0    -0.1403774 -0.1405482 -0.1407948
                10.0    -0.1378374 -0.1379861 -0.1376163
                </tableData>
            <tableData breakPoint="-2.4">
                      39.373565103312565      61.8727451623483      84.37192522138405
                -10.0    -0.1340692 -0.13418   -0.1343362
                -5.0    -0.1383052 -0.1384228 -0.1385856
                0.0    -0.140044  -0.1401535 -0.1402691
                5.0    -0.1400036 -0.1401057 -0.1402512
                10.0    -0.1377097 -0.137795  -0.1379161
                </tableData>
            <tableData breakPoint="-0.8">
                      39.373565103312565      61.8727451623483      84.37192522138405
                -10.0    -0.1335314 -0.1336047 -0.1337116
                -5.0    -0.1386087 -0.1382212 -0.1383532
                0.0    -0.1408414 -0.1409534 -0.1411364
                5.0    -0.1404527 -0.140567  -0.1403061
                10.0    -0.1386695 -0.1383444 -0.138897
                </tableData>
            <tableData breakPoint="0.8">
                      39.373565103312565      61.8727451623483      84.37192522138405
                -10.0    -0.1345824 -0.1347165 -0.1348803
                -5.0    -0.1391159 -0.1392695 -0.1394922
                0.0    -0.1419235 -0.1420985 -0.1423843
                5.0    -0.1413619 -0.1415653 -0.1418518
                10.0    -0.1394345 -0.1396641 -0.1399944
                </tableData>
            <tableData breakPoint="2.4">
                      39.373565103312565      61.8727451623483      84.37192522138405
                -10.0    -0.136142  -0.1363582 -0.1367732
                -5.0    -0.1401978 -0.1404443 -0.1408058
                0.0    -0.1430195 -0.1433261 -0.1437843
                5.0    -0.1422554 -0.1425509 -0.1429859
                10.0    -0.139415  -0.138792  -0.1383789
                </tableData>
            <tableData breakPoint="4.0">
                      39.373565103312565      61.8727451623483      84.37192522138405
                -10.0    -0.1377853 -0.1381061 -0.1388531
                -5.0    -0.1416282 -0.1420184 -0.1425678
                0.0    -0.1425326 -0.1427266 -0.1432349
                5.0    -0.1407067 -0.1385991 -0.1390988
                10.0    -0.1355351 -0.1352463 -0.1327463
                </tableData>
            <tableData breakPoint="5.6">
                      39.373565103312565      61.8727451623483      84.37192522138405
                -10.0    -0.139723  -0.1402295 -0.1353192
                -5.0    -0.1403853 -0.1407663 -0.1413081
                0.0    -0.1368854 -0.1370297 -0.1372342
                5.0    -0.1360294 -0.1361494 -0.1363299
                10.0    -0.1332744 -0.1333842 -0.1338351
                </tableData>
            <tableData breakPoint="7.2">
                      39.373565103312565      61.8727451623483      84.37192522138405
                -10.0    -0.136299  -0.1365902 -0.136415
                -5.0    -0.1338271 -0.1339205 -0.1341308
                0.0    -0.135185  -0.1353369 -0.135557
                5.0    -0.1346431 -0.1347642 -0.1349147
                10.0    -0.1257018 -0.1258175 -0.1250029
                </tableData>
            <tableData breakPoint="8.8">
                      39.373565103312565      61.8727451623483      84.37192522138405
                -10.0    -0.0966664 -0.0961895 -0.0954511
                -5.0    -0.090837  -0.0902635 -0.0895042
                0.0    -0.0721286 -0.0708783 -0.0689591
                5.0    -0.0600039 -0.0565379 -0.0547984
                10.0    -0.0662413 -0.065139  -0.0634255
                </tableData>
            <tableData breakPoint="10.4">
                      39.373565103312565      61.8727451623483      84.37192522138405
                -10.0    -0.0526514 -0.0521333 -0.0511077
                -5.0    -0.003501  -0.0035041 -0.003507
                0.0    -0.0030618 -0.0030672 -0.0030731
                5.0    -0.0026316 -0.0026329 -0.0026411
                10.0    -0.0006322 -0.0006275 -0.0006128
                </tableData>
            <tableData breakPoint="12.0">
                      39.373565103312565      61.8727451623483      84.37192522138405
                -10.0    -0.0044104 -0.0044065 -0.0044358
                -5.0    -0.0039003 -0.0039043 -0.0039059
                0.0    -0.0034602 -0.0034669 -0.0034729
                5.0    -0.0029713 -0.0029779 -0.0029833
                10.0    -0.0024977 -0.0025013 -0.0025416
                </tableData>
        </table>
    </function>
    <function name="aero/coefficient/CMl__dAilR_rad">
        <description>CMl__dAilR_rad = dCMl__dAilR_rad * dAilR_rad</description>
        <product>
            <property>aero/coefficient/dCMl__dAilR_rad</property>
            <property>fcs/posAilR_rad</property>
        </product>
    </function>
    <function name="aero/coefficient/dCMl__dRudevL_rad">
        <description>dCMl__dRudevL_rad</description>
        <table>
            <independentVar lookup="row">aero/beta-deg</independentVar>
            <independentVar lookup="column">velocities/vt-fps</independentVar>
            <independentVar lookup="table">aero/alpha-deg</independentVar>
            <tableData breakPoint="-4.0">
                      39.373565103312565      61.8727451623483      84.37192522138405
                -10.0    0.0118635 0.0118618 0.0112721
                -5.0    0.0114649 0.0114667 0.0114706
                0.0    0.0109165 0.0109216 0.0109292
                5.0    0.0101854 0.0101904 0.0101982
                10.0    0.0095388 0.0095384 0.0095386
                </tableData>
            <tableData breakPoint="-2.4">
                      39.373565103312565      61.8727451623483      84.37192522138405
                -10.0    0.0118136 0.011812  0.0118049
                -5.0    0.0112945 0.0112973 0.011741
                0.0    0.0107514 0.010756  0.0107649
                5.0    0.0100396 0.0100442 0.010051
                10.0    0.0091331 0.0091309 0.008949
                </tableData>
            <tableData breakPoint="-0.8">
                      39.373565103312565      61.8727451623483      84.37192522138405
                -10.0    0.011836  0.0118375 0.0118384
                -5.0    0.0107013 0.011182  0.0111839
                0.0    0.0105695 0.0105918 0.0105466
                5.0    0.0098089 0.009814  0.0102512
                10.0    0.0089809 0.0089779 0.0090163
                </tableData>
            <tableData breakPoint="0.8">
                      39.373565103312565      61.8727451623483      84.37192522138405
                -10.0    0.0119024 0.0118958 0.0119149
                -5.0    0.0111074 0.0111094 0.0111167
                0.0    0.0103464 0.0103629 0.0103628
                5.0    0.0096021 0.0096019 0.0096075
                10.0    0.0087818 0.0087853 0.0087829
                </tableData>
            <tableData breakPoint="2.4">
                      39.373565103312565      61.8727451623483      84.37192522138405
                -10.0    0.0119318 0.0119405 0.0119209
                -5.0    0.0110666 0.0110716 0.0110817
                0.0    0.0101483 0.0101521 0.0101577
                5.0    0.0093992 0.0094114 0.0093935
                10.0    0.0085996 0.0085952 0.0086196
                </tableData>
            <tableData breakPoint="4.0">
                      39.373565103312565      61.8727451623483      84.37192522138405
                -10.0    0.0118878 0.0118885 0.0118349
                -5.0    0.0110226 0.0110063 0.0110318
                0.0    0.0099712 0.0099717 0.0099776
                5.0    0.0092272 0.0092319 0.0092298
                10.0    0.0084605 0.0084485 0.0084774
                </tableData>
            <tableData breakPoint="5.6">
                      39.373565103312565      61.8727451623483      84.37192522138405
                -10.0    0.0118981 0.0118977 0.0119272
                -5.0    0.0109019 0.0109082 0.0109051
                0.0    0.0098537 0.0098543 0.0098575
                5.0    0.0085841 0.0085922 0.0085981
                10.0    0.0080546 0.0080572 0.0080359
                </tableData>
            <tableData breakPoint="7.2">
                      39.373565103312565      61.8727451623483      84.37192522138405
                -10.0    0.0119846 0.0119864 0.0115146
                -5.0    0.0105683 0.0106361 0.0106743
                0.0    0.0089395 0.0089429 0.0089513
                5.0    0.0084164 0.0084181 0.0084318
                10.0    0.0078848 0.0078844 0.0078793
                </tableData>
            <tableData breakPoint="8.8">
                      39.373565103312565      61.8727451623483      84.37192522138405
                -10.0    0.0106885 0.0106863 0.0106883
                -5.0    0.0094369 0.0094547 0.0094248
                0.0    0.0086786 0.0086481 0.0086917
                5.0    0.0056209 0.0078832 0.0078779
                10.0    0.0076471 0.0076163 0.0079649
                </tableData>
            <tableData breakPoint="10.4">
                      39.373565103312565      61.8727451623483      84.37192522138405
                -10.0    0.0097479 0.0104493 0.0097414
                -5.0    0.0094751 0.0094808 0.0094877
                0.0    0.0084775 0.0084816 0.008488
                5.0    0.007598  0.0076065 0.0076066
                10.0    0.0067378 0.0067319 0.0067175
                </tableData>
            <tableData breakPoint="12.0">
                      39.373565103312565      61.8727451623483      84.37192522138405
                -10.0    0.0100526 0.0100543 0.0101047
                -5.0    0.0094588 0.0094634 0.0094698
                0.0    0.0081892 0.0081931 0.0082
                5.0    0.0075297 0.0077289 0.0075322
                10.0    0.0062153 0.006206  0.006265
                </tableData>
        </table>
    </function>
    <function name="aero/coefficient/CMl__dRudevL_rad">
        <description>CMl__dRudevL_rad = dCMl__dRudevL_rad * dRudevL_rad</description>
        <product>
            <property>aero/coefficient/dCMl__dRudevL_rad</property>
            <property>fcs/posRudevL_rad</property>
        </product>
    </function>
    <function name="aero/coefficient/dCMl__dRudevR_rad">
        <description>dCMl__dRudevR_rad</description>
        <table>
            <independentVar lookup="row">aero/beta-deg</independentVar>
            <independentVar lookup="column">velocities/vt-fps</independentVar>
            <independentVar lookup="table">aero/alpha-deg</independentVar>
            <tableData breakPoint="-4.0">
                      39.373565103312565      61.8727451623483      84.37192522138405
                -10.0    -0.0093947 -0.0093579 -0.0093586
                -5.0    -0.0101822 -0.0101864 -0.0101953
                0.0    -0.0109134 -0.0109178 -0.0109255
                5.0    -0.011451  -0.0114533 -0.0114564
                10.0    -0.011709  -0.0117085 -0.0111199
                </tableData>
            <tableData breakPoint="-2.4">
                      39.373565103312565      61.8727451623483      84.37192522138405
                -10.0    -0.009194  -0.0091938 -0.0091875
                -5.0    -0.0100412 -0.0100464 -0.0100524
                0.0    -0.0107648 -0.0107783 -0.0107761
                5.0    -0.0112928 -0.0112949 -0.0113003
                10.0    -0.011864  -0.0118641 -0.0118592
                </tableData>
            <tableData breakPoint="-0.8">
                      39.373565103312565      61.8727451623483      84.37192522138405
                -10.0    -0.0089829 -0.008973  -0.0089708
                -5.0    -0.0102878 -0.0098138 -0.0098215
                0.0    -0.0105563 -0.0105844 -0.0106184
                5.0    -0.0111477 -0.0111803 -0.0107501
                10.0    -0.0118333 -0.0118352 -0.0117967
                </tableData>
            <tableData breakPoint="0.8">
                      39.373565103312565      61.8727451623483      84.37192522138405
                -10.0    -0.0087959 -0.0088031 -0.0087829
                -5.0    -0.0096026 -0.0096051 -0.0096092
                0.0    -0.0103645 -0.0103518 -0.0103679
                5.0    -0.0111011 -0.0111069 -0.0111179
                10.0    -0.0119048 -0.0119053 -0.0119061
                </tableData>
            <tableData breakPoint="2.4">
                      39.373565103312565      61.8727451623483      84.37192522138405
                -10.0    -0.0086072 -0.0085993 -0.0086218
                -5.0    -0.0093985 -0.0094045 -0.010164
                0.0    -0.0101487 -0.0101523 -0.0101581
                5.0    -0.0110616 -0.0110644 -0.0110714
                10.0    -0.0119379 -0.0119428 -0.0119186
                </tableData>
            <tableData breakPoint="4.0">
                      39.373565103312565      61.8727451623483      84.37192522138405
                -10.0    -0.0084533 -0.0084545 -0.008492
                -5.0    -0.0092222 -0.0092251 -0.0092268
                0.0    -0.0099572 -0.0099666 -0.0099784
                5.0    -0.011004  -0.011009  -0.0110178
                10.0    -0.0118796 -0.0119044 -0.01184
                </tableData>
            <tableData breakPoint="5.6">
                      39.373565103312565      61.8727451623483      84.37192522138405
                -10.0    -0.00806   -0.0080597 -0.0080364
                -5.0    -0.0085799 -0.0085877 -0.0085932
                0.0    -0.0098355 -0.0098441 -0.0098533
                5.0    -0.0108941 -0.0108891 -0.0108922
                10.0    -0.0118944 -0.0118915 -0.0119297
                </tableData>
            <tableData breakPoint="7.2">
                      39.373565103312565      61.8727451623483      84.37192522138405
                -10.0    -0.007882  -0.0078832 -0.007879
                -5.0    -0.0084981 -0.0084115 -0.0084133
                0.0    -0.0089356 -0.0089397 -0.0089408
                5.0    -0.0107288 -0.0106258 -0.0106431
                10.0    -0.0119848 -0.0119721 -0.0115004
                </tableData>
            <tableData breakPoint="8.8">
                      39.373565103312565      61.8727451623483      84.37192522138405
                -10.0    -0.0076656 -0.0076699 -0.0076568
                -5.0    -0.0078952 -0.007881  -0.0079177
                0.0    -0.0086793 -0.0087297 -0.0087021
                5.0    -0.0117114 -0.009454  -0.0094669
                10.0    -0.0106853 -0.0107407 -0.0106843
                </tableData>
            <tableData breakPoint="10.4">
                      39.373565103312565      61.8727451623483      84.37192522138405
                -10.0    -0.0067396 -0.0060403 -0.0067174
                -5.0    -0.0076014 -0.0076021 -0.007603
                0.0    -0.0084744 -0.0084776 -0.0084853
                5.0    -0.0094818 -0.0094801 -0.0094877
                10.0    -0.0097504 -0.0097512 -0.0097491
                </tableData>
            <tableData breakPoint="12.0">
                      39.373565103312565      61.8727451623483      84.37192522138405
                -10.0    -0.0062158 -0.0062067 -0.0062652
                -5.0    -0.0075286 -0.007529  -0.0075302
                0.0    -0.0081846 -0.0081888 -0.0081958
                5.0    -0.0094558 -0.0094601 -0.0094661
                10.0    -0.010051  -0.010052  -0.0101053
                </tableData>
        </table>
    </function>
    <function name="aero/coefficient/CMl__dRudevR_rad">
        <description>CMl__dRudevR_rad = dCMl__dRudevR_rad * dRudevR_rad</description>
        <product>
            <property>aero/coefficient/dCMl__dRudevR_rad</property>
            <property>fcs/posRudevR_rad</property>
        </product>
    </function>
    <function name="aero/coefficient/CMl">
        <description>CMl summation</description>
        <sum>
            <property>aero/coefficient/CMl__zero</property>
            <property>aero/coefficient/CMl__alpha_rad</property>
            <property>aero/coefficient/CMl__beta_rad</property>
            <property>aero/coefficient/CMl__dpHat_rps</property>
            <property>aero/coefficient/CMl__dqHat_rps</property>
            <property>aero/coefficient/CMl__drHat_rps</property>
            <property>aero/coefficient/CMl__dAilL_rad</property>
            <property>aero/coefficient/CMl__dAilR_rad</property>
            <property>aero/coefficient/CMl__dRudevL_rad</property>
            <property>aero/coefficient/CMl__dRudevR_rad</property>
        </sum>
    </function>
    <function name="aero/coefficient/CMm__zero">
        <description>CMm__zero</description>
        <table>
            <independentVar lookup="row">aero/beta-deg</independentVar>
            <independentVar lookup="column">velocities/vt-fps</independentVar>
            <independentVar lookup="table">aero/alpha-deg</independentVar>
            <tableData breakPoint="-4.0">
                      39.373565103312565      61.8727451623483      84.37192522138405
                -10.0    -0.04597477 -0.04605939 -0.04730207
                -5.0    -0.05080053 -0.05088507 -0.05093591
                0.0    -0.051498   -0.05157189 -0.05167913
                5.0    -0.04975126 -0.04983708 -0.04989245
                10.0    -0.0440608  -0.04413436 -0.04183062
                </tableData>
            <tableData breakPoint="-2.4">
                      39.373565103312565      61.8727451623483      84.37192522138405
                -10.0    -0.04523194 -0.04525926 -0.04213727
                -5.0    -0.05221216 -0.05226162 -0.05227902
                0.0    -0.05313873 -0.05318362 -0.05324884
                5.0    -0.0514919  -0.0515407  -0.05156409
                10.0    -0.04368142 -0.04369844 -0.04226597
                </tableData>
            <tableData breakPoint="-0.8">
                      39.373565103312565      61.8727451623483      84.37192522138405
                -10.0    -0.04702745 -0.04703375 -0.04706954
                -5.0    -0.05279686 -0.05284157 -0.05285142
                0.0    -0.05402268 -0.054067   -0.05413112
                5.0    -0.05201034 -0.05205355 -0.05212226
                10.0    -0.04534729 -0.0452923  -0.04116443
                </tableData>
            <tableData breakPoint="0.8">
                      39.373565103312565      61.8727451623483      84.37192522138405
                -10.0    -0.0459649  -0.04593729 -0.04589833
                -5.0    -0.05233527 -0.05237719 -0.05237759
                0.0    -0.05357753 -0.05361716 -0.0536738
                5.0    -0.05138711 -0.05141902 -0.05141427
                10.0    -0.04341651 -0.04335129 -0.03902088
                </tableData>
            <tableData breakPoint="2.4">
                      39.373565103312565      61.8727451623483      84.37192522138405
                -10.0    -0.04543716 -0.04549674 -0.04566941
                -5.0    -0.05058059 -0.05060554 -0.05058183
                0.0    -0.05148918 -0.05149712 -0.05150753
                5.0    -0.0489952  -0.04899063 -0.04893218
                10.0    -0.04409546 -0.04436439 -0.03970233
                </tableData>
            <tableData breakPoint="4.0">
                      39.373565103312565      61.8727451623483      84.37192522138405
                -10.0    -0.04936756 -0.04945376 -0.04961774
                -5.0    -0.04941695 -0.04988507 -0.05042203
                0.0    -0.05003852 -0.05006751 -0.05051215
                5.0    -0.04898786 -0.04945513 -0.05026506
                10.0    -0.04631841 -0.04661337 -0.04180507
                </tableData>
            <tableData breakPoint="5.6">
                      39.373565103312565      61.8727451623483      84.37192522138405
                -10.0    -0.05157972 -0.05163769 -0.05120537
                -5.0    -0.05323536 -0.05328845 -0.05391738
                0.0    -0.05002887 -0.05014373 -0.0503112
                5.0    -0.05237148 -0.05242977 -0.05326778
                10.0    -0.05075558 -0.05124434 -0.04581538
                </tableData>
            <tableData breakPoint="7.2">
                      39.373565103312565      61.8727451623483      84.37192522138405
                -10.0    -0.06917232 -0.06984585 -0.06674006
                -5.0    -0.07463837 -0.07497035 -0.07535909
                0.0    -0.07584977 -0.07609119 -0.07643702
                5.0    -0.07594113 -0.07617168 -0.07650272
                10.0    -0.0664282  -0.06733894 -0.05889665
                </tableData>
            <tableData breakPoint="8.8">
                      39.373565103312565      61.8727451623483      84.37192522138405
                -10.0    -0.08980451 -0.0898164  -0.08526817
                -5.0    -0.09757232 -0.09785263 -0.09817498
                0.0    -0.10425353 -0.10465381 -0.10521752
                5.0    -0.09735412 -0.09805616 -0.09836115
                10.0    -0.08833262 -0.08858306 -0.08762627
                </tableData>
            <tableData breakPoint="10.4">
                      39.373565103312565      61.8727451623483      84.37192522138405
                -10.0    -0.09696126 -0.09692361 -0.09766362
                -5.0    -0.11232887 -0.11223178 -0.11200512
                0.0    -0.11264224 -0.11153793 -0.11242901
                5.0    -0.11143685 -0.11133389 -0.11109132
                10.0    -0.09521167 -0.09622906 -0.1010876
                </tableData>
            <tableData breakPoint="12.0">
                      39.373565103312565      61.8727451623483      84.37192522138405
                -10.0    -0.09738774 -0.09698988 -0.09659517
                -5.0    -0.1044552  -0.10433456 -0.10408194
                0.0    -0.11127872 -0.11119956 -0.11105596
                5.0    -0.1036124  -0.10349046 -0.10320981
                10.0    -0.09304545 -0.0929926  -0.08850064
                </tableData>
        </table>
    </function>
    <function name="aero/coefficient/dCMm__alpha_rad">
        <description>dCMm__alpha_rad</description>
        <table>
            <independentVar lookup="row">aero/beta-deg</independentVar>
            <independentVar lookup="column">velocities/vt-fps</independentVar>
            <independentVar lookup="table">aero/alpha-deg</independentVar>
            <tableData breakPoint="-4.0">
                      39.373565103312565      61.8727451623483      84.37192522138405
                -10.0    -0.5077837 -0.5090052 -0.5260654
                -5.0    -0.4915094 -0.4925142 -0.4936097
                0.0    -0.4875785 -0.488538  -0.4899295
                5.0    -0.4913004 -0.4923034 -0.493397
                10.0    -0.5077327 -0.5089589 -0.5260146
                </tableData>
            <tableData breakPoint="-2.4">
                      39.373565103312565      61.8727451623483      84.37192522138405
                -10.0    -0.5357294 -0.536512  -0.5215446
                -5.0    -0.5260718 -0.5264128 -0.5268663
                0.0    -0.522068  -0.5224233 -0.5229396
                5.0    -0.5261738 -0.5265162 -0.5269643
                10.0    -0.5356138 -0.5363901 -0.5214207
                </tableData>
            <tableData breakPoint="-0.8">
                      39.373565103312565      61.8727451623483      84.37192522138405
                -10.0    -0.5791991 -0.5799794 -0.5810084
                -5.0    -0.5727012 -0.5730887 -0.5736256
                0.0    -0.5698406 -0.5702433 -0.5708253
                5.0    -0.5726624 -0.5730708 -0.5730207
                10.0    -0.5791558 -0.5799492 -0.5809886
                </tableData>
            <tableData breakPoint="0.8">
                      39.373565103312565      61.8727451623483      84.37192522138405
                -10.0    -0.6259386 -0.6271907 -0.6288913
                -5.0    -0.626449  -0.6273314 -0.6286187
                0.0    -0.6248084 -0.6257302 -0.6270883
                5.0    -0.6264186 -0.6272941 -0.6285928
                10.0    -0.6259225 -0.6271377 -0.6288677
                </tableData>
            <tableData breakPoint="2.4">
                      39.373565103312565      61.8727451623483      84.37192522138405
                -10.0    -0.6535379 -0.6517057 -0.6506348
                -5.0    -0.6807571 -0.6823412 -0.6845611
                0.0    -0.6817271 -0.6834999 -0.6860947
                5.0    -0.6807031 -0.6822907 -0.6845124
                10.0    -0.6535146 -0.6516823 -0.6506078
                </tableData>
            <tableData breakPoint="4.0">
                      39.373565103312565      61.8727451623483      84.37192522138405
                -10.0    -0.6222588 -0.6204072 -0.6188746
                -5.0    -0.697232  -0.6922171 -0.6850502
                0.0    -0.7070597 -0.707968  -0.7033623
                5.0    -0.6972074 -0.6922016 -0.6850258
                10.0    -0.6222454 -0.6204014 -0.618842
                </tableData>
            <tableData breakPoint="5.6">
                      39.373565103312565      61.8727451623483      84.37192522138405
                -10.0    -0.6411199 -0.637324  -0.6329132
                -5.0    -0.6730354 -0.6727465 -0.665956
                0.0    -0.7067325 -0.704969  -0.7024708
                5.0    -0.6730077 -0.6726986 -0.6659012
                10.0    -0.6411103 -0.637274  -0.6329039
                </tableData>
            <tableData breakPoint="7.2">
                      39.373565103312565      61.8727451623483      84.37192522138405
                -10.0    -0.5205982 -0.5137585 -0.5313906
                -5.0    -0.4953971 -0.4916207 -0.4864365
                0.0    -0.4948782 -0.4918971 -0.4876888
                5.0    -0.4953024 -0.4915964 -0.4864276
                10.0    -0.5205028 -0.5136682 -0.5312914
                </tableData>
            <tableData breakPoint="8.8">
                      39.373565103312565      61.8727451623483      84.37192522138405
                -10.0    -0.3615197 -0.358971  -0.356503
                -5.0    -0.3463639 -0.3429674 -0.3381547
                0.0    -0.3052385 -0.3011381 -0.2953941
                5.0    -0.3480447 -0.3429706 -0.3381264
                10.0    -0.3615549 -0.3590712 -0.3565294
                </tableData>
            <tableData breakPoint="10.4">
                      39.373565103312565      61.8727451623483      84.37192522138405
                -10.0    -0.3332478 -0.3305624 -0.2972885
                -5.0    -0.2512132 -0.2499291 -0.248152
                0.0    -0.255718  -0.2600637 -0.252752
                5.0    -0.2510898 -0.2497772 -0.2480382
                10.0    -0.3326815 -0.3303168 -0.2967453
                </tableData>
            <tableData breakPoint="12.0">
                      39.373565103312565      61.8727451623483      84.37192522138405
                -10.0    -0.3062293 -0.3054619 -0.3037058
                -5.0    -0.285552  -0.2843452 -0.2826502
                0.0    -0.2638145 -0.2625132 -0.2608965
                5.0    -0.2855304 -0.2842662 -0.2826537
                10.0    -0.3054528 -0.3047023 -0.3029766
                </tableData>
        </table>
    </function>
    <function name="aero/coefficient/CMm__alpha_rad">
        <description>CMm__alpha_rad = dCMm__alpha_rad * alpha_rad</description>
        <product>
            <property>aero/coefficient/dCMm__alpha_rad</property>
            <property>aero/alpha-rad</property>
        </product>
    </function>
    <function name="aero/coefficient/dCMm__beta_rad">
        <description>dCMm__beta_rad</description>
        <table>
            <independentVar lookup="row">aero/beta-deg</independentVar>
            <independentVar lookup="column">velocities/vt-fps</independentVar>
            <independentVar lookup="table">aero/alpha-deg</independentVar>
            <tableData breakPoint="-4.0">
                      39.373565103312565      61.8727451623483      84.37192522138405
                -10.0    0.091427  0.0912755 0.0901556
                -5.0    0.0421479 0.0418925 0.0414059
                0.0    -0.0081212 -0.0081346 -0.0073812
                5.0    -0.0540102 -0.0537398 -0.0531998
                10.0    -0.1023774 -0.1022906 -0.1214884
                </tableData>
            <tableData breakPoint="-2.4">
                      39.373565103312565      61.8727451623483      84.37192522138405
                -10.0    0.1034449 0.1034951 0.1188695
                -5.0    0.0445438 0.0443172 0.0438691
                0.0    -0.0080949 -0.0081028 -0.0072546
                5.0    -0.052828  -0.0526108 -0.0520915
                10.0    -0.1123044 -0.1124127 -0.1181058
                </tableData>
            <tableData breakPoint="-0.8">
                      39.373565103312565      61.8727451623483      84.37192522138405
                -10.0    0.0972561 0.0974188 0.0969122
                -5.0    0.0483869 0.0482196 0.0478592
                0.0    -0.0078016 -0.0077821 -0.0068368
                5.0    -0.057405  -0.0572549 -0.0562429
                10.0    -0.106885  -0.1073993 -0.1307484
                </tableData>
            <tableData breakPoint="0.8">
                      39.373565103312565      61.8727451623483      84.37192522138405
                -10.0    0.1007045 0.1010324 0.1009299
                -5.0    0.0483388 0.0481526 0.047816
                0.0    -0.0092675 -0.0092599 -0.0082164
                5.0    -0.0592156 -0.0591442 -0.0588648
                10.0    -0.115307  -0.1158573 -0.1403367
                </tableData>
            <tableData breakPoint="2.4">
                      39.373565103312565      61.8727451623483      84.37192522138405
                -10.0    0.098201  0.0987904 0.0981016
                -5.0    0.0452021 0.0449121 0.0444586
                0.0    -0.0082495 -0.0082223 -0.0069912
                5.0    -0.0633963 -0.063443  -0.0633867
                10.0    -0.1058871 -0.105277  -0.1322901
                </tableData>
            <tableData breakPoint="4.0">
                      39.373565103312565      61.8727451623483      84.37192522138405
                -10.0    0.0886462 0.0892797 0.0889274
                -5.0    0.047836  0.0474955 0.0477714
                0.0    0.0004357 0.0010393 0.0024843
                5.0    -0.0527589 -0.0524197 -0.049576
                10.0    -0.1061087 -0.1055471 -0.1336929
                </tableData>
            <tableData breakPoint="5.6">
                      39.373565103312565      61.8727451623483      84.37192522138405
                -10.0    0.0661481 0.0682138 0.0729844
                -5.0    0.0261981 0.025825  0.0253479
                0.0    -0.0188072 -0.0189498 -0.0172941
                5.0    -0.0360986 -0.0356875 -0.0328233
                10.0    -0.07086   -0.0704824 -0.1038565
                </tableData>
            <tableData breakPoint="7.2">
                      39.373565103312565      61.8727451623483      84.37192522138405
                -10.0    0.0521064 0.0530184 0.0574432
                -5.0    0.0371207 0.0371926 0.0372353
                0.0    -0.0005463 -0.0006366  0.000621
                5.0    -0.0223034 -0.0234202 -0.0240996
                10.0    -0.0678817 -0.0674332 -0.1024397
                </tableData>
            <tableData breakPoint="8.8">
                      39.373565103312565      61.8727451623483      84.37192522138405
                -10.0    0.0678282 0.0690203 0.0982027
                -5.0    0.0256491 0.0257379 0.0259904
                0.0    -0.0061235 -0.0062238 -0.0048507
                5.0    -0.0247971 -0.0233496 -0.0238553
                10.0    -0.0762036 -0.0759654 -0.0846416
                </tableData>
            <tableData breakPoint="10.4">
                      39.373565103312565      61.8727451623483      84.37192522138405
                -10.0    0.0534989 0.0552647 0.0863326
                -5.0    0.0444278 0.0445375 0.0449091
                0.0    -0.0105994 -0.0106594 -0.0091475
                5.0    -0.0548467 -0.0550932 -0.0555713
                10.0    -0.0641489 -0.0595082 -0.0673151
                </tableData>
            <tableData breakPoint="12.0">
                      39.373565103312565      61.8727451623483      84.37192522138405
                -10.0    0.0801834 0.0818443 0.0835008
                -5.0    0.0541563 0.0543476 0.0548371
                0.0    0.0070336 0.0069778 0.0085241
                5.0    -0.0638017 -0.0641457 -0.0647561
                10.0    -0.1060205 -0.1056849 -0.1307787
                </tableData>
        </table>
    </function>
    <function name="aero/coefficient/CMm__beta_rad">
        <description>CMm__beta_rad = dCMm__beta_rad * beta_rad</description>
        <product>
            <property>aero/coefficient/dCMm__beta_rad</property>
            <property>aero/beta-rad</property>
        </product>
    </function>
    <function name="aero/coefficient/dCMm__dpHat_rps">
        <description>dCMm__dpHat_rps</description>
        <table>
            <independentVar lookup="row">aero/beta-deg</independentVar>
            <independentVar lookup="column">velocities/vt-fps</independentVar>
            <independentVar lookup="table">aero/alpha-deg</independentVar>
            <tableData breakPoint="-4.0">
                      39.373565103312565      61.8727451623483      84.37192522138405
                -10.0    -0.0161151 -0.0154257 -0.0144716
                -5.0    -0.0062177 -0.005409  -0.0042233
                0.0    0.0032486 0.004219  0.0056327
                5.0    0.0139102 0.015045  0.0166799
                10.0    0.0240667 0.0253172 0.023727
                </tableData>
            <tableData breakPoint="-2.4">
                      39.373565103312565      61.8727451623483      84.37192522138405
                -10.0    -0.0146137 -0.0142915 -0.0099296
                -5.0    -0.0077755 -0.0074082 -0.0068816
                0.0    -0.001737  -0.0013193 -0.0007028
                5.0    0.006524  0.0069644 0.0076173
                10.0    0.0150938 0.0155375 0.01591
                </tableData>
            <tableData breakPoint="-0.8">
                      39.373565103312565      61.8727451623483      84.37192522138405
                -10.0    -0.016364  -0.0163407 -0.01635
                -5.0    -0.01221   -0.0122588 -0.0123428
                0.0    -0.009154  -0.0092757 -0.0094388
                5.0    -0.0036619 -0.0038223 -0.0038983
                10.0    0.0050716 0.0048753 0.0049419
                </tableData>
            <tableData breakPoint="0.8">
                      39.373565103312565      61.8727451623483      84.37192522138405
                -10.0    -0.0171242 -0.0172482 -0.0174494
                -5.0    -0.0145286 -0.0154708 -0.0159328
                0.0    -0.0135192 -0.0136827 -0.0136907
                5.0    -0.0086859 -0.0086331 -0.0089151
                10.0    0.0052919 0.0055875 0.0060219
                </tableData>
            <tableData breakPoint="2.4">
                      39.373565103312565      61.8727451623483      84.37192522138405
                -10.0    -0.0180075 -0.0182153 -0.0184141
                -5.0    -0.0125095 -0.0123963 -0.0122694
                0.0    -0.0078594 -0.0067104 -0.0050714
                5.0    0.0026147 0.0038108 0.0055074
                10.0    0.0183977 0.0197181 0.0213734
                </tableData>
            <tableData breakPoint="4.0">
                      39.373565103312565      61.8727451623483      84.37192522138405
                -10.0    -0.0198702 -0.0197996 -0.0199201
                -5.0    -0.0071225 -0.0057673 -0.0038532
                0.0    0.0101008 0.0115068 0.0133405
                5.0    0.0189879 0.0206421 0.0229863
                10.0    0.0282488 0.0294235 0.025135
                </tableData>
            <tableData breakPoint="5.6">
                      39.373565103312565      61.8727451623483      84.37192522138405
                -10.0    -0.0248603 -0.0246489 -0.0245698
                -5.0    -0.0066637 -0.0065906 -0.0064916
                0.0    0.0134424 0.0127256 0.0117027
                5.0    0.0246102 0.0252957 0.0262668
                10.0    0.0409158 0.0420936 0.0372584
                </tableData>
            <tableData breakPoint="7.2">
                      39.373565103312565      61.8727451623483      84.37192522138405
                -10.0    -0.0100297 -0.0091499 -0.0078773
                -5.0    0.0167341 0.0159807 0.0149433
                0.0    0.0466696 0.0464157 0.0460548
                5.0    0.0722684 0.0719898 0.0715457
                10.0    0.0813405 0.0822014 0.076651
                </tableData>
            <tableData breakPoint="8.8">
                      39.373565103312565      61.8727451623483      84.37192522138405
                -10.0    -0.0097681 -0.0098966 -0.0032565
                -5.0    0.0318444 0.0317759 0.0316983
                0.0    0.063206  0.0630523 0.0630708
                5.0    0.0820827 0.0806759 0.0799061
                10.0    0.0992229 0.098066  0.0961227
                </tableData>
            <tableData breakPoint="10.4">
                      39.373565103312565      61.8727451623483      84.37192522138405
                -10.0    -0.0197037 -0.0198452 -0.0129751
                -5.0    0.0068748 0.0062782 0.0054784
                0.0    0.0284033 0.0278626 0.0271072
                5.0    0.0551856 0.0571584 0.0564548
                10.0    0.0808031 0.0802766 0.0799662
                </tableData>
            <tableData breakPoint="12.0">
                      39.373565103312565      61.8727451623483      84.37192522138405
                -10.0    -0.0293527 -0.0293685 -0.029606
                -5.0    -0.0178456 -0.0179455 -0.0180592
                0.0    -0.0064229 -0.0066022 -0.0068538
                5.0    0.0168599 0.0164584 0.0158677
                10.0    0.0522827 0.0499346 0.051816
                </tableData>
        </table>
    </function>
    <function name="aero/coefficient/CMm__dpHat_rps">
        <description>CMm__dpHat_rps = dCMm__dpHat_rps * dpHat_rps</description>
        <product>
            <property>aero/coefficient/dCMm__dpHat_rps</property>
            <property>velocities/p-aero-rad_sec</property>
            <property>aero/bi2vel</property>
        </product>
    </function>
    <function name="aero/coefficient/dCMm__dqHat_rps">
        <description>dCMm__dqHat_rps</description>
        <table>
            <independentVar lookup="row">aero/beta-deg</independentVar>
            <independentVar lookup="column">velocities/vt-fps</independentVar>
            <independentVar lookup="table">aero/alpha-deg</independentVar>
            <tableData breakPoint="-4.0">
                      39.373565103312565      61.8727451623483      84.37192522138405
                -10.0    -3.0196465 -3.0230572 -3.054865
                -5.0    -3.0521323 -3.0551874 -3.059608
                0.0    -3.0598013 -3.0628642 -3.0673015
                5.0    -3.0517056 -3.0547573 -3.0591874
                10.0    -3.0192023 -3.0226181 -3.0544308
                </tableData>
            <tableData breakPoint="-2.4">
                      39.373565103312565      61.8727451623483      84.37192522138405
                -10.0    -3.0269488 -3.0296456 -3.0335681
                -5.0    -3.0679899 -3.0703115 -3.0736457
                0.0    -3.0771544 -3.0794    -3.0826535
                5.0    -3.0679629 -3.0702831 -3.0735794
                10.0    -3.026153  -3.0288383 -3.0339699
                </tableData>
            <tableData breakPoint="-0.8">
                      39.373565103312565      61.8727451623483      84.37192522138405
                -10.0    -3.0463553 -3.049117  -3.0531371
                -5.0    -3.0920271 -3.0943033 -3.0975969
                0.0    -3.106454  -3.1085036 -3.1115966
                5.0    -3.0919548 -3.0942711 -3.0963731
                10.0    -3.0462593 -3.049038  -3.0531079
                </tableData>
            <tableData breakPoint="0.8">
                      39.373565103312565      61.8727451623483      84.37192522138405
                -10.0    -3.0745316 -3.0779063 -3.0825909
                -5.0    -3.1227367 -3.1255218 -3.1294863
                0.0    -3.1391972 -3.1415761 -3.144236
                5.0    -3.1226835 -3.1252568 -3.1294729
                10.0    -3.0744893 -3.0777789 -3.0825441
                </tableData>
            <tableData breakPoint="2.4">
                      39.373565103312565      61.8727451623483      84.37192522138405
                -10.0    -3.0901024 -3.0912959 -3.0948402
                -5.0    -3.1543762 -3.1578728 -3.1628567
                0.0    -3.1740856 -3.1791364 -3.1839568
                5.0    -3.1542778 -3.1577684 -3.1627533
                10.0    -3.0900983 -3.0912953 -3.094853
                </tableData>
            <tableData breakPoint="4.0">
                      39.373565103312565      61.8727451623483      84.37192522138405
                -10.0    -3.013685  -3.0111769 -3.0094379
                -5.0    -3.1658203 -3.1623744 -3.1565754
                0.0    -3.1878645 -3.1899742 -3.19439
                5.0    -3.1657884 -3.1687091 -3.1565417
                10.0    -3.0138145 -3.0112457 -3.0094978
                </tableData>
            <tableData breakPoint="5.6">
                      39.373565103312565      61.8727451623483      84.37192522138405
                -10.0    -2.9885077 -2.9829085 -3.0258112
                -5.0    -3.0699515 -3.0720253 -3.0749946
                0.0    -3.1458284 -3.1466989 -3.1480314
                5.0    -3.0700004 -3.0720775 -3.0750815
                10.0    -2.9885215 -2.9828899 -3.0258664
                </tableData>
            <tableData breakPoint="7.2">
                      39.373565103312565      61.8727451623483      84.37192522138405
                -10.0    -2.8124225 -2.8058883 -2.8450314
                -5.0    -2.8199065 -2.8161072 -2.8110759
                0.0    -2.821237  -2.8183432 -2.8143094
                5.0    -2.8197326 -2.8160614 -2.8111062
                10.0    -2.8124268 -2.8058529 -2.8449991
                </tableData>
            <tableData breakPoint="8.8">
                      39.373565103312565      61.8727451623483      84.37192522138405
                -10.0    -2.4991499 -2.4978848 -2.495782
                -5.0    -2.5174814 -2.5150688 -2.5116548
                0.0    -2.4999069 -2.4960397 -2.4908736
                5.0    -2.5208866 -2.5149499 -2.5115462
                10.0    -2.4998441 -2.4985808 -2.4963212
                </tableData>
            <tableData breakPoint="10.4">
                      39.373565103312565      61.8727451623483      84.37192522138405
                -10.0    -2.3601057 -2.358068  -2.3552517
                -5.0    -2.2604354 -2.2602538 -2.2600283
                0.0    -2.2793508 -2.279165  -2.2789435
                5.0    -2.2627431 -2.2624426 -2.2622096
                10.0    -2.3598874 -2.3583568 -2.3550142
                </tableData>
            <tableData breakPoint="12.0">
                      39.373565103312565      61.8727451623483      84.37192522138405
                -10.0    -2.2320993 -2.2331869 -2.2313393
                -5.0    -2.2155891 -2.2154097 -2.215256
                0.0    -2.2586235 -2.2585642 -2.2586835
                5.0    -2.2154677 -2.2152888 -2.2151856
                10.0    -2.2328634 -2.233037  -2.2312751
                </tableData>
        </table>
    </function>
    <function name="aero/coefficient/CMm__dqHat_rps">
        <description>CMm__dqHat_rps = dCMm__dqHat_rps * dqHat_rps</description>
        <product>
            <property>aero/coefficient/dCMm__dqHat_rps</property>
            <property>velocities/q-aero-rad_sec</property>
            <property>aero/ci2vel</property>
        </product>
    </function>
    <function name="aero/coefficient/dCMm__drHat_rps">
        <description>dCMm__drHat_rps</description>
        <table>
            <independentVar lookup="row">aero/beta-deg</independentVar>
            <independentVar lookup="column">velocities/vt-fps</independentVar>
            <independentVar lookup="table">aero/alpha-deg</independentVar>
            <tableData breakPoint="-4.0">
                      39.373565103312565      61.8727451623483      84.37192522138405
                -10.0    -0.0643757 -0.0645492 -0.0694924
                -5.0    -0.0365831 -0.0365014 -0.0362473
                0.0    -0.0099723 -0.0099902 -0.009365
                5.0    0.021172  0.0208152 0.0217312
                10.0    0.048463  0.0484354 0.048047
                </tableData>
            <tableData breakPoint="-2.4">
                      39.373565103312565      61.8727451623483      84.37192522138405
                -10.0    -0.067839  -0.0679987 -0.0701158
                -5.0    -0.0381066 -0.0380054 -0.0377922
                0.0    -0.0105555 -0.0105795 -0.0098766
                5.0    0.0228835 0.0225261 0.023396
                10.0    0.0515909 0.0516168 0.0552528
                </tableData>
            <tableData breakPoint="-0.8">
                      39.373565103312565      61.8727451623483      84.37192522138405
                -10.0    -0.0708077 -0.0709401 -0.076885
                -5.0    -0.0402551 -0.0402169 -0.0400448
                0.0    -0.0111459 -0.0111775 -0.0104008
                5.0    0.024569  0.0241718 0.0253742
                10.0    0.0541246 0.0542036 0.054017
                </tableData>
            <tableData breakPoint="0.8">
                      39.373565103312565      61.8727451623483      84.37192522138405
                -10.0    -0.0737679 -0.0739439 -0.0806698
                -5.0    -0.0417145 -0.0417081 -0.0415911
                0.0    -0.0115363 -0.0115752 -0.0107287
                5.0    0.0255381 0.0251076 0.0263545
                10.0    0.0565536 0.0567005 0.0566165
                </tableData>
            <tableData breakPoint="2.4">
                      39.373565103312565      61.8727451623483      84.37192522138405
                -10.0    -0.073943  -0.0738175 -0.0810882
                -5.0    -0.0429686 -0.0429935 -0.042939
                0.0    -0.0120603 -0.0121133 -0.0109058
                5.0    0.0263448 0.0258757 0.0273179
                10.0    0.0573598 0.0575768 0.057383
                </tableData>
            <tableData breakPoint="4.0">
                      39.373565103312565      61.8727451623483      84.37192522138405
                -10.0    -0.0703955 -0.0698956 -0.0774199
                -5.0    -0.0406998 -0.0401709 -0.0389904
                0.0    -0.0112221 -0.0114993 -0.0109798
                5.0    0.025618  0.0247188 0.0262613
                10.0    0.054399  0.0545551 0.0543441
                </tableData>
            <tableData breakPoint="5.6">
                      39.373565103312565      61.8727451623483      84.37192522138405
                -10.0    -0.0693463 -0.0690775 -0.0778579
                -5.0    -0.0377292 -0.0376342 -0.0374383
                0.0    -0.0099838 -0.0111537 -0.0107845
                5.0    0.0210901 0.020387  0.0219247
                10.0    0.0526776 0.053817  0.0550112
                </tableData>
            <tableData breakPoint="7.2">
                      39.373565103312565      61.8727451623483      84.37192522138405
                -10.0    -0.0615321 -0.0608966 -0.0696702
                -5.0    -0.031665  -0.032994  -0.0331087
                0.0    -0.0087374 -0.008751  -0.0075393
                5.0    0.0286927 0.0280555 0.0299873
                10.0    0.0541676 0.0552393 0.0565623
                </tableData>
            <tableData breakPoint="8.8">
                      39.373565103312565      61.8727451623483      84.37192522138405
                -10.0    -0.0499003 -0.0491733 -0.0520492
                -5.0    -0.0162968 -0.0162064 -0.0160916
                0.0    0.005759  0.0057981 0.0071448
                5.0    0.0210251 0.0208579 0.0229359
                10.0    0.0492897 0.0495886 0.056678
                </tableData>
            <tableData breakPoint="10.4">
                      39.373565103312565      61.8727451623483      84.37192522138405
                -10.0    -0.0466465 -0.0460868 -0.0495876
                -5.0    -0.0275017 -0.0280133 -0.0288268
                0.0    -0.0110061 -0.0112481 -0.0101976
                5.0    0.0255877 0.0251552 0.0271036
                10.0    0.0449316 0.0456638 0.0537501
                </tableData>
            <tableData breakPoint="12.0">
                      39.373565103312565      61.8727451623483      84.37192522138405
                -10.0    -0.0652121 -0.0648311 -0.0724514
                -5.0    -0.0416104 -0.0418584 -0.0420092
                0.0    -0.0126454 -0.0127679 -0.0114878
                5.0    0.0267119 0.0264161 0.0282894
                10.0    0.0593147 0.0599011 0.060468
                </tableData>
        </table>
    </function>
    <function name="aero/coefficient/CMm__drHat_rps">
        <description>CMm__drHat_rps = dCMm__drHat_rps * drHat_rps</description>
        <product>
            <property>aero/coefficient/dCMm__drHat_rps</property>
            <property>velocities/r-aero-rad_sec</property>
            <property>aero/bi2vel</property>
        </product>
    </function>
    <function name="aero/coefficient/dCMm__dAilL_rad">
        <description>dCMm__dAilL_rad</description>
        <table>
            <independentVar lookup="row">aero/beta-deg</independentVar>
            <independentVar lookup="column">velocities/vt-fps</independentVar>
            <independentVar lookup="table">aero/alpha-deg</independentVar>
            <tableData breakPoint="-4.0">
                      39.373565103312565      61.8727451623483      84.37192522138405
                -10.0    -0.1602728 -0.1604603 -0.1740062
                -5.0    -0.1671635 -0.1673617 -0.1676387
                0.0    -0.1723662 -0.1725741 -0.1728781
                5.0    -0.1748443 -0.1750677 -0.1753987
                10.0    -0.1736542 -0.1738792 -0.1742179
                </tableData>
            <tableData breakPoint="-2.4">
                      39.373565103312565      61.8727451623483      84.37192522138405
                -10.0    -0.1624089 -0.1625535 -0.1628671
                -5.0    -0.1693154 -0.1694665 -0.169683
                0.0    -0.1736964 -0.1738558 -0.1734972
                5.0    -0.1751663 -0.1753316 -0.1755701
                10.0    -0.1739057 -0.1740655 -0.1742181
                </tableData>
            <tableData breakPoint="-0.8">
                      39.373565103312565      61.8727451623483      84.37192522138405
                -10.0    -0.165335  -0.1652662 -0.1654921
                -5.0    -0.1718676 -0.1720074 -0.1725007
                0.0    -0.1757526 -0.1759032 -0.1761209
                5.0    -0.1761481 -0.1762951 -0.1759323
                10.0    -0.174345  -0.1744891 -0.1747187
                </tableData>
            <tableData breakPoint="0.8">
                      39.373565103312565      61.8727451623483      84.37192522138405
                -10.0    -0.168219  -0.1684904 -0.168751
                -5.0    -0.1744257 -0.1746243 -0.1749094
                0.0    -0.1781081 -0.178294  -0.1785795
                5.0    -0.1779752 -0.1781532 -0.1783988
                10.0    -0.1759804 -0.1761314 -0.1763628
                </tableData>
            <tableData breakPoint="2.4">
                      39.373565103312565      61.8727451623483      84.37192522138405
                -10.0    -0.1700564 -0.169389  -0.1689466
                -5.0    -0.1769482 -0.1771987 -0.1775619
                0.0    -0.1803785 -0.1806272 -0.1809877
                5.0    -0.1798161 -0.180035  -0.1803583
                10.0    -0.177731  -0.1779283 -0.1781406
                </tableData>
            <tableData breakPoint="4.0">
                      39.373565103312565      61.8727451623483      84.37192522138405
                -10.0    -0.1686686 -0.1684641 -0.1665312
                -5.0    -0.1770519 -0.1772934 -0.1756515
                0.0    -0.1813189 -0.1812473 -0.1815979
                5.0    -0.1818218 -0.182116  -0.1825174
                10.0    -0.1793508 -0.1795676 -0.1798345
                </tableData>
            <tableData breakPoint="5.6">
                      39.373565103312565      61.8727451623483      84.37192522138405
                -10.0    -0.1660889 -0.166196  -0.1661449
                -5.0    -0.1730648 -0.1731219 -0.1732622
                0.0    -0.1779641 -0.1780503 -0.1781659
                5.0    -0.1802675 -0.1805123 -0.1808411
                10.0    -0.178615  -0.1789499 -0.1759358
                </tableData>
            <tableData breakPoint="7.2">
                      39.373565103312565      61.8727451623483      84.37192522138405
                -10.0    -0.1614429 -0.1615189 -0.187306
                -5.0    -0.1704392 -0.170428  -0.1704409
                0.0    -0.1728505 -0.1729429 -0.1730239
                5.0    -0.1734577 -0.1734947 -0.1736251
                10.0    -0.1770865 -0.1771965 -0.1771053
                </tableData>
            <tableData breakPoint="8.8">
                      39.373565103312565      61.8727451623483      84.37192522138405
                -10.0    -0.126071  -0.1255826 -0.1250468
                -5.0    -0.128653  -0.128085  -0.1273183
                0.0    -0.1396723 -0.1389678 -0.1380063
                5.0    -0.1541718 -0.15222   -0.1519371
                10.0    -0.1545749 -0.1544638 -0.1539607
                </tableData>
            <tableData breakPoint="10.4">
                      39.373565103312565      61.8727451623483      84.37192522138405
                -10.0    -0.0992159 -0.0922087 -0.0926034
                -5.0    -0.0961406 -0.0960012 -0.0958861
                0.0    -0.10027   -0.1001996 -0.1000604
                5.0    -0.1050353 -0.1049163 -0.1047957
                10.0    -0.139595  -0.132961  -0.1324257
                </tableData>
            <tableData breakPoint="12.0">
                      39.373565103312565      61.8727451623483      84.37192522138405
                -10.0    -0.0838467 -0.0837703 -0.0840909
                -5.0    -0.0874023 -0.0873118 -0.0871645
                0.0    -0.0911846 -0.0910973 -0.0909794
                5.0    -0.0952106 -0.0951186 -0.0950086
                10.0    -0.099546  -0.0994224 -0.0994388
                </tableData>
        </table>
    </function>
    <function name="aero/coefficient/CMm__dAilL_rad">
        <description>CMm__dAilL_rad = dCMm__dAilL_rad * dAilL_rad</description>
        <product>
            <property>aero/coefficient/dCMm__dAilL_rad</property>
            <property>fcs/posAilL_rad</property>
        </product>
    </function>
    <function name="aero/coefficient/dCMm__dAilR_rad">
        <description>dCMm__dAilR_rad</description>
        <table>
            <independentVar lookup="row">aero/beta-deg</independentVar>
            <independentVar lookup="column">velocities/vt-fps</independentVar>
            <independentVar lookup="table">aero/alpha-deg</independentVar>
            <tableData breakPoint="-4.0">
                      39.373565103312565      61.8727451623483      84.37192522138405
                -10.0    -0.173559  -0.1737829 -0.1741314
                -5.0    -0.1748793 -0.1750933 -0.1754315
                0.0    -0.1721792 -0.1726072 -0.1729086
                5.0    -0.1673995 -0.1675953 -0.1678831
                10.0    -0.160326  -0.1605109 -0.1740678
                </tableData>
            <tableData breakPoint="-2.4">
                      39.373565103312565      61.8727451623483      84.37192522138405
                -10.0    -0.1738552 -0.1740204 -0.1741777
                -5.0    -0.1751636 -0.1753265 -0.1755623
                0.0    -0.1736989 -0.1738584 -0.1735334
                5.0    -0.1692885 -0.169444  -0.1696555
                10.0    -0.1623651 -0.1625038 -0.1628096
                </tableData>
            <tableData breakPoint="-0.8">
                      39.373565103312565      61.8727451623483      84.37192522138405
                -10.0    -0.1744321 -0.1745676 -0.1747724
                -5.0    -0.1761698 -0.176298  -0.1765056
                0.0    -0.1757451 -0.1758995 -0.1761202
                5.0    -0.1717368 -0.1719082 -0.1715441
                10.0    -0.1651089 -0.1650884 -0.1652533
                </tableData>
            <tableData breakPoint="0.8">
                      39.373565103312565      61.8727451623483      84.37192522138405
                -10.0    -0.1759717 -0.1761684 -0.1763602
                -5.0    -0.1779838 -0.178157  -0.1784128
                0.0    -0.1780947 -0.1782794 -0.1785709
                5.0    -0.1744155 -0.1746204 -0.1748988
                10.0    -0.1682276 -0.168446  -0.1687409
                </tableData>
            <tableData breakPoint="2.4">
                      39.373565103312565      61.8727451623483      84.37192522138405
                -10.0    -0.1777058 -0.1779058 -0.1781251
                -5.0    -0.1798206 -0.1800408 -0.1803652
                0.0    -0.1803727 -0.1806204 -0.1809619
                5.0    -0.1769593 -0.1771977 -0.1775566
                10.0    -0.1700567 -0.1694211 -0.168968
                </tableData>
            <tableData breakPoint="4.0">
                      39.373565103312565      61.8727451623483      84.37192522138405
                -10.0    -0.1793191 -0.1795278 -0.1798334
                -5.0    -0.1818134 -0.1820995 -0.182514
                0.0    -0.1813238 -0.1812749 -0.1816013
                5.0    -0.1770887 -0.1773546 -0.1756889
                10.0    -0.1686869 -0.1684639 -0.166596
                </tableData>
            <tableData breakPoint="5.6">
                      39.373565103312565      61.8727451623483      84.37192522138405
                -10.0    -0.178662  -0.178964  -0.1759686
                -5.0    -0.1802828 -0.1805184 -0.1808551
                0.0    -0.1779802 -0.1780658 -0.178181
                5.0    -0.1730939 -0.173166  -0.1732742
                10.0    -0.1660863 -0.1661926 -0.1661508
                </tableData>
            <tableData breakPoint="7.2">
                      39.373565103312565      61.8727451623483      84.37192522138405
                -10.0    -0.1770974 -0.1772266 -0.1771075
                -5.0    -0.1735537 -0.1735181 -0.1736117
                0.0    -0.1728894 -0.1729559 -0.1730646
                5.0    -0.1704107 -0.1704346 -0.170503
                10.0    -0.1614949 -0.1615563 -0.1873142
                </tableData>
            <tableData breakPoint="8.8">
                      39.373565103312565      61.8727451623483      84.37192522138405
                -10.0    -0.1546053 -0.1544214 -0.1539904
                -5.0    -0.1524665 -0.1522419 -0.1519648
                0.0    -0.1397107 -0.1389957 -0.1380381
                5.0    -0.1304674 -0.1281799 -0.1274172
                10.0    -0.126148  -0.1257086 -0.1251156
                </tableData>
            <tableData breakPoint="10.4">
                      39.373565103312565      61.8727451623483      84.37192522138405
                -10.0    -0.1331992 -0.1333241 -0.1323158
                -5.0    -0.1050138 -0.1049303 -0.1048204
                0.0    -0.1003571 -0.1002801 -0.1001198
                5.0    -0.096206  -0.0960902 -0.0960151
                10.0    -0.0926251 -0.0925306 -0.0927132
                </tableData>
            <tableData breakPoint="12.0">
                      39.373565103312565      61.8727451623483      84.37192522138405
                -10.0    -0.1000603 -0.099958  -0.0999584
                -5.0    -0.0952712 -0.0951835 -0.0950674
                0.0    -0.0912847 -0.0911815 -0.0910637
                5.0    -0.0874763 -0.0873942 -0.0872582
                10.0    -0.0839873 -0.0840804 -0.0836446
                </tableData>
        </table>
    </function>
    <function name="aero/coefficient/CMm__dAilR_rad">
        <description>CMm__dAilR_rad = dCMm__dAilR_rad * dAilR_rad</description>
        <product>
            <property>aero/coefficient/dCMm__dAilR_rad</property>
            <property>fcs/posAilR_rad</property>
        </product>
    </function>
    <function name="aero/coefficient/dCMm__dRudevL_rad">
        <description>dCMm__dRudevL_rad</description>
        <table>
            <independentVar lookup="row">aero/beta-deg</independentVar>
            <independentVar lookup="column">velocities/vt-fps</independentVar>
            <independentVar lookup="table">aero/alpha-deg</independentVar>
            <tableData breakPoint="-4.0">
                      39.373565103312565      61.8727451623483      84.37192522138405
                -10.0    -0.2073212 -0.2074333 -0.2209146
                -5.0    -0.2015409 -0.201635  -0.2017597
                0.0    -0.192683  -0.1927938 -0.1929545
                5.0    -0.1820265 -0.1821473 -0.182342
                10.0    -0.1710527 -0.1711937 -0.1714293
                </tableData>
            <tableData breakPoint="-2.4">
                      39.373565103312565      61.8727451623483      84.37192522138405
                -10.0    -0.2077233 -0.207846  -0.2081562
                -5.0    -0.2021712 -0.2022644 -0.2035584
                0.0    -0.1928743 -0.1929759 -0.1931219
                5.0    -0.1815539 -0.1816741 -0.1818585
                10.0    -0.167342  -0.1674619 -0.1683531
                </tableData>
            <tableData breakPoint="-0.8">
                      39.373565103312565      61.8727451623483      84.37192522138405
                -10.0    -0.2077278 -0.2078511 -0.2080109
                -5.0    -0.2024013 -0.2024798 -0.2026083
                0.0    -0.1925374 -0.1926352 -0.1927801
                5.0    -0.1802534 -0.1803686 -0.1799458
                10.0    -0.1658547 -0.165979  -0.1662
                </tableData>
            <tableData breakPoint="0.8">
                      39.373565103312565      61.8727451623483      84.37192522138405
                -10.0    -0.2075282 -0.2077001 -0.2078313
                -5.0    -0.2020432 -0.2021444 -0.2022836
                0.0    -0.1919093 -0.191998  -0.1921604
                5.0    -0.1788494 -0.1789597 -0.1791209
                10.0    -0.1637796 -0.1638739 -0.1640448
                </tableData>
            <tableData breakPoint="2.4">
                      39.373565103312565      61.8727451623483      84.37192522138405
                -10.0    -0.2073726 -0.207519  -0.207674
                -5.0    -0.201307  -0.2014091 -0.2015611
                0.0    -0.1913581 -0.1914473 -0.1915767
                5.0    -0.1776167 -0.1777094 -0.1778729
                10.0    -0.1619219 -0.1620192 -0.162256
                </tableData>
            <tableData breakPoint="4.0">
                      39.373565103312565      61.8727451623483      84.37192522138405
                -10.0    -0.2062762 -0.2064214 -0.2065709
                -5.0    -0.200745  -0.2008406 -0.2010055
                0.0    -0.1905056 -0.1905489 -0.1906722
                5.0    -0.1761786 -0.1762833 -0.1764207
                10.0    -0.1604442 -0.1604838 -0.1606094
                </tableData>
            <tableData breakPoint="5.6">
                      39.373565103312565      61.8727451623483      84.37192522138405
                -10.0    -0.2058067 -0.2059486 -0.2061247
                -5.0    -0.1998015 -0.1999065 -0.2000651
                0.0    -0.1892231 -0.1893154 -0.1894318
                5.0    -0.1719961 -0.1720792 -0.172193
                10.0    -0.1556843 -0.155752  -0.1558686
                </tableData>
            <tableData breakPoint="7.2">
                      39.373565103312565      61.8727451623483      84.37192522138405
                -10.0    -0.2056358 -0.2057915 -0.2323464
                -5.0    -0.1980912 -0.1980958 -0.1982949
                0.0    -0.1864729 -0.1865582 -0.1866214
                5.0    -0.1693199 -0.1693943 -0.1695112
                10.0    -0.1535452 -0.1535848 -0.1536756
                </tableData>
            <tableData breakPoint="8.8">
                      39.373565103312565      61.8727451623483      84.37192522138405
                -10.0    -0.2039275 -0.2040976 -0.2045592
                -5.0    -0.1954972 -0.1955851 -0.1957611
                0.0    -0.1842782 -0.1843791 -0.1844574
                5.0    -0.1689086 -0.1672541 -0.1673793
                10.0    -0.149905  -0.1499888 -0.1457046
                </tableData>
            <tableData breakPoint="10.4">
                      39.373565103312565      61.8727451623483      84.37192522138405
                -10.0    -0.2035252 -0.2033743 -0.2041624
                -5.0    -0.1931308 -0.1932564 -0.1934211
                0.0    -0.1825588 -0.1826888 -0.1828001
                5.0    -0.1649941 -0.1650217 -0.1651067
                10.0    -0.1469964 -0.1470087 -0.1468168
                </tableData>
            <tableData breakPoint="12.0">
                      39.373565103312565      61.8727451623483      84.37192522138405
                -10.0    -0.2027175 -0.2028869 -0.2029202
                -5.0    -0.1907639 -0.1908768 -0.1910401
                0.0    -0.1819751 -0.1820728 -0.1822597
                5.0    -0.1622692 -0.1717529 -0.1624281
                10.0    -0.1460628 -0.1460657 -0.1464386
                </tableData>
        </table>
    </function>
    <function name="aero/coefficient/CMm__dRudevL_rad">
        <description>CMm__dRudevL_rad = dCMm__dRudevL_rad * dRudevL_rad</description>
        <product>
            <property>aero/coefficient/dCMm__dRudevL_rad</property>
            <property>fcs/posRudevL_rad</property>
        </product>
    </function>
    <function name="aero/coefficient/dCMm__dRudevR_rad">
        <description>dCMm__dRudevR_rad</description>
        <table>
            <independentVar lookup="row">aero/beta-deg</independentVar>
            <independentVar lookup="column">velocities/vt-fps</independentVar>
            <independentVar lookup="table">aero/alpha-deg</independentVar>
            <tableData breakPoint="-4.0">
                      39.373565103312565      61.8727451623483      84.37192522138405
                -10.0    -0.1701199 -0.1701402 -0.1703635
                -5.0    -0.182128  -0.1822695 -0.1824453
                0.0    -0.1925785 -0.1926895 -0.1928498
                5.0    -0.2018967 -0.2019881 -0.2021227
                10.0    -0.2085251 -0.2086311 -0.2221165
                </tableData>
            <tableData breakPoint="-2.4">
                      39.373565103312565      61.8727451623483      84.37192522138405
                -10.0    -0.1675228 -0.1676539 -0.1677094
                -5.0    -0.1815417 -0.1816641 -0.1818446
                0.0    -0.1928138 -0.1929098 -0.1930611
                5.0    -0.2021424 -0.2022352 -0.2023649
                10.0    -0.2076379 -0.2077535 -0.2080577
                </tableData>
            <tableData breakPoint="-0.8">
                      39.373565103312565      61.8727451623483      84.37192522138405
                -10.0    -0.1658438 -0.1659617 -0.1661524
                -5.0    -0.1802923 -0.180388  -0.1805537
                0.0    -0.1925368 -0.1926408 -0.1927848
                5.0    -0.2022543 -0.2024753 -0.2020082
                10.0    -0.2076887 -0.2078247 -0.2080087
                </tableData>
            <tableData breakPoint="0.8">
                      39.373565103312565      61.8727451623483      84.37192522138405
                -10.0    -0.1637733 -0.1639197 -0.1640493
                -5.0    -0.1788636 -0.1789727 -0.1791334
                0.0    -0.1919206 -0.1920075 -0.1921551
                5.0    -0.2020141 -0.2021168 -0.2022429
                10.0    -0.2075244 -0.2076591 -0.2078307
                </tableData>
            <tableData breakPoint="2.4">
                      39.373565103312565      61.8727451623483      84.37192522138405
                -10.0    -0.1619032 -0.1620066 -0.1622451
                -5.0    -0.1776168 -0.1777241 -0.1778097
                0.0    -0.1913668 -0.1914566 -0.1915856
                5.0    -0.2012978 -0.2013976 -0.2015446
                10.0    -0.2073915 -0.2075321 -0.2076877
                </tableData>
            <tableData breakPoint="4.0">
                      39.373565103312565      61.8727451623483      84.37192522138405
                -10.0    -0.1603808 -0.1604631 -0.160577
                -5.0    -0.1761659 -0.176263  -0.1764027
                0.0    -0.1905034 -0.1905515 -0.1906715
                5.0    -0.2007298 -0.2008449 -0.2009929
                10.0    -0.2063231 -0.2064227 -0.2065841
                </tableData>
            <tableData breakPoint="5.6">
                      39.373565103312565      61.8727451623483      84.37192522138405
                -10.0    -0.155676  -0.1557488 -0.155825
                -5.0    -0.1719918 -0.1720716 -0.1721906
                0.0    -0.1892576 -0.1893523 -0.1894686
                5.0    -0.1997964 -0.1999229 -0.2000724
                10.0    -0.2058093 -0.2059599 -0.2061398
                </tableData>
            <tableData breakPoint="7.2">
                      39.373565103312565      61.8727451623483      84.37192522138405
                -10.0    -0.1535086 -0.1535622 -0.1536545
                -5.0    -0.1693898 -0.1693863 -0.169491
                0.0    -0.1863438 -0.1864339 -0.1865478
                5.0    -0.1980677 -0.1980827 -0.1982961
                10.0    -0.2056373 -0.2057823 -0.2323339
                </tableData>
            <tableData breakPoint="8.8">
                      39.373565103312565      61.8727451623483      84.37192522138405
                -10.0    -0.1498657 -0.1499031 -0.1496873
                -5.0    -0.1671881 -0.1672493 -0.167371
                0.0    -0.1843025 -0.1844018 -0.1844821
                5.0    -0.1972124 -0.1955838 -0.1957675
                10.0    -0.2039092 -0.2041568 -0.204549
                </tableData>
            <tableData breakPoint="10.4">
                      39.373565103312565      61.8727451623483      84.37192522138405
                -10.0    -0.1469201 -0.1466527 -0.1466787
                -5.0    -0.1649239 -0.1650089 -0.1651123
                0.0    -0.1825839 -0.1826947 -0.1828082
                5.0    -0.1931603 -0.1932298 -0.1933968
                10.0    -0.2032487 -0.2034037 -0.2039103
                </tableData>
            <tableData breakPoint="12.0">
                      39.373565103312565      61.8727451623483      84.37192522138405
                -10.0    -0.1460436 -0.1460831 -0.1463952
                -5.0    -0.1622554 -0.1623357 -0.1624192
                0.0    -0.1819846 -0.182075  -0.1822412
                5.0    -0.1907498 -0.1909006 -0.1909999
                10.0    -0.2027431 -0.2028966 -0.2029452
                </tableData>
        </table>
    </function>
    <function name="aero/coefficient/CMm__dRudevR_rad">
        <description>CMm__dRudevR_rad = dCMm__dRudevR_rad * dRudevR_rad</description>
        <product>
            <property>aero/coefficient/dCMm__dRudevR_rad</property>
            <property>fcs/posRudevR_rad</property>
        </product>
    </function>
    <function name="aero/coefficient/CMm">
        <description>CMm summation</description>
        <sum>
            <property>aero/coefficient/CMm__zero</property>
            <property>aero/coefficient/CMm__alpha_rad</property>
            <property>aero/coefficient/CMm__beta_rad</property>
            <property>aero/coefficient/CMm__dpHat_rps</property>
            <property>aero/coefficient/CMm__dqHat_rps</property>
            <property>aero/coefficient/CMm__drHat_rps</property>
            <property>aero/coefficient/CMm__dAilL_rad</property>
            <property>aero/coefficient/CMm__dAilR_rad</property>
            <property>aero/coefficient/CMm__dRudevL_rad</property>
            <property>aero/coefficient/CMm__dRudevR_rad</property>
        </sum>
    </function>
    <function name="aero/coefficient/CMn__zero">
        <description>CMn__zero</description>
        <table>
            <independentVar lookup="row">aero/beta-deg</independentVar>
            <independentVar lookup="column">velocities/vt-fps</independentVar>
            <independentVar lookup="table">aero/alpha-deg</independentVar>
            <tableData breakPoint="-4.0">
                      39.373565103312565      61.8727451623483      84.37192522138405
                -10.0    0.00087133 0.00097226 0.000979
                -5.0    -0.00022301 -0.00022129 -0.00021857
                0.0    -2.59950812e-06 -2.60648944e-06 -2.64837734e-06
                5.0    -2.48528231e-05 -3.59246014e-05 -5.13995507e-05
                10.0    -0.0016035  -0.001753   -0.00196345
                </tableData>
            <tableData breakPoint="-2.4">
                      39.373565103312565      61.8727451623483      84.37192522138405
                -10.0    0.00077468 0.00088685 0.00144588
                -5.0    -4.91501525e-05 -4.15509748e-05 -3.09294421e-05
                0.0    -7.48672588e-08 -7.48672588e-08 -2.46607657e-07
                5.0    -0.00010202 -0.00011721 -0.00013908
                10.0    -0.00144949 -0.00160348 -0.00170131
                </tableData>
            <tableData breakPoint="-0.8">
                      39.373565103312565      61.8727451623483      84.37192522138405
                -10.0    0.00045194 0.00055516 0.00070368
                -5.0    -8.02182074e-05 -6.79559525e-05 -5.61363522e-05
                0.0    -1.15358897e-07 -1.18151424e-07 -1.16755161e-07
                5.0    -0.00014593 -0.00016124 -0.00018707
                10.0    -0.00109794 -0.00125209 -0.00163627
                </tableData>
            <tableData breakPoint="0.8">
                      39.373565103312565      61.8727451623483      84.37192522138405
                -10.0    0.00066512 0.00077694 0.00094223
                -5.0    -0.00031821 -0.00031143 -0.00030085
                0.0    -6.64896784e-08 -6.64896784e-08 -6.23008882e-08
                5.0    -9.37444341e-05 -1.11469373e-04 -1.38116194e-04
                10.0    -0.00059554 -0.00074885 -0.0010138
                </tableData>
            <tableData breakPoint="2.4">
                      39.373565103312565      61.8727451623483      84.37192522138405
                -10.0    0.00025173 0.00033817 0.0004554
                -5.0    -0.00062064 -0.00061932 -0.0006159
                0.0    -4.08259722e-08  8.06489437e-08  6.38937829e-08
                5.0    0.00025806 0.00024071 0.00021396
                10.0    -0.0008609  -0.0009391  -0.00114722
                </tableData>
            <tableData breakPoint="4.0">
                      39.373565103312565      61.8727451623483      84.37192522138405
                -10.0    5.42885930e-05 9.15433545e-05 1.40200424e-04
                -5.0    -0.00123068 -0.00123925 -0.00124028
                0.0    7.82104136e-07 3.95870139e-07 4.65683309e-07
                5.0    0.00108547 0.00110238 0.00116346
                10.0    -0.00248589 -0.00246057 -0.00258027
                </tableData>
            <tableData breakPoint="5.6">
                      39.373565103312565      61.8727451623483      84.37192522138405
                -10.0    0.00171171 0.00192861 0.00193045
                -5.0    -0.00123956 -0.00124044 -0.00105894
                0.0    3.04039302e-06 8.31504320e-07 2.91681349e-07
                5.0    0.00211767 0.00215124 0.00191466
                10.0    -0.00082627 -0.00105151 -0.00150955
                </tableData>
            <tableData breakPoint="7.2">
                      39.373565103312565      61.8727451623483      84.37192522138405
                -10.0    0.00159737 0.00189131 0.00225947
                -5.0    -0.00059523 -0.000586   -0.00057074
                0.0    -2.21415987e-07 -1.83716875e-07 -3.72212434e-07
                5.0    0.00040165 0.00037752 0.00033974
                10.0    -0.00092698 -0.00093915 -0.00157462
                </tableData>
            <tableData breakPoint="8.8">
                      39.373565103312565      61.8727451623483      84.37192522138405
                -10.0    0.00306637 0.0032333  0.0037314
                -5.0    0.00190951 0.00193102 0.00196038
                0.0     1.09632233e-06 -4.34139602e-06  3.66607537e-07
                5.0    -0.0024103  -0.00226983 -0.00230702
                10.0    -0.00666412 -0.00653301 -0.00632002
                </tableData>
            <tableData breakPoint="10.4">
                      39.373565103312565      61.8727451623483      84.37192522138405
                -10.0    0.002102   0.00218683 0.00226333
                -5.0    0.00113129 0.00115376 0.0011876
                0.0     7.62092350e-06 -5.52070763e-06  7.76613490e-06
                5.0    -0.00131423 -0.00133663 -0.00138026
                10.0    -0.00169053 -0.00180538 -0.00106081
                </tableData>
            <tableData breakPoint="12.0">
                      39.373565103312565      61.8727451623483      84.37192522138405
                -10.0    0.00243817 0.00258841 0.00263253
                -5.0    0.00025608 0.00027274 0.00029388
                0.0    -1.7456046e-05 -1.7456046e-05 -1.7456046e-05
                5.0    -0.0002944  -0.00031131 -0.0003456
                10.0    -0.00242344 -0.00228227 -0.00184182
                </tableData>
        </table>
    </function>
    <function name="aero/coefficient/dCMn__alpha_rad">
        <description>dCMn__alpha_rad</description>
        <table>
            <independentVar lookup="row">aero/beta-deg</independentVar>
            <independentVar lookup="column">velocities/vt-fps</independentVar>
            <independentVar lookup="table">aero/alpha-deg</independentVar>
            <tableData breakPoint="-4.0">
                      39.373565103312565      61.8727451623483      84.37192522138405
                -10.0     0.0010983  0.0010047 -0.001167
                -5.0    0.0010583 0.0010076 0.0009138
                0.0    -4.01e-05 -4.02e-05 -4.08e-05
                5.0    -0.0010222 -0.0009711 -0.0008764
                10.0    -0.0011199 -0.0010266  0.0011452
                </tableData>
            <tableData breakPoint="-2.4">
                      39.373565103312565      61.8727451623483      84.37192522138405
                -10.0    0.0028185 0.0027963 0.0046865
                -5.0    0.0025154 0.0025113 0.0024798
                0.0     6.0e-07  6.0e-07 -3.5e-06
                5.0    -0.002522  -0.0025161 -0.0024841
                10.0    -0.002813  -0.0027875 -0.0046755
                </tableData>
            <tableData breakPoint="-0.8">
                      39.373565103312565      61.8727451623483      84.37192522138405
                -10.0    0.0033155 0.0032387 0.0030793
                -5.0    0.0021786 0.0022128 0.0021626
                0.0    -1.1e-06 -1.3e-06 -1.2e-06
                5.0    -0.0022297 -0.0022122 -0.0021229
                10.0    -0.0033406 -0.0032654 -0.0030817
                </tableData>
            <tableData breakPoint="0.8">
                      39.373565103312565      61.8727451623483      84.37192522138405
                -10.0    0.0063598 0.0061966 0.0059183
                -5.0    0.0023428 0.0022991 0.0022173
                0.0    -2.4e-06 -2.4e-06 -2.7e-06
                5.0    -0.0023482 -0.002308  -0.0022214
                10.0    -0.0063633 -0.0062066 -0.0059225
                </tableData>
            <tableData breakPoint="2.4">
                      39.373565103312565      61.8727451623483      84.37192522138405
                -10.0    0.0126901 0.013251  0.0138433
                -5.0    0.0016829 0.0016468 0.0015687
                0.0    -3.8e-06 -6.7e-06 -6.3e-06
                5.0    -0.0016938 -0.0016566 -0.0015822
                10.0    -0.0126925 -0.0132556 -0.0138481
                </tableData>
            <tableData breakPoint="4.0">
                      39.373565103312565      61.8727451623483      84.37192522138405
                -10.0    0.0117775 0.0128786 0.0143034
                -5.0    0.0012974 0.0015584 0.0019421
                0.0    -1.55e-05 -1.14e-05 -1.24e-05
                5.0    -0.0013127 -0.0015731 -0.0019575
                10.0    -0.011787  -0.0128871 -0.0143116
                </tableData>
            <tableData breakPoint="5.6">
                      39.373565103312565      61.8727451623483      84.37192522138405
                -10.0    0.007087  0.0048544 0.0022658
                -5.0    0.0026914 0.0030518 0.0017168
                0.0    -3.52e-05 -1.26e-05 -8.10e-06
                5.0    -0.0026919 -0.0030685 -0.0017339
                10.0    -0.0070967 -0.0048658 -0.0022758
                </tableData>
            <tableData breakPoint="7.2">
                      39.373565103312565      61.8727451623483      84.37192522138405
                -10.0    -0.0001444 -0.0013406 -0.0047297
                -5.0    -0.0077237 -0.0077295 -0.0077436
                0.0    -5.4e-06 -5.7e-06 -4.2e-06
                5.0    0.0077091 0.0077134 0.0077311
                10.0    0.0001162 0.0013177 0.0047034
                </tableData>
            <tableData breakPoint="8.8">
                      39.373565103312565      61.8727451623483      84.37192522138405
                -10.0    -0.0348829 -0.0353163 -0.0359269
                -5.0    -0.0199005 -0.0199151 -0.0199318
                0.0    -1.43e-05  1.85e-05 -1.02e-05
                5.0    0.0205271 0.019905  0.019927
                10.0    0.0348637 0.0352868 0.0359049
                </tableData>
            <tableData breakPoint="10.4">
                      39.373565103312565      61.8727451623483      84.37192522138405
                -10.0    -0.0133118 -0.0132368 -0.0112723
                -5.0    -0.005297  -0.0053863 -0.0055203
                0.0    -5.08e-05  2.16e-05 -5.16e-05
                5.0    0.005292  0.0053606 0.0054925
                10.0    0.0132619 0.0130946 0.0112196
                </tableData>
            <tableData breakPoint="12.0">
                      39.373565103312565      61.8727451623483      84.37192522138405
                -10.0    -0.0040303 -0.0042213 -0.00389
                -5.0    -0.0030383 -0.0030695 -0.0031038
                0.0    6.95e-05 6.95e-05 6.95e-05
                5.0    0.0029999 0.0029992 0.0030408
                10.0    0.00379   0.0040746 0.0037377
                </tableData>
        </table>
    </function>
    <function name="aero/coefficient/CMn__alpha_rad">
        <description>CMn__alpha_rad = dCMn__alpha_rad * alpha_rad</description>
        <product>
            <property>aero/coefficient/dCMn__alpha_rad</property>
            <property>aero/alpha-rad</property>
        </product>
    </function>
    <function name="aero/coefficient/dCMn__beta_rad">
        <description>dCMn__beta_rad</description>
        <table>
            <independentVar lookup="row">aero/beta-deg</independentVar>
            <independentVar lookup="column">velocities/vt-fps</independentVar>
            <independentVar lookup="table">aero/alpha-deg</independentVar>
            <tableData breakPoint="-4.0">
                      39.373565103312565      61.8727451623483      84.37192522138405
                -10.0    0.0560316 0.0569607 0.0582496
                -5.0    0.0465953 0.0467266 0.046858
                0.0    0.0456065 0.0456414 0.0452117
                5.0    0.0494576 0.0496964 0.0499747
                10.0    0.0602197 0.061427  0.0638831
                </tableData>
            <tableData breakPoint="-2.4">
                      39.373565103312565      61.8727451623483      84.37192522138405
                -10.0    0.0548826 0.0558549 0.0592099
                -5.0    0.0478991 0.0480718 0.0482602
                0.0    0.0458008 0.0458466 0.0454358
                5.0    0.0496282 0.0498888 0.0502063
                10.0    0.058748  0.0599607 0.0606737
                </tableData>
            <tableData breakPoint="-0.8">
                      39.373565103312565      61.8727451623483      84.37192522138405
                -10.0    0.0529702 0.0538961 0.0551786
                -5.0    0.0476731 0.0479044 0.0481109
                0.0    0.0445113 0.0445596 0.0441432
                5.0    0.0502644 0.0505286 0.050895
                10.0    0.0566724 0.0578905 0.0605229
                </tableData>
            <tableData breakPoint="0.8">
                      39.373565103312565      61.8727451623483      84.37192522138405
                -10.0    0.0543211 0.0552908 0.0566642
                -5.0    0.0448168 0.0449815 0.0451721
                0.0    0.0432357 0.0432887 0.0428858
                5.0    0.049536  0.0498255 0.0501995
                10.0    0.0539227 0.0551312 0.0570746
                </tableData>
            <tableData breakPoint="2.4">
                      39.373565103312565      61.8727451623483      84.37192522138405
                -10.0    0.0530908 0.0540845 0.0553739
                -5.0    0.0411229 0.0412273 0.041339
                0.0    0.0391604 0.0392188 0.0388269
                5.0    0.0452773 0.0455648 0.0459457
                10.0    0.0565811 0.0575281 0.0593383
                </tableData>
            <tableData breakPoint="4.0">
                      39.373565103312565      61.8727451623483      84.37192522138405
                -10.0    0.0512162 0.052156  0.0533777
                -5.0    0.0338411 0.0340193 0.0343752
                0.0    0.037396  0.0374219 0.0369729
                5.0    0.0355082 0.0355903 0.0352587
                10.0    0.0651509 0.0657318 0.0673604
                </tableData>
            <tableData breakPoint="5.6">
                      39.373565103312565      61.8727451623483      84.37192522138405
                -10.0    0.0580096 0.0581069 0.0568644
                -5.0    0.0353422 0.0357175 0.0362345
                0.0    0.0366193 0.0367025 0.036473
                5.0    0.0252678 0.0252854 0.0264352
                10.0    0.0529395 0.0530856 0.0544561
                </tableData>
            <tableData breakPoint="7.2">
                      39.373565103312565      61.8727451623483      84.37192522138405
                -10.0    0.0528051 0.0539471 0.0540587
                -5.0    0.0275854 0.0278432 0.0282041
                0.0    0.0401033 0.0401614 0.0397635
                5.0    0.0298052 0.030236  0.0308497
                10.0    0.0489803 0.0485041 0.0501497
                </tableData>
            <tableData breakPoint="8.8">
                      39.373565103312565      61.8727451623483      84.37192522138405
                -10.0    0.0315066 0.0325343 0.035653
                -5.0    0.0328478 0.0332749 0.0338546
                0.0    0.0501162 0.0502089 0.049823
                5.0    0.0373289 0.0371511 0.0378078
                10.0    0.0521285 0.0514582 0.0504955
                </tableData>
            <tableData breakPoint="10.4">
                      39.373565103312565      61.8727451623483      84.37192522138405
                -10.0    0.0466572 0.0477037 0.0510508
                -5.0    0.0525002 0.0527473 0.0530833
                0.0    0.0485065 0.0485407 0.0480977
                5.0    0.0545726 0.0548654 0.0553179
                10.0    0.0443464 0.04567   0.0442105
                </tableData>
            <tableData breakPoint="12.0">
                      39.373565103312565      61.8727451623483      84.37192522138405
                -10.0    0.0592717 0.0603766 0.0616589
                -5.0    0.047242  0.0475562 0.0479752
                0.0    0.0524534 0.0525508 0.0521995
                5.0    0.0477308 0.0481234 0.0486743
                10.0    0.0594728 0.0587957 0.0573095
                </tableData>
        </table>
    </function>
    <function name="aero/coefficient/CMn__beta_rad">
        <description>CMn__beta_rad = dCMn__beta_rad * beta_rad</description>
        <product>
            <property>aero/coefficient/dCMn__beta_rad</property>
            <property>aero/beta-rad</property>
        </product>
    </function>
    <function name="aero/coefficient/dCMn__dpHat_rps">
        <description>dCMn__dpHat_rps</description>
        <table>
            <independentVar lookup="row">aero/beta-deg</independentVar>
            <independentVar lookup="column">velocities/vt-fps</independentVar>
            <independentVar lookup="table">aero/alpha-deg</independentVar>
            <tableData breakPoint="-4.0">
                      39.373565103312565      61.8727451623483      84.37192522138405
                -10.0    0.0197775 0.0196759 0.0195258
                -5.0    0.0193169 0.0191174 0.0188211
                0.0    0.0183589 0.0180862 0.0176793
                5.0    0.0173896 0.0170714 0.0166041
                10.0    0.0169393 0.0166313 0.0166962
                </tableData>
            <tableData breakPoint="-2.4">
                      39.373565103312565      61.8727451623483      84.37192522138405
                -10.0    0.0061109 0.0061702 0.0067348
                -5.0    0.0056942 0.0056761 0.005643
                0.0    0.0040737 0.0040178 0.0039254
                5.0    0.0038996 0.0038432 0.0037566
                10.0    0.0037004 0.003695  0.0037164
                </tableData>
            <tableData breakPoint="-0.8">
                      39.373565103312565      61.8727451623483      84.37192522138405
                -10.0    -0.0064259 -0.0062503 -0.006001
                -5.0    -0.0081755 -0.0080438 -0.0078765
                0.0    -0.0081947 -0.0080582 -0.0078718
                5.0    -0.0100293 -0.0098933 -0.009692
                10.0    -0.0097397 -0.0095151 -0.0092419
                </tableData>
            <tableData breakPoint="0.8">
                      39.373565103312565      61.8727451623483      84.37192522138405
                -10.0    -0.0188127 -0.0184184 -0.017847
                -5.0    -0.0224555 -0.0220806 -0.0215945
                0.0    -0.0209194 -0.0206395 -0.0203795
                5.0    -0.0244179 -0.0241289 -0.0237148
                10.0    -0.0234728 -0.0232142 -0.0228541
                </tableData>
            <tableData breakPoint="2.4">
                      39.373565103312565      61.8727451623483      84.37192522138405
                -10.0    -0.0300149 -0.029101  -0.0280901
                -5.0    -0.0382909 -0.0379381 -0.0374285
                0.0    -0.0370105 -0.0368736 -0.036701
                5.0    -0.0407991 -0.0406537 -0.040462
                10.0    -0.0397859 -0.0396133 -0.039361
                </tableData>
            <tableData breakPoint="4.0">
                      39.373565103312565      61.8727451623483      84.37192522138405
                -10.0    -0.0498041 -0.0496161 -0.0493829
                -5.0    -0.057645  -0.0575761 -0.0574973
                0.0    -0.0579091 -0.0577958 -0.0576676
                5.0    -0.0609824 -0.0607877 -0.0605303
                10.0    -0.0576154 -0.0572466 -0.0562746
                </tableData>
            <tableData breakPoint="5.6">
                      39.373565103312565      61.8727451623483      84.37192522138405
                -10.0    -0.0784914 -0.0791621 -0.0799879
                -5.0    -0.0818661 -0.0820381 -0.082324
                0.0    -0.082066  -0.0821142 -0.0822225
                5.0    -0.0820982 -0.0818222 -0.0814458
                10.0    -0.0741161 -0.0733342 -0.0719664
                </tableData>
            <tableData breakPoint="7.2">
                      39.373565103312565      61.8727451623483      84.37192522138405
                -10.0    -0.1015749 -0.1016399 -0.1017497
                -5.0    -0.1021181 -0.1020503 -0.1019794
                0.0    -0.0981583 -0.0980255 -0.0978666
                5.0    -0.0943049 -0.0942098 -0.0941175
                10.0    -0.0883905 -0.0881222 -0.0873437
                </tableData>
            <tableData breakPoint="8.8">
                      39.373565103312565      61.8727451623483      84.37192522138405
                -10.0    -0.1042015 -0.1038469 -0.102952
                -5.0    -0.0988586 -0.0985635 -0.0981639
                0.0    -0.0955727 -0.095366  -0.0950838
                5.0    -0.0940733 -0.0944826 -0.0944244
                10.0    -0.0911676 -0.0915368 -0.0922351
                </tableData>
            <tableData breakPoint="10.4">
                      39.373565103312565      61.8727451623483      84.37192522138405
                -10.0    -0.0910444 -0.0906925 -0.0897522
                -5.0    -0.0872239 -0.0870064 -0.0867204
                0.0    -0.0887866 -0.0885822 -0.0883293
                5.0    -0.0928643 -0.0924668 -0.0921579
                10.0    -0.095979  -0.0959329 -0.096049
                </tableData>
            <tableData breakPoint="12.0">
                      39.373565103312565      61.8727451623483      84.37192522138405
                -10.0    -0.0813583 -0.0817277 -0.0815695
                -5.0    -0.081604  -0.0815067 -0.0813931
                0.0    -0.0820599 -0.081966  -0.0818644
                5.0    -0.0849825 -0.0847785 -0.0845348
                10.0    -0.0913468 -0.0912329 -0.091243
                </tableData>
        </table>
    </function>
    <function name="aero/coefficient/CMn__dpHat_rps">
        <description>CMn__dpHat_rps = dCMn__dpHat_rps * dpHat_rps</description>
        <product>
            <property>aero/coefficient/dCMn__dpHat_rps</property>
            <property>velocities/p-aero-rad_sec</property>
            <property>aero/bi2vel</property>
        </product>
    </function>
    <function name="aero/coefficient/dCMn__dqHat_rps">
        <description>dCMn__dqHat_rps</description>
        <table>
            <independentVar lookup="row">aero/beta-deg</independentVar>
            <independentVar lookup="column">velocities/vt-fps</independentVar>
            <independentVar lookup="table">aero/alpha-deg</independentVar>
            <tableData breakPoint="-4.0">
                      39.373565103312565      61.8727451623483      84.37192522138405
                -10.0    0.0273067 0.0269952 0.02228
                -5.0    0.0143419 0.014292  0.0141165
                0.0    -3.58e-05 -3.61e-05 -3.66e-05
                5.0    -0.0142365 -0.0141864 -0.0140094
                10.0    -0.0273251 -0.0270132 -0.0222947
                </tableData>
            <tableData breakPoint="-2.4">
                      39.373565103312565      61.8727451623483      84.37192522138405
                -10.0    0.0288682 0.0286568 0.0281015
                -5.0    0.0155096 0.0155037 0.0153889
                0.0    8.70e-06 1.05e-05 1.05e-05
                5.0    -0.0155156 -0.0155092 -0.0153866
                10.0    -0.029075  -0.0288599 -0.0286076
                </tableData>
            <tableData breakPoint="-0.8">
                      39.373565103312565      61.8727451623483      84.37192522138405
                -10.0    0.0295432 0.0293091 0.0287538
                -5.0    0.0169258 0.0170068 0.0168709
                0.0    -1.51e-05  2.70e-06  1.60e-06
                5.0    -0.0170008 -0.0169822 -0.0167652
                10.0    -0.0295088 -0.0292772 -0.0286675
                </tableData>
            <tableData breakPoint="0.8">
                      39.373565103312565      61.8727451623483      84.37192522138405
                -10.0    0.0306912 0.0303736 0.0297307
                -5.0    0.0176577 0.0176268 0.017481
                0.0     2.00e-06 -1.19e-05 -9.30e-06
                5.0    -0.0176519 -0.0176373 -0.0174699
                10.0    -0.0306763 -0.0303712 -0.0297152
                </tableData>
            <tableData breakPoint="2.4">
                      39.373565103312565      61.8727451623483      84.37192522138405
                -10.0    0.0355452 0.0357319 0.0355625
                -5.0    0.0174109 0.0174071 0.0172979
                0.0    -1.62e-05  2.40e-06  1.50e-06
                5.0    -0.0174117 -0.0174084 -0.0172997
                10.0    -0.035529  -0.0357211 -0.0355512
                </tableData>
            <tableData breakPoint="4.0">
                      39.373565103312565      61.8727451623483      84.37192522138405
                -10.0    0.0395272 0.0406157 0.041736
                -5.0    0.0189225 0.0186337 0.017704
                0.0    -9.1e-06 -2.3e-06 -0.0e+00
                5.0    -0.0189287 -0.0193802 -0.0177161
                10.0    -0.0395092 -0.0406018 -0.0417238
                </tableData>
            <tableData breakPoint="5.6">
                      39.373565103312565      61.8727451623483      84.37192522138405
                -10.0    0.0340962 0.0291777 0.0198837
                -5.0    0.0066612 0.0068732 0.0070943
                0.0    -3.3e-06 -1.0e-06  6.2e-06
                5.0    -0.0066822 -0.006896  -0.0071227
                10.0    -0.0340777 -0.0291597 -0.0198564
                </tableData>
            <tableData breakPoint="7.2">
                      39.373565103312565      61.8727451623483      84.37192522138405
                -10.0    0.0160114 0.0150742 0.0083135
                -5.0    -0.0002158 -0.0003906 -0.0007565
                0.0    7.80e-06 9.00e-06 1.45e-05
                5.0    0.0002091 0.0003877 0.0007523
                10.0    -0.0159992 -0.0150586 -0.0083011
                </tableData>
            <tableData breakPoint="8.8">
                      39.373565103312565      61.8727451623483      84.37192522138405
                -10.0    -0.0014372 -0.0019934 -0.0029784
                -5.0    -0.0068187 -0.0073602 -0.0082106
                0.0    -4.71e-05  4.78e-05 -1.34e-05
                5.0    0.0081357 0.0073561 0.0082362
                10.0    0.0014453 0.0020073 0.0030037
                </tableData>
            <tableData breakPoint="10.4">
                      39.373565103312565      61.8727451623483      84.37192522138405
                -10.0    0.0014834 0.0016217 0.0030436
                -5.0    0.0096775 0.0095922 0.0093845
                0.0    -7.48e-05 -7.58e-05 -7.72e-05
                5.0    -0.0093052 -0.0092552 -0.0090444
                10.0    -0.0014681 -0.001795  -0.0030409
                </tableData>
            <tableData breakPoint="12.0">
                      39.373565103312565      61.8727451623483      84.37192522138405
                -10.0    0.0224282 0.0222265 0.0238032
                -5.0    0.0101263 0.0100598 0.0098605
                0.0    5.54e-05 6.09e-05 5.96e-05
                5.0    -0.0101762 -0.0100911 -0.0099013
                10.0    -0.0223764 -0.0221388 -0.0237245
                </tableData>
        </table>
    </function>
    <function name="aero/coefficient/CMn__dqHat_rps">
        <description>CMn__dqHat_rps = dCMn__dqHat_rps * dqHat_rps</description>
        <product>
            <property>aero/coefficient/dCMn__dqHat_rps</property>
            <property>velocities/q-aero-rad_sec</property>
            <property>aero/ci2vel</property>
        </product>
    </function>
    <function name="aero/coefficient/dCMn__drHat_rps">
        <description>dCMn__drHat_rps</description>
        <table>
            <independentVar lookup="row">aero/beta-deg</independentVar>
            <independentVar lookup="column">velocities/vt-fps</independentVar>
            <independentVar lookup="table">aero/alpha-deg</independentVar>
            <tableData breakPoint="-4.0">
                      39.373565103312565      61.8727451623483      84.37192522138405
                -10.0    -0.029465  -0.029393  -0.0298597
                -5.0    -0.0269481 -0.0270429 -0.0271523
                0.0    -0.0267357 -0.0267794 -0.0264477
                5.0    -0.0268298 -0.0266754 -0.0277614
                10.0    -0.0292223 -0.0295404 -0.0299711
                </tableData>
            <tableData breakPoint="-2.4">
                      39.373565103312565      61.8727451623483      84.37192522138405
                -10.0    -0.0289459 -0.0288787 -0.0288225
                -5.0    -0.0265111 -0.0266214 -0.0267471
                0.0    -0.0262861 -0.0263357 -0.02601
                5.0    -0.0268015 -0.0266749 -0.0276618
                10.0    -0.0286572 -0.0289754 -0.0298939
                </tableData>
            <tableData breakPoint="-0.8">
                      39.373565103312565      61.8727451623483      84.37192522138405
                -10.0    -0.0284399 -0.0283795 -0.028607
                -5.0    -0.026052  -0.0261509 -0.0262906
                0.0    -0.0258414 -0.0258959 -0.0255743
                5.0    -0.0262065 -0.0260743 -0.027057
                10.0    -0.0281465 -0.0284686 -0.0289061
                </tableData>
            <tableData breakPoint="0.8">
                      39.373565103312565      61.8727451623483      84.37192522138405
                -10.0    -0.0279027 -0.0278549 -0.0279691
                -5.0    -0.0254168 -0.0255375 -0.0256946
                0.0    -0.0254587 -0.0255264 -0.0252206
                5.0    -0.0255066 -0.0253729 -0.0263766
                10.0    -0.0276432 -0.0279739 -0.0284366
                </tableData>
            <tableData breakPoint="2.4">
                      39.373565103312565      61.8727451623483      84.37192522138405
                -10.0    -0.0271016 -0.0270352 -0.0270067
                -5.0    -0.0248004 -0.0249452 -0.0251411
                0.0    -0.0249128 -0.0250088 -0.0247352
                5.0    -0.0247941 -0.0246727 -0.0257075
                10.0    -0.0270684 -0.027428  -0.0279059
                </tableData>
            <tableData breakPoint="4.0">
                      39.373565103312565      61.8727451623483      84.37192522138405
                -10.0    -0.0256117 -0.0254561 -0.0252958
                -5.0    -0.0238133 -0.0239039 -0.0239567
                0.0    -0.023871  -0.0238746 -0.023468
                5.0    -0.0239869 -0.0238384 -0.0246268
                10.0    -0.0257507 -0.0261371 -0.0266609
                </tableData>
            <tableData breakPoint="5.6">
                      39.373565103312565      61.8727451623483      84.37192522138405
                -10.0    -0.0244397 -0.0242435 -0.0240322
                -5.0    -0.0212192 -0.0213827 -0.0216129
                0.0    -0.0208195 -0.0205895 -0.0201023
                5.0    -0.0210275 -0.0209072 -0.0219652
                10.0    -0.0240027 -0.0238064 -0.0236828
                </tableData>
            <tableData breakPoint="7.2">
                      39.373565103312565      61.8727451623483      84.37192522138405
                -10.0    -0.0221176 -0.021757  -0.0216985
                -5.0    -0.0204726 -0.020257  -0.0205067
                0.0    -0.020271  -0.0204239 -0.0202243
                5.0    -0.0196302 -0.0195397 -0.0206437
                10.0    -0.0217509 -0.0219328 -0.0221892
                </tableData>
            <tableData breakPoint="8.8">
                      39.373565103312565      61.8727451623483      84.37192522138405
                -10.0    -0.0275487 -0.0270798 -0.026677
                -5.0    -0.0278414 -0.0281084 -0.0284862
                0.0    -0.0281533 -0.028389  -0.0283302
                5.0    -0.0259557 -0.0261053 -0.0273079
                10.0    -0.0269859 -0.027464  -0.0285461
                </tableData>
            <tableData breakPoint="10.4">
                      39.373565103312565      61.8727451623483      84.37192522138405
                -10.0    -0.033588  -0.0330655 -0.0325264
                -5.0    -0.0370154 -0.0373225 -0.0377594
                0.0    -0.0396391 -0.0398062 -0.0396125
                5.0    -0.0401248 -0.0400762 -0.0410245
                10.0    -0.0387326 -0.0392937 -0.0404941
                </tableData>
            <tableData breakPoint="12.0">
                      39.373565103312565      61.8727451623483      84.37192522138405
                -10.0    -0.0423504 -0.0418468 -0.0416766
                -5.0    -0.0438015 -0.0440238 -0.0442741
                0.0    -0.04187   -0.0420039 -0.0417566
                5.0    -0.0430302 -0.0430468 -0.0439456
                10.0    -0.0448696 -0.0453007 -0.0458376
                </tableData>
        </table>
    </function>
    <function name="aero/coefficient/CMn__drHat_rps">
        <description>CMn__drHat_rps = dCMn__drHat_rps * drHat_rps</description>
        <product>
            <property>aero/coefficient/dCMn__drHat_rps</property>
            <property>velocities/r-aero-rad_sec</property>
            <property>aero/bi2vel</property>
        </product>
    </function>
    <function name="aero/coefficient/dCMn__dAilL_rad">
        <description>dCMn__dAilL_rad</description>
        <table>
            <independentVar lookup="row">aero/beta-deg</independentVar>
            <independentVar lookup="column">velocities/vt-fps</independentVar>
            <independentVar lookup="table">aero/alpha-deg</independentVar>
            <tableData breakPoint="-4.0">
                      39.373565103312565      61.8727451623483      84.37192522138405
                -10.0    -0.0100235 -0.0100521 -0.0120878
                -5.0    -0.0101755 -0.010182  -0.0101909
                0.0    -0.010207  -0.0102064 -0.0102044
                5.0    -0.0102863 -0.0102834 -0.0102776
                10.0    -0.0103821 -0.0103895 -0.0103977
                </tableData>
            <tableData breakPoint="-2.4">
                      39.373565103312565      61.8727451623483      84.37192522138405
                -10.0    -0.0089028 -0.0089353 -0.008998
                -5.0    -0.0091451 -0.00916   -0.0091804
                0.0    -0.0092596 -0.0092701 -0.0092446
                5.0    -0.0098424 -0.0098565 -0.0098754
                10.0    -0.0098923 -0.0099171 -0.0099665
                </tableData>
            <tableData breakPoint="-0.8">
                      39.373565103312565      61.8727451623483      84.37192522138405
                -10.0    -0.0078372 -0.0078608 -0.0079179
                -5.0    -0.0081162 -0.0080854 -0.0080896
                0.0    -0.0084626 -0.008478  -0.008501
                5.0    -0.0094613 -0.0094805 -0.0094631
                10.0    -0.0093195 -0.0093541 -0.0093745
                </tableData>
            <tableData breakPoint="0.8">
                      39.373565103312565      61.8727451623483      84.37192522138405
                -10.0    -0.0068794 -0.0069542 -0.0070274
                -5.0    -0.0070198 -0.0070546 -0.0071043
                0.0    -0.0078171 -0.0078535 -0.0079045
                5.0    -0.0088506 -0.0088863 -0.0089369
                10.0    -0.0090058 -0.009052  -0.0091183
                </tableData>
            <tableData breakPoint="2.4">
                      39.373565103312565      61.8727451623483      84.37192522138405
                -10.0    -0.005683  -0.00564   -0.0056442
                -5.0    -0.0059481 -0.0060073 -0.0060908
                0.0    -0.0069351 -0.0070064 -0.0071085
                5.0    -0.0081177 -0.0081837 -0.0082779
                10.0    -0.0087927 -0.0088758 -0.0090063
                </tableData>
            <tableData breakPoint="4.0">
                      39.373565103312565      61.8727451623483      84.37192522138405
                -10.0    -0.003576  -0.0035779 -0.0033275
                -5.0    -0.0044423 -0.0045156 -0.0042603
                0.0    -0.0055129 -0.005545  -0.0056655
                5.0    -0.0070445 -0.0071551 -0.0073171
                10.0    -0.0083886 -0.0085342 -0.0087609
                </tableData>
            <tableData breakPoint="5.6">
                      39.373565103312565      61.8727451623483      84.37192522138405
                -10.0    -0.0018596 -0.0019008 -0.0020919
                -5.0    -0.002255  -0.0022894 -0.0023456
                0.0    -0.0026318 -0.0026641 -0.0027054
                5.0    -0.004576  -0.004661  -0.0047851
                10.0    -0.0071407 -0.0073423 -0.0053946
                </tableData>
            <tableData breakPoint="7.2">
                      39.373565103312565      61.8727451623483      84.37192522138405
                -10.0    -0.0008796 -0.000934  -0.0026997
                -5.0    -0.0005317 -0.0005789 -0.000641
                0.0    -0.0012206 -0.0012625 -0.0013061
                5.0    -0.0023093 -0.0023503 -0.0024196
                10.0    -0.0035367 -0.0036335 -0.003613
                </tableData>
            <tableData breakPoint="8.8">
                      39.373565103312565      61.8727451623483      84.37192522138405
                -10.0    -0.0051355 -0.0053232 -0.0055953
                -5.0    -0.0065598 -0.0067332 -0.0069713
                0.0    -0.0062469 -0.0064014 -0.0066793
                5.0    -0.0044996 -0.0052587 -0.005407
                10.0    -0.0051122 -0.0052307 -0.0054055
                </tableData>
            <tableData breakPoint="10.4">
                      39.373565103312565      61.8727451623483      84.37192522138405
                -10.0    -0.0104459 -0.0115949 -0.0115922
                -5.0    -0.0121319 -0.0122342 -0.0122842
                0.0    -0.0134791 -0.0135028 -0.0135429
                5.0    -0.0149474 -0.014996  -0.0150331
                10.0    -0.0108707 -0.0098319 -0.0100399
                </tableData>
            <tableData breakPoint="12.0">
                      39.373565103312565      61.8727451623483      84.37192522138405
                -10.0    -0.0109108 -0.010966  -0.0109982
                -5.0    -0.0119078 -0.0119398 -0.0119813
                0.0    -0.0132392 -0.0132645 -0.013297
                5.0    -0.0146145 -0.0146387 -0.0146771
                10.0    -0.0163876 -0.0164274 -0.0163677
                </tableData>
        </table>
    </function>
    <function name="aero/coefficient/CMn__dAilL_rad">
        <description>CMn__dAilL_rad = dCMn__dAilL_rad * dAilL_rad</description>
        <product>
            <property>aero/coefficient/dCMn__dAilL_rad</property>
            <property>fcs/posAilL_rad</property>
        </product>
    </function>
    <function name="aero/coefficient/dCMn__dAilR_rad">
        <description>dCMn__dAilR_rad</description>
        <table>
            <independentVar lookup="row">aero/beta-deg</independentVar>
            <independentVar lookup="column">velocities/vt-fps</independentVar>
            <independentVar lookup="table">aero/alpha-deg</independentVar>
            <tableData breakPoint="-4.0">
                      39.373565103312565      61.8727451623483      84.37192522138405
                -10.0    0.0103545 0.0103619 0.0103707
                -5.0    0.0103002 0.0102966 0.0102921
                0.0    0.0101948 0.0102109 0.0102085
                5.0    0.0101539 0.0101607 0.010169
                10.0    0.0100282 0.0100568 0.0120909
                </tableData>
            <tableData breakPoint="-2.4">
                      39.373565103312565      61.8727451623483      84.37192522138405
                -10.0    0.0098797 0.0099077 0.0099572
                -5.0    0.0098383 0.0098532 0.0098722
                0.0    0.0092586 0.0092691 0.0092656
                5.0    0.0091426 0.009158  0.0091778
                10.0    0.0087389 0.0087726 0.0088364
                </tableData>
            <tableData breakPoint="-0.8">
                      39.373565103312565      61.8727451623483      84.37192522138405
                -10.0    0.0093236 0.0093573 0.0094037
                -5.0    0.009412  0.0094832 0.0095117
                0.0    0.0084632 0.008479  0.0085002
                5.0    0.0080468 0.0080663 0.0081333
                10.0    0.0076788 0.0078406 0.0077863
                </tableData>
            <tableData breakPoint="0.8">
                      39.373565103312565      61.8727451623483      84.37192522138405
                -10.0    0.0090064 0.0090472 0.0091193
                -5.0    0.0088524 0.008888  0.0089387
                0.0    0.0078195 0.0078553 0.007906
                5.0    0.0070204 0.007055  0.0071046
                10.0    0.0068753 0.0069359 0.0070241
                </tableData>
            <tableData breakPoint="2.4">
                      39.373565103312565      61.8727451623483      84.37192522138405
                -10.0    0.0087945 0.0088751 0.0090058
                -5.0    0.0081216 0.0081862 0.0082806
                0.0    0.0069365 0.0070076 0.0071044
                5.0    0.005952  0.0060082 0.006092
                10.0    0.0056775 0.0056371 0.0056396
                </tableData>
            <tableData breakPoint="4.0">
                      39.373565103312565      61.8727451623483      84.37192522138405
                -10.0    0.0083923 0.0085332 0.0087582
                -5.0    0.0070444 0.0071559 0.0073178
                0.0    0.0055069 0.0055505 0.0056688
                5.0    0.0044419 0.0040997 0.0042599
                10.0    0.0035756 0.0035748 0.0033196
                </tableData>
            <tableData breakPoint="5.6">
                      39.373565103312565      61.8727451623483      84.37192522138405
                -10.0    0.0071382 0.0073334 0.0053888
                -5.0    0.0045795 0.0046659 0.0047857
                0.0    0.0026258 0.0026618 0.002709
                5.0    0.0022577 0.0022948 0.002348
                10.0    0.0018589 0.0019005 0.0020915
                </tableData>
            <tableData breakPoint="7.2">
                      39.373565103312565      61.8727451623483      84.37192522138405
                -10.0    0.003531  0.0036361 0.0036117
                -5.0    0.0023134 0.0023534 0.0024159
                0.0    0.0012347 0.0012711 0.0013208
                5.0    0.0005355 0.0005801 0.000648
                10.0    0.0008848 0.0009403 0.0026908
                </tableData>
            <tableData breakPoint="8.8">
                      39.373565103312565      61.8727451623483      84.37192522138405
                -10.0    0.0051088 0.005223  0.0054012
                -5.0    0.0051611 0.0052686 0.0054359
                0.0    0.0062557 0.0064558 0.0066997
                5.0    0.0072162 0.0067384 0.0069913
                10.0    0.005142  0.0053214 0.0055989
                </tableData>
            <tableData breakPoint="10.4">
                      39.373565103312565      61.8727451623483      84.37192522138405
                -10.0    0.0097009 0.009864  0.0100437
                -5.0    0.0149728 0.015002  0.0150425
                0.0    0.0134835 0.0135121 0.0135436
                5.0    0.0122136 0.0122327 0.0122893
                10.0    0.0114575 0.0115109 0.011598
                </tableData>
            <tableData breakPoint="12.0">
                      39.373565103312565      61.8727451623483      84.37192522138405
                -10.0    0.0162976 0.0163348 0.0162702
                -5.0    0.0146237 0.0146552 0.0146912
                0.0    0.0132496 0.0132783 0.0133076
                5.0    0.0119098 0.0119478 0.0119903
                10.0    0.0109424 0.0109966 0.0109061
                </tableData>
        </table>
    </function>
    <function name="aero/coefficient/CMn__dAilR_rad">
        <description>CMn__dAilR_rad = dCMn__dAilR_rad * dAilR_rad</description>
        <product>
            <property>aero/coefficient/dCMn__dAilR_rad</property>
            <property>fcs/posAilR_rad</property>
        </product>
    </function>
    <function name="aero/coefficient/dCMn__dRudevL_rad">
        <description>dCMn__dRudevL_rad</description>
        <table>
            <independentVar lookup="row">aero/beta-deg</independentVar>
            <independentVar lookup="column">velocities/vt-fps</independentVar>
            <independentVar lookup="table">aero/alpha-deg</independentVar>
            <tableData breakPoint="-4.0">
                      39.373565103312565      61.8727451623483      84.37192522138405
                -10.0    -0.0188975 -0.0189325 -0.020981
                -5.0    -0.0187809 -0.0187928 -0.0188085
                0.0    -0.0184806 -0.0184894 -0.0185002
                5.0    -0.0183131 -0.0183258 -0.0183453
                10.0    -0.018367  -0.0184055 -0.0184609
                </tableData>
            <tableData breakPoint="-2.4">
                      39.373565103312565      61.8727451623483      84.37192522138405
                -10.0    -0.0187662 -0.0187997 -0.0188688
                -5.0    -0.0186424 -0.0186555 -0.0184724
                0.0    -0.0183201 -0.0183289 -0.0183398
                5.0    -0.0181666 -0.0181814 -0.0182022
                10.0    -0.0180264 -0.0180618 -0.0182979
                </tableData>
            <tableData breakPoint="-0.8">
                      39.373565103312565      61.8727451623483      84.37192522138405
                -10.0    -0.0187063 -0.0187413 -0.0187912
                -5.0    -0.0184838 -0.0184473 -0.018466
                0.0    -0.018128  -0.0181362 -0.0181482
                5.0    -0.0179889 -0.0180036 -0.0179857
                10.0    -0.0176117 -0.0176491 -0.017673
                </tableData>
            <tableData breakPoint="0.8">
                      39.373565103312565      61.8727451623483      84.37192522138405
                -10.0    -0.0185767 -0.0186179 -0.0186641
                -5.0    -0.018202  -0.018217  -0.0182377
                0.0    -0.0178947 -0.0179038 -0.0179144
                5.0    -0.0177075 -0.0177224 -0.0177433
                10.0    -0.0173213 -0.0173584 -0.0174115
                </tableData>
            <tableData breakPoint="2.4">
                      39.373565103312565      61.8727451623483      84.37192522138405
                -10.0    -0.0182917 -0.0183305 -0.0183783
                -5.0    -0.0179363 -0.017953  -0.0179757
                0.0    -0.0175645 -0.0175732 -0.0175842
                5.0    -0.0173339 -0.0173488 -0.0173706
                10.0    -0.0169334 -0.0169717 -0.0170393
                </tableData>
            <tableData breakPoint="4.0">
                      39.373565103312565      61.8727451623483      84.37192522138405
                -10.0    -0.0179547 -0.0179905 -0.0180365
                -5.0    -0.0175652 -0.0175746 -0.0176052
                0.0    -0.0171692 -0.0171756 -0.0171863
                5.0    -0.0169057 -0.0169202 -0.0169436
                10.0    -0.0164859 -0.0165304 -0.0165918
                </tableData>
            <tableData breakPoint="5.6">
                      39.373565103312565      61.8727451623483      84.37192522138405
                -10.0    -0.0175781 -0.0176122 -0.0176792
                -5.0    -0.0171576 -0.0171727 -0.0171966
                0.0    -0.0166981 -0.0167059 -0.0167113
                5.0    -0.0160921 -0.0161081 -0.0161291
                10.0    -0.0158694 -0.0159122 -0.0159614
                </tableData>
            <tableData breakPoint="7.2">
                      39.373565103312565      61.8727451623483      84.37192522138405
                -10.0    -0.0171581 -0.0171946 -0.0188852
                -5.0    -0.0167871 -0.0168045 -0.0168254
                0.0    -0.0156936 -0.0157011 -0.0157162
                5.0    -0.0155153 -0.0155282 -0.0155477
                10.0    -0.0152769 -0.0153169 -0.0153784
                </tableData>
            <tableData breakPoint="8.8">
                      39.373565103312565      61.8727451623483      84.37192522138405
                -10.0    -0.0167138 -0.0167523 -0.0168163
                -5.0    -0.0160751 -0.0160912 -0.0161074
                0.0    -0.0150194 -0.0150002 -0.0150303
                5.0    -0.0139903 -0.0146548 -0.0146697
                10.0    -0.0146526 -0.0147021 -0.0149056
                </tableData>
            <tableData breakPoint="10.4">
                      39.373565103312565      61.8727451623483      84.37192522138405
                -10.0    -0.0157957 -0.0159309 -0.0159046
                -5.0    -0.0157796 -0.0157969 -0.0158231
                0.0    -0.0142179 -0.0142235 -0.0142321
                5.0    -0.0143009 -0.0143371 -0.0143563
                10.0    -0.0133105 -0.0133569 -0.0134371
                </tableData>
            <tableData breakPoint="12.0">
                      39.373565103312565      61.8727451623483      84.37192522138405
                -10.0    -0.0155059 -0.0155427 -0.0154068
                -5.0    -0.0157832 -0.0158002 -0.015826
                0.0    -0.0130987 -0.0131037 -0.0131105
                5.0    -0.0141424 -0.0156148 -0.0141832
                10.0    -0.0125529 -0.0125985 -0.012431
                </tableData>
        </table>
    </function>
    <function name="aero/coefficient/CMn__dRudevL_rad">
        <description>CMn__dRudevL_rad = dCMn__dRudevL_rad * dRudevL_rad</description>
        <product>
            <property>aero/coefficient/dCMn__dRudevL_rad</property>
            <property>fcs/posRudevL_rad</property>
        </product>
    </function>
    <function name="aero/coefficient/dCMn__dRudevR_rad">
        <description>dCMn__dRudevR_rad</description>
        <table>
            <independentVar lookup="row">aero/beta-deg</independentVar>
            <independentVar lookup="column">velocities/vt-fps</independentVar>
            <independentVar lookup="table">aero/alpha-deg</independentVar>
            <tableData breakPoint="-4.0">
                      39.373565103312565      61.8727451623483      84.37192522138405
                -10.0    0.0180731 0.0180856 0.0181354
                -5.0    0.0183191 0.0183341 0.0183526
                0.0    0.0184738 0.0184824 0.0184929
                5.0    0.0187466 0.0187589 0.0187736
                10.0    0.018571  0.0186038 0.0206423
                </tableData>
            <tableData breakPoint="-2.4">
                      39.373565103312565      61.8727451623483      84.37192522138405
                -10.0    0.0178759 0.0179125 0.0179829
                -5.0    0.018166  0.018181  0.0182008
                0.0    0.0183273 0.018336  0.0183468
                5.0    0.0186433 0.0186565 0.0186742
                10.0    0.0185882 0.0186232 0.0186902
                </tableData>
            <tableData breakPoint="-0.8">
                      39.373565103312565      61.8727451623483      84.37192522138405
                -10.0    0.0176119 0.0176509 0.0177022
                -5.0    0.0179415 0.0180076 0.0180287
                0.0    0.0181296 0.0181382 0.0181485
                5.0    0.0184425 0.0184508 0.018508
                10.0    0.0187139 0.0187482 0.0188245
                </tableData>
            <tableData breakPoint="0.8">
                      39.373565103312565      61.8727451623483      84.37192522138405
                -10.0    0.0173238 0.0173552 0.017414
                -5.0    0.0177105 0.0177255 0.0177465
                0.0    0.0178966 0.0179053 0.017916
                5.0    0.0182048 0.01822   0.0182379
                10.0    0.0185811 0.018619  0.0186689
                </tableData>
            <tableData breakPoint="2.4">
                      39.373565103312565      61.8727451623483      84.37192522138405
                -10.0    0.0169359 0.0169716 0.017039
                -5.0    0.0173354 0.0173504 0.017457
                0.0    0.0175657 0.0175744 0.0175852
                5.0    0.0179366 0.0179525 0.0179749
                10.0    0.0182986 0.0183341 0.0183827
                </tableData>
            <tableData breakPoint="4.0">
                      39.373565103312565      61.8727451623483      84.37192522138405
                -10.0    0.016493  0.0165329 0.0165954
                -5.0    0.016905  0.0169208 0.016942
                0.0    0.0171621 0.0171714 0.0171869
                5.0    0.0175637 0.0175807 0.0176016
                10.0    0.0179637 0.017997  0.0180426
                </tableData>
            <tableData breakPoint="5.6">
                      39.373565103312565      61.8727451623483      84.37192522138405
                -10.0    0.0158726 0.0159142 0.0159636
                -5.0    0.0160925 0.0161086 0.0161294
                0.0    0.0166898 0.0166993 0.0167148
                5.0    0.0171541 0.01717   0.0171941
                10.0    0.0175853 0.01762   0.0176853
                </tableData>
            <tableData breakPoint="7.2">
                      39.373565103312565      61.8727451623483      84.37192522138405
                -10.0    0.0152763 0.0153202 0.0153793
                -5.0    0.015517  0.015529  0.0155501
                0.0    0.0156894 0.0156973 0.0157065
                5.0    0.0167857 0.0168046 0.0168207
                10.0    0.0171673 0.0172019 0.0188844
                </tableData>
            <tableData breakPoint="8.8">
                      39.373565103312565      61.8727451623483      84.37192522138405
                -10.0    0.0146547 0.014698  0.0147839
                -5.0    0.0146425 0.0146562 0.0146846
                0.0    0.015017  0.0150488 0.0150405
                5.0    0.0167292 0.0160943 0.016125
                10.0    0.0167167 0.0167523 0.0168221
                </tableData>
            <tableData breakPoint="10.4">
                      39.373565103312565      61.8727451623483      84.37192522138405
                -10.0    0.013315  0.0132656 0.0134355
                -5.0    0.0143092 0.0143254 0.0143454
                0.0    0.0142071 0.0142102 0.0142234
                5.0    0.0157943 0.015792  0.0158225
                10.0    0.0157888 0.0158243 0.0158888
                </tableData>
            <tableData breakPoint="12.0">
                      39.373565103312565      61.8727451623483      84.37192522138405
                -10.0    0.012556  0.0126043 0.0124282
                -5.0    0.0141443 0.0141539 0.0141781
                0.0    0.0130813 0.0130885 0.0130972
                5.0    0.0157738 0.0157903 0.0158144
                10.0    0.0155012 0.0155366 0.0154085
                </tableData>
        </table>
    </function>
    <function name="aero/coefficient/CMn__dRudevR_rad">
        <description>CMn__dRudevR_rad = dCMn__dRudevR_rad * dRudevR_rad</description>
        <product>
            <property>aero/coefficient/dCMn__dRudevR_rad</property>
            <property>fcs/posRudevR_rad</property>
        </product>
    </function>
    <function name="aero/coefficient/CMn">
        <description>CMn summation</description>
        <sum>
            <property>aero/coefficient/CMn__zero</property>
            <property>aero/coefficient/CMn__alpha_rad</property>
            <property>aero/coefficient/CMn__beta_rad</property>
            <property>aero/coefficient/CMn__dpHat_rps</property>
            <property>aero/coefficient/CMn__dqHat_rps</property>
            <property>aero/coefficient/CMn__drHat_rps</property>
            <property>aero/coefficient/CMn__dAilL_rad</property>
            <property>aero/coefficient/CMn__dAilR_rad</property>
            <property>aero/coefficient/CMn__dRudevL_rad</property>
            <property>aero/coefficient/CMn__dRudevR_rad</property>
        </sum>
    </function>
    <axis name="LIFT">
        <function name="aero/force/LIFT__CL">
            <description>LIFT from CL</description>
            <product>
                <property>aero/qbar-area</property>
                <property>aero/coefficient/CL</property>
            </product>
        </function>
    </axis>
    <axis name="DRAG">
        <function name="aero/force/DRAG__CD">
            <description>DRAG from CD</description>
            <product>
                <property>aero/qbar-area</property>
                <property>aero/coefficient/CD</property>
            </product>
        </function>
    </axis>
    <axis name="SIDE">
        <function name="aero/force/SIDE__CY">
            <description>SIDE from CY</description>
            <product>
                <property>aero/qbar-area</property>
                <property>aero/coefficient/CY</property>
            </product>
        </function>
    </axis>
    <axis name="ROLL">
        <function name="aero/moment/ROLL__CMl">
            <description>ROLL from CMl</description>
            <product>
                <property>aero/qbar-area</property>
                <property>metrics/bw-ft</property>
                <property>aero/coefficient/CMl</property>
            </product>
        </function>
    </axis>
    <axis name="PITCH">
        <function name="aero/moment/PITCH__CMm">
            <description>PITCH from CMm</description>
            <product>
                <property>aero/qbar-area</property>
                <property>metrics/cbarw-ft</property>
                <property>aero/coefficient/CMm</property>
            </product>
        </function>
    </axis>
    <axis name="YAW">
        <function name="aero/moment/YAW__CMn">
            <description>YAW from CMn</description>
            <product>
                <property>aero/qbar-area</property>
                <property>metrics/bw-ft</property>
                <property>aero/coefficient/CMn</property>
            </product>
        </function>
    </axis>
</aerodynamics>
