<?xml version="1.0" ?>
<propulsion>
    <engine>
        <electric_engine>
          <power unit="WATTS"> 12 </power>
        </electric_engine>
        <thruster>
            <direct name="Direct"> </direct>
            <location unit="M">
                <x>-0.17779999999999999</x>
                <y>0.0</y>
                <z>0.0</z>
            </location>
            <orient unit="DEG">
                <roll>0</roll>
                <pitch>0</pitch>
                <yaw>0</yaw>
            </orient>
            <sense>1</sense>
            <p_factor>0.0</p_factor>
        </thruster>
    </engine>
</propulsion>
