<?xml version="1.0" ?>

<fdm_config release="Alpha" version="2.0">

    <flight_control file="FlightControl.xml"/>

    <system file="Effectors.xml"/>


    <mass_balance file="Mass.xml"/>

    <ground_reactions file="Gear.xml"/>

    <propulsion file="PropulsionDirect.xml"/>

    <metrics file="Metrics.xml"/>

    <aerodynamics file="Aero.xml"/>


    <system file="SensorImu.xml"/>

    <system file="SensorBaro.xml"/>
    <system file="SensorGps.xml"/>

    <system file="SensorPitot.xml"/>

    <!-- <system file="Sensor5Hole.xml"/>
 -->
</fdm_config>
