<?xml version="1.0" ?>
<aerodynamics>
    <function name="aero/coefficient/CL__zero">
        <description>CL__zero</description>
        <table>
            <independentVar lookup="row">aero/beta-deg</independentVar>
            <independentVar lookup="column">velocities/vt-fps</independentVar>
            <independentVar lookup="table">aero/alpha-deg</independentVar>
            <tableData breakPoint="-6.0">
                      39.38648293963254      56.26640419947507      73.14632545931758
                -10.0    -0.08109887 -0.08173818 -0.08226854
                -5.0    -0.03402156 -0.03430359 -0.03450118
                0.0    -0.02204077 -0.0220381  -0.0220365
                5.0    -0.03489422 -0.03516962 -0.03544382
                10.0    -0.17003386 -0.17064056 -0.17106359
                </tableData>
            <tableData breakPoint="-2.0">
                      39.38648293963254      56.26640419947507      73.14632545931758
                -10.0    -0.02062877 -0.02123954 -0.0217684
                -5.0    -0.01492935 -0.01548076 -0.01605748
                0.0    -0.01472417 -0.01473972 -0.01476069
                5.0    -0.01416775 -0.01468458 -0.01520978
                10.0    -0.03767908 -0.03824608 -0.03870483
                </tableData>
            <tableData breakPoint="2.0">
                      39.38648293963254      56.26640419947507      73.14632545931758
                -10.0    0.02968616 0.03016279 0.03018288
                -5.0    0.02192039 0.0225579  0.02290147
                0.0    0.01889978 0.01890027 0.01890021
                5.0    0.02190744 0.02252122 0.02280301
                10.0    0.06735722 0.0677975  0.0677594
                </tableData>
            <tableData breakPoint="6.0">
                      39.38648293963254      56.26640419947507      73.14632545931758
                -10.0    0.09361237 0.09424661 0.09437703
                -5.0    0.02980315 0.03008869 0.03030717
                0.0    0.01693473 0.01693195 0.01693069
                5.0    0.03096305 0.03125716 0.03155413
                10.0    0.15348069 0.15407976 0.15419922
                </tableData>
            <tableData breakPoint="10.0">
                      39.38648293963254      56.26640419947507      73.14632545931758
                -10.0    0.09354679 0.09313164 0.09167315
                -5.0    0.05238166 0.05281494 0.05321113
                0.0    0.04500565 0.04495202 0.04487904
                5.0    0.05544578 0.05583139 0.05582357
                10.0    0.09167973 0.09129348 0.08984852
                </tableData>
            <tableData breakPoint="14.0">
                      39.38648293963254      56.26640419947507      73.14632545931758
                -10.0    0.50226679 0.50091918 0.49905972
                -5.0    0.51854818 0.52006249 0.52133276
                0.0    0.51497345 0.51549778 0.51620265
                5.0    0.52312383 0.52452223 0.52555395
                10.0    0.49279339 0.49148694 0.48991194
                </tableData>
        </table>
    </function>
    <function name="aero/coefficient/dCL__alpha_rad">
        <description>dCL__alpha_rad</description>
        <table>
            <independentVar lookup="row">aero/beta-deg</independentVar>
            <independentVar lookup="column">velocities/vt-fps</independentVar>
            <independentVar lookup="table">aero/alpha-deg</independentVar>
            <tableData breakPoint="-6.0">
                      39.38648293963254      56.26640419947507      73.14632545931758
                -10.0    3.6870155 3.6780523 3.6702263
                -5.0    3.9756532 3.970937  3.9671898
                0.0    4.0624611 4.0634921 4.0648653
                5.0    3.9756532 3.970937  3.9671898
                10.0    3.6870155 3.6780523 3.6702263
                </tableData>
            <tableData breakPoint="-2.0">
                      39.38648293963254      56.26640419947507      73.14632545931758
                -10.0    4.1531476 4.133151  4.1116734
                -5.0    4.2715774 4.2606744 4.2477312
                0.0    4.2185001 4.2190802 4.219866
                5.0    4.2715774 4.2607778 4.2477312
                10.0    4.1531476 4.133151  4.1116734
                </tableData>
            <tableData breakPoint="2.0">
                      39.38648293963254      56.26640419947507      73.14632545931758
                -10.0    3.978935  3.962665  3.9557303
                -5.0    4.0872966 4.0737198 4.0676773
                0.0    4.1174214 4.1184443 4.1198471
                5.0    4.0872966 4.0737198 4.0676773
                10.0    3.978935  3.962665  3.9557303
                </tableData>
            <tableData breakPoint="6.0">
                      39.38648293963254      56.26640419947507      73.14632545931758
                -10.0    3.7685061 3.7596379 3.7547412
                -5.0    4.0736453 4.0689363 4.0650626
                0.0    4.1648719 4.1659394 4.1673542
                5.0    4.0736453 4.0689363 4.0650626
                10.0    3.7685061 3.7596379 3.7547412
                </tableData>
            <tableData breakPoint="10.0">
                      39.38648293963254      56.26640419947507      73.14632545931758
                -10.0    3.9170146 3.9134111 3.9145508
                -5.0    3.9822244 3.9791325 3.9771466
                0.0    3.9859657 3.9872636 3.9890236
                5.0    3.9822244 3.9791325 3.9771466
                10.0    3.9170146 3.9134111 3.9145508
                </tableData>
            <tableData breakPoint="14.0">
                      39.38648293963254      56.26640419947507      73.14632545931758
                -10.0    2.1632116 2.1599782 2.1581798
                -5.0    1.9883611 1.9809103 1.9741488
                0.0    1.9790341 1.977241  1.9748343
                5.0    1.9883611 1.9809103 1.9741488
                10.0    2.1632116 2.1599782 2.1581798
                </tableData>
        </table>
    </function>
    <function name="aero/coefficient/CL__alpha_rad">
        <description>CL__alpha_rad = dCL__alpha_rad * alpha_rad</description>
        <product>
            <property>aero/coefficient/dCL__alpha_rad</property>
            <property>aero/alpha-rad</property>
        </product>
    </function>
    <function name="aero/coefficient/dCL__beta_rad">
        <description>dCL__beta_rad</description>
        <table>
            <independentVar lookup="row">aero/beta-deg</independentVar>
            <independentVar lookup="column">velocities/vt-fps</independentVar>
            <independentVar lookup="table">aero/alpha-deg</independentVar>
            <tableData breakPoint="-6.0">
                      39.38648293963254      56.26640419947507      73.14632545931758
                -10.0    -0.2222608 -0.2283318 -0.2335951
                -5.0    -0.0853167 -0.0920324 -0.0974845
                0.0    -0.0011234  0.0059771  0.0147578
                5.0    0.0953167 0.1019563 0.1082863
                10.0    0.7318208 0.7377049 0.7423533
                </tableData>
            <tableData breakPoint="-2.0">
                      39.38648293963254      56.26640419947507      73.14632545931758
                -10.0    -0.0425557 -0.0457646 -0.0482618
                -5.0    -0.034442  -0.0397616 -0.0451441
                0.0    0.0039366 0.0050934 0.0066128
                5.0    0.0257147 0.0306588 0.0354302
                10.0    0.1402468 0.1432049 0.1453004
                </tableData>
            <tableData breakPoint="2.0">
                      39.38648293963254      56.26640419947507      73.14632545931758
                -10.0    0.0715532 0.074728  0.0772199
                -5.0    0.0414736 0.046684  0.0521723
                0.0    -0.007536  -0.0086897 -0.010204
                5.0    -0.0413252 -0.0462637 -0.051044
                10.0    -0.2873925 -0.290359  -0.2925175
                </tableData>
            <tableData breakPoint="6.0">
                      39.38648293963254      56.26640419947507      73.14632545931758
                -10.0    0.3269624 0.3330384 0.337722
                -5.0    0.095795  0.1025148 0.1080212
                0.0    -0.0016368 -0.0086739 -0.0173271
                5.0    -0.1090864 -0.1159045 -0.1223103
                10.0    -0.6699826 -0.6758571 -0.6804779
                </tableData>
            <tableData breakPoint="10.0">
                      39.38648293963254      56.26640419947507      73.14632545931758
                -10.0    0.4560332 0.4606124 0.4615522
                -5.0    0.2375315 0.2490965 0.260457
                0.0    -0.0553025 -0.0715708 -0.0896888
                5.0    -0.2726437 -0.2836625 -0.2903934
                10.0    -0.4453357 -0.4500805 -0.4510978
                </tableData>
            <tableData breakPoint="14.0">
                      39.38648293963254      56.26640419947507      73.14632545931758
                -10.0    0.4032494 0.4031298 0.3983393
                -5.0    0.1990748 0.212974  0.2235007
                0.0    -0.0587923 -0.0848248 -0.1109917
                5.0    -0.2515078 -0.2640789 -0.2718719
                10.0    -0.3489708 -0.349087  -0.3459264
                </tableData>
        </table>
    </function>
    <function name="aero/coefficient/CL__beta_rad">
        <description>CL__beta_rad = dCL__beta_rad * beta_rad</description>
        <product>
            <property>aero/coefficient/dCL__beta_rad</property>
            <property>aero/beta-rad</property>
        </product>
    </function>
    <function name="aero/coefficient/dCL__dpHat_rps">
        <description>dCL__dpHat_rps</description>
        <table>
            <independentVar lookup="row">aero/beta-deg</independentVar>
            <independentVar lookup="column">velocities/vt-fps</independentVar>
            <independentVar lookup="table">aero/alpha-deg</independentVar>
            <tableData breakPoint="-6.0">
                      39.38648293963254      56.26640419947507      73.14632545931758
                -10.0    0.1026828 0.1024324 0.1013009
                -5.0    0.0477033 0.0472829 0.0473204
                0.0    -0.0021047 -0.0021046 -0.0021084
                5.0    -0.0612758 -0.0616354 -0.0617518
                10.0    -0.0971032 -0.1021801 -0.1025197
                </tableData>
            <tableData breakPoint="-2.0">
                      39.38648293963254      56.26640419947507      73.14632545931758
                -10.0    0.3034041 0.3000209 0.2962664
                -5.0    0.2450171 0.2456641 0.2548089
                0.0    0.1745364 0.1775739 0.1895998
                5.0    0.1365834 0.1408174 0.1486415
                10.0    0.0724899 0.0749324 0.0776388
                </tableData>
            <tableData breakPoint="2.0">
                      39.38648293963254      56.26640419947507      73.14632545931758
                -10.0    -0.0720662 -0.0797325 -0.081407
                -5.0    -0.1310801 -0.136953  -0.1444719
                0.0    -0.1707526 -0.1733432 -0.1855019
                5.0    -0.2360816 -0.2367771 -0.2444435
                10.0    -0.3641195 -0.3607759 -0.3568397
                </tableData>
            <tableData breakPoint="6.0">
                      39.38648293963254      56.26640419947507      73.14632545931758
                -10.0    0.1539976 0.1544457 0.1540497
                -5.0    0.0606933 0.0610655 0.0612216
                0.0    0.0077903 0.0077944 0.007802
                5.0    -0.0422008 -0.0417702 -0.0417418
                10.0    -0.2896465 -0.2892677 -0.2880942
                </tableData>
            <tableData breakPoint="10.0">
                      39.38648293963254      56.26640419947507      73.14632545931758
                -10.0    0.1103696 0.1107118 0.1111243
                -5.0    0.0594454 0.0594914 0.0596039
                0.0    0.0122776 0.0122681 0.0122619
                5.0    -0.047214  -0.0473013 -0.0470115
                10.0    -0.096083  -0.0950016 -0.0940015
                </tableData>
            <tableData breakPoint="14.0">
                      39.38648293963254      56.26640419947507      73.14632545931758
                -10.0    -0.0252642 -0.0248654 -0.0244631
                -5.0    -0.0502664 -0.0503344 -0.0505385
                0.0    -0.06925   -0.0690045 -0.0686673
                5.0    -0.09361   -0.0937452 -0.0936535
                10.0    -0.1039444 -0.1031362 -0.1029951
                </tableData>
        </table>
    </function>
    <function name="aero/coefficient/CL__dpHat_rps">
        <description>CL__dpHat_rps = dCL__dpHat_rps * dpHat_rps</description>
        <product>
            <property>aero/coefficient/dCL__dpHat_rps</property>
            <property>velocities/p-aero-rad_sec</property>
            <property>aero/bi2vel</property>
        </product>
    </function>
    <function name="aero/coefficient/dCL__dqHat_rps">
        <description>dCL__dqHat_rps</description>
        <table>
            <independentVar lookup="row">aero/beta-deg</independentVar>
            <independentVar lookup="column">velocities/vt-fps</independentVar>
            <independentVar lookup="table">aero/alpha-deg</independentVar>
            <tableData breakPoint="-6.0">
                      39.38648293963254      56.26640419947507      73.14632545931758
                -10.0    10.004298  10.0035547 10.0018476
                -5.0    10.353529  10.35428   10.3560829
                0.0    10.4534433 10.4565326 10.4606596
                5.0    10.353529  10.35428   10.3560829
                10.0    10.004298  10.0035547 10.0018476
                </tableData>
            <tableData breakPoint="-2.0">
                      39.38648293963254      56.26640419947507      73.14632545931758
                -10.0    9.8897406 9.8831991 9.8654991
                -5.0    10.0558983 10.0474885 10.0495071
                0.0    10.0798225 10.0830731 10.0875372
                5.0    10.0558983 10.0477568 10.0495071
                10.0    9.8897406 9.8831991 9.8654991
                </tableData>
            <tableData breakPoint="2.0">
                      39.38648293963254      56.26640419947507      73.14632545931758
                -10.0    10.1112664 10.1063367 10.1015055
                -5.0    10.1952419 10.1876652 10.189389
                0.0    10.1686039 10.1715428 10.1755383
                5.0    10.1952419 10.1876652 10.189389
                10.0    10.1112664 10.1063367 10.1015055
                </tableData>
            <tableData breakPoint="6.0">
                      39.38648293963254      56.26640419947507      73.14632545931758
                -10.0    9.4048786 9.3973171 9.3949988
                -5.0    9.5163057 9.5149937 9.5168077
                0.0    9.5768193 9.5794258 9.583098
                5.0    9.5163057 9.5149937 9.5168077
                10.0    9.4048786 9.3973171 9.3949988
                </tableData>
            <tableData breakPoint="10.0">
                      39.38648293963254      56.26640419947507      73.14632545931758
                -10.0    8.777407  8.7777015 8.7815737
                -5.0    9.2582779 9.2589068 9.2609268
                0.0    9.2730197 9.2764539 9.2811063
                5.0    9.2582779 9.2589068 9.2609268
                10.0    8.777407  8.778813  8.7815737
                </tableData>
            <tableData breakPoint="14.0">
                      39.38648293963254      56.26640419947507      73.14632545931758
                -10.0    6.5512035 6.5474852 6.5441863
                -5.0    6.3915663 6.4229267 6.3790745
                0.0    6.7321905 6.7313991 6.7228899
                5.0    6.3915663 6.3856137 6.3790745
                10.0    6.5512035 6.5474852 6.5441863
                </tableData>
        </table>
    </function>
    <function name="aero/coefficient/CL__dqHat_rps">
        <description>CL__dqHat_rps = dCL__dqHat_rps * dqHat_rps</description>
        <product>
            <property>aero/coefficient/dCL__dqHat_rps</property>
            <property>velocities/q-aero-rad_sec</property>
            <property>aero/ci2vel</property>
        </product>
    </function>
    <function name="aero/coefficient/dCL__drHat_rps">
        <description>dCL__drHat_rps</description>
        <table>
            <independentVar lookup="row">aero/beta-deg</independentVar>
            <independentVar lookup="column">velocities/vt-fps</independentVar>
            <independentVar lookup="table">aero/alpha-deg</independentVar>
            <tableData breakPoint="-6.0">
                      39.38648293963254      56.26640419947507      73.14632545931758
                -10.0    0.2415036 0.2414305 0.241374
                -5.0    -0.0183416 -0.0183478 -0.0183353
                0.0    -0.0047942 -0.0047944 -0.0047993
                5.0    0.0093401 0.0093441 0.0093287
                10.0    0.0131833 0.0141741 0.0141663
                </tableData>
            <tableData breakPoint="-2.0">
                      39.38648293963254      56.26640419947507      73.14632545931758
                -10.0    0.0004219 0.0004257 0.0001751
                -5.0    -0.0204053  0.0409436 -0.0204694
                0.0    -0.0056488 -0.0056491 -0.0056494
                5.0    0.0113414 0.0113306 0.0113963
                10.0    0.0229637 0.0229265 0.0231358
                </tableData>
            <tableData breakPoint="2.0">
                      39.38648293963254      56.26640419947507      73.14632545931758
                -10.0    -0.1416916 -0.1417082 -0.1414953
                -5.0    -0.0154522 -0.0157031 -0.0153859
                0.0    -0.0052982 -0.0052986 -0.0052994
                5.0    0.0077563 0.0077658 0.0077034
                10.0    0.0181604 0.018181  0.0172285
                </tableData>
            <tableData breakPoint="6.0">
                      39.38648293963254      56.26640419947507      73.14632545931758
                -10.0    -0.2418911 -0.2418821 -0.2416798
                -5.0    -0.0121887 -0.0121866 -0.0121818
                0.0    -0.0036169 -0.0036149 -0.0036129
                5.0    0.0066596 0.0066546 0.0066507
                10.0    0.069351  0.0693282 0.0689536
                </tableData>
            <tableData breakPoint="10.0">
                      39.38648293963254      56.26640419947507      73.14632545931758
                -10.0    -0.0746874 -0.0746485 -0.0746615
                -5.0    -0.023271  -0.0232813 -0.0232909
                0.0    -0.0058757 -0.0058754 -0.0058763
                5.0    0.0203512 0.0203607 0.0203697
                10.0    0.0684489 0.0674287 0.0665251
                </tableData>
            <tableData breakPoint="14.0">
                      39.38648293963254      56.26640419947507      73.14632545931758
                -10.0    -0.0727456 -0.072475  -0.0721278
                -5.0    -0.0516429 -0.0519    -0.0522367
                0.0    -0.0117356 -0.0114977 -0.0111742
                5.0    0.0003136 0.0003253 0.0003841
                10.0    0.0878214 0.0865002 0.0849445
                </tableData>
        </table>
    </function>
    <function name="aero/coefficient/CL__drHat_rps">
        <description>CL__drHat_rps = dCL__drHat_rps * drHat_rps</description>
        <product>
            <property>aero/coefficient/dCL__drHat_rps</property>
            <property>velocities/r-aero-rad_sec</property>
            <property>aero/bi2vel</property>
        </product>
    </function>
    <function name="aero/coefficient/dCL__dAilR_rad">
        <description>dCL__dAilR_rad</description>
        <table>
            <independentVar lookup="row">aero/beta-deg</independentVar>
            <independentVar lookup="column">velocities/vt-fps</independentVar>
            <independentVar lookup="table">aero/alpha-deg</independentVar>
            <tableData breakPoint="-6.0">
                      39.38648293963254      56.26640419947507      73.14632545931758
                -10.0    0.391223  0.3910368 0.3909572
                -5.0    0.4128745 0.412885  0.4129825
                0.0    0.4218658 0.4220556 0.422313
                5.0    0.4175782 0.4179626 0.4181752
                10.0    0.3982832 0.3983304 0.3985783
                </tableData>
            <tableData breakPoint="-2.0">
                      39.38648293963254      56.26640419947507      73.14632545931758
                -10.0    0.4000257 0.3998542 0.3991482
                -5.0    0.4076397 0.4074688 0.4073828
                0.0    0.4135318 0.4137126 0.4139719
                5.0    0.4052822 0.4051015 0.4049423
                10.0    0.3893697 0.388957  0.3889881
                </tableData>
            <tableData breakPoint="2.0">
                      39.38648293963254      56.26640419947507      73.14632545931758
                -10.0    0.3915311 0.3913745 0.3906666
                -5.0    0.4021259 0.4020591 0.4018686
                0.0    0.4072525 0.4074287 0.4076687
                5.0    0.3959332 0.395757  0.3957664
                10.0    0.3731817 0.3727682 0.372793
                </tableData>
            <tableData breakPoint="6.0">
                      39.38648293963254      56.26640419947507      73.14632545931758
                -10.0    0.462664  0.4625116 0.4617791
                -5.0    0.3986769 0.3986782 0.3987637
                0.0    0.3993104 0.3994981 0.3997513
                5.0    0.3871614 0.3872562 0.3874702
                10.0    0.3614255 0.3614496 0.3616713
                </tableData>
            <tableData breakPoint="10.0">
                      39.38648293963254      56.26640419947507      73.14632545931758
                -10.0    0.3774092 0.3773991 0.3775728
                -5.0    0.3865608 0.3865818 0.3866985
                0.0    0.3933186 0.3934856 0.3937111
                5.0    0.3753799 0.3753921 0.3755134
                10.0    0.3527957 0.3541274 0.3532217
                </tableData>
            <tableData breakPoint="14.0">
                      39.38648293963254      56.26640419947507      73.14632545931758
                -10.0    0.3226936 0.3223128 0.3218835
                -5.0    0.3083355 0.3079129 0.3073943
                0.0    0.3049173 0.3056861 0.3058549
                5.0    0.3041017 0.3036225 0.3030729
                10.0    0.3004856 0.3006778 0.3009643
                </tableData>
        </table>
    </function>
    <function name="aero/coefficient/CL__dAilR_rad">
        <description>CL__dAilR_rad = dCL__dAilR_rad * dAilR_rad</description>
        <product>
            <property>aero/coefficient/dCL__dAilR_rad</property>
            <property>fcs/posAilR_rad</property>
        </product>
    </function>
    <function name="aero/coefficient/dCL__dAilL_rad">
        <description>dCL__dAilL_rad</description>
        <table>
            <independentVar lookup="row">aero/beta-deg</independentVar>
            <independentVar lookup="column">velocities/vt-fps</independentVar>
            <independentVar lookup="table">aero/alpha-deg</independentVar>
            <tableData breakPoint="-6.0">
                      39.38648293963254      56.26640419947507      73.14632545931758
                -10.0    0.3982832 0.3983304 0.3985783
                -5.0    0.4178765 0.4179626 0.4181752
                0.0    0.4218658 0.4220556 0.422313
                5.0    0.4128745 0.412885  0.4129825
                10.0    0.391223  0.3910368 0.3909572
                </tableData>
            <tableData breakPoint="-2.0">
                      39.38648293963254      56.26640419947507      73.14632545931758
                -10.0    0.3893697 0.388957  0.3889881
                -5.0    0.4052822 0.4049981 0.4051071
                0.0    0.4135318 0.4137126 0.4139719
                5.0    0.4076397 0.4075721 0.4073828
                10.0    0.4000257 0.3998542 0.3991482
                </tableData>
            <tableData breakPoint="2.0">
                      39.38648293963254      56.26640419947507      73.14632545931758
                -10.0    0.3731817 0.3727682 0.372793
                -5.0    0.3958614 0.395757  0.3957664
                0.0    0.4072525 0.4074287 0.4076687
                5.0    0.4021259 0.4020591 0.4018686
                10.0    0.3915311 0.3913745 0.3906666
                </tableData>
            <tableData breakPoint="6.0">
                      39.38648293963254      56.26640419947507      73.14632545931758
                -10.0    0.3614255 0.3614496 0.3616713
                -5.0    0.3871614 0.3872562 0.3874702
                0.0    0.3993104 0.3994981 0.3997513
                5.0    0.3986764 0.3986782 0.3987637
                10.0    0.462664  0.4625116 0.4617791
                </tableData>
            <tableData breakPoint="10.0">
                      39.38648293963254      56.26640419947507      73.14632545931758
                -10.0    0.3527957 0.3529404 0.3532217
                -5.0    0.3753799 0.3753921 0.3755134
                0.0    0.3933186 0.3934856 0.3937111
                5.0    0.3865608 0.3865818 0.3866985
                10.0    0.3774092 0.3773991 0.3775728
                </tableData>
            <tableData breakPoint="14.0">
                      39.38648293963254      56.26640419947507      73.14632545931758
                -10.0    0.3004856 0.3006778 0.3009643
                -5.0    0.3041017 0.3036225 0.3030729
                0.0    0.3055767 0.3056861 0.3058549
                5.0    0.3083355 0.3079129 0.3073943
                10.0    0.3226936 0.3223128 0.3218835
                </tableData>
        </table>
    </function>
    <function name="aero/coefficient/CL__dAilL_rad">
        <description>CL__dAilL_rad = dCL__dAilL_rad * dAilL_rad</description>
        <product>
            <property>aero/coefficient/dCL__dAilL_rad</property>
            <property>fcs/posAilL_rad</property>
        </product>
    </function>
    <function name="aero/coefficient/dCL__dRud_rad">
        <description>dCL__dRud_rad</description>
        <table>
            <independentVar lookup="row">aero/beta-deg</independentVar>
            <independentVar lookup="column">velocities/vt-fps</independentVar>
            <independentVar lookup="table">aero/alpha-deg</independentVar>
            <tableData breakPoint="-6.0">
                      39.38648293963254      56.26640419947507      73.14632545931758
                -10.0    -0.0143288 -0.0150333 -0.0150265
                -5.0    -0.0054381 -0.0054391 -0.0054351
                0.0    -0.0001342 -0.0001342 -0.0001345
                5.0    0.0052174 0.0052184 0.0052144
                10.0    0.0117819 0.0118012 0.0118127
                </tableData>
            <tableData breakPoint="-2.0">
                      39.38648293963254      56.26640419947507      73.14632545931758
                -10.0    -0.0084123 -0.0084074 -0.0084042
                -5.0    -0.0054254 -0.0055304 -0.0054287
                0.0    -0.0003149 -0.000315  -0.0003149
                5.0    0.0051745 0.0051752 0.0051767
                10.0    0.0082099 0.0082048 0.0082014
                </tableData>
            <tableData breakPoint="2.0">
                      39.38648293963254      56.26640419947507      73.14632545931758
                -10.0    -0.0038804 -0.0038756 -0.0038725
                -5.0    -0.0026668 -0.0026652 -0.0026643
                0.0    -0.0003304 -0.0003302 -0.0003299
                5.0    0.0023766 0.0023753 0.0023749
                10.0    0.0038777 0.0038722 0.0038686
                </tableData>
            <tableData breakPoint="6.0">
                      39.38648293963254      56.26640419947507      73.14632545931758
                -10.0    -0.0002226 -0.00022   -0.0002042
                -5.0    -0.0014115 -0.0014156 -0.0014151
                0.0    -0.0003377 -0.0003371 -0.0003386
                5.0    0.0012156 0.001213  0.0012083
                10.0     1.591e-04  1.571e-04 -5.000e-05
                </tableData>
            <tableData breakPoint="10.0">
                      39.38648293963254      56.26640419947507      73.14632545931758
                -10.0    -0.0038197 -0.000168  -0.0001628
                -5.0    0.0005473 0.0005446 0.000541
                0.0    -0.000258  -0.000258  -0.0002518
                5.0    -0.0004751 -0.0004758 -0.0004774
                10.0    0.0001522 0.0001424 0.0001323
                </tableData>
            <tableData breakPoint="14.0">
                      39.38648293963254      56.26640419947507      73.14632545931758
                -10.0    0.0010225 0.0010279 0.0010314
                -5.0    0.0017345 0.0017326 0.0017218
                0.0    -0.0001005 -0.0001074 -0.0001108
                5.0    -0.0016052 -0.0016063 -0.0016176
                10.0    -0.001055  -0.0010477 -0.0010535
                </tableData>
        </table>
    </function>
    <function name="aero/coefficient/CL__dRud_rad">
        <description>CL__dRud_rad = dCL__dRud_rad * dRud_rad</description>
        <product>
            <property>aero/coefficient/dCL__dRud_rad</property>
            <property>fcs/posRud_rad</property>
        </product>
    </function>
    <function name="aero/coefficient/dCL__dFlapR_rad">
        <description>dCL__dFlapR_rad</description>
        <table>
            <independentVar lookup="row">aero/beta-deg</independentVar>
            <independentVar lookup="column">velocities/vt-fps</independentVar>
            <independentVar lookup="table">aero/alpha-deg</independentVar>
            <tableData breakPoint="-6.0">
                      39.38648293963254      56.26640419947507      73.14632545931758
                -10.0    0.3678196 0.3677067 0.3678338
                -5.0    0.3698785 0.3699232 0.3700315
                0.0    0.342355  0.342497  0.3426904
                5.0    0.3029335 0.302964  0.3031056
                10.0    0.2591776 0.2591261 0.2592779
                </tableData>
            <tableData breakPoint="-2.0">
                      39.38648293963254      56.26640419947507      73.14632545931758
                -10.0    0.375509  0.375391  0.3751143
                -5.0    0.3613468 0.3611784 0.3612028
                0.0    0.3375301 0.337675  0.3378711
                5.0    0.3040189 0.3038894 0.3038424
                10.0    0.2754177 0.2751283 0.2749817
                </tableData>
            <tableData breakPoint="2.0">
                      39.38648293963254      56.26640419947507      73.14632545931758
                -10.0    0.3742642 0.3741504 0.3738728
                -5.0    0.3602057 0.3601411 0.3600618
                0.0    0.3440106 0.3441442 0.3443277
                5.0    0.3163428 0.3162126 0.3161654
                10.0    0.2837821 0.2834846 0.2833249
                </tableData>
            <tableData breakPoint="6.0">
                      39.38648293963254      56.26640419947507      73.14632545931758
                -10.0    0.3593545 0.3593092 0.3593491
                -5.0    0.3711354 0.3711782 0.3713105
                0.0    0.3537578 0.3539069 0.3541118
                5.0    0.3319565 0.3319876 0.3321151
                10.0    0.2959481 0.2958877 0.295997
                </tableData>
            <tableData breakPoint="10.0">
                      39.38648293963254      56.26640419947507      73.14632545931758
                -10.0    0.3506687 0.3506718 0.3507885
                -5.0    0.3466392 0.3509779 0.3467069
                0.0    0.3431288 0.3432536 0.3434291
                5.0    0.3289998 0.3290443 0.3291522
                10.0    0.3070165 0.3070585 0.3071652
                </tableData>
            <tableData breakPoint="14.0">
                      39.38648293963254      56.26640419947507      73.14632545931758
                -10.0    0.122037  0.1215243 0.1209356
                -5.0    0.0727516 0.0722228 0.0715594
                0.0    0.0664994 0.0665195 0.0665256
                5.0    0.0704037 0.069798  0.0684197
                10.0    0.1187524 0.1182689 0.1176427
                </tableData>
        </table>
    </function>
    <function name="aero/coefficient/CL__dFlapR_rad">
        <description>CL__dFlapR_rad = dCL__dFlapR_rad * dFlapR_rad</description>
        <product>
            <property>aero/coefficient/dCL__dFlapR_rad</property>
            <property>fcs/posFlapR_rad</property>
        </product>
    </function>
    <function name="aero/coefficient/dCL__dFlapL_rad">
        <description>dCL__dFlapL_rad</description>
        <table>
            <independentVar lookup="row">aero/beta-deg</independentVar>
            <independentVar lookup="column">velocities/vt-fps</independentVar>
            <independentVar lookup="table">aero/alpha-deg</independentVar>
            <tableData breakPoint="-6.0">
                      39.38648293963254      56.26640419947507      73.14632545931758
                -10.0    0.2591776 0.2591261 0.2592779
                -5.0    0.3029335 0.302964  0.3031056
                0.0    0.342355  0.342497  0.3426904
                5.0    0.3698785 0.3699232 0.3701438
                10.0    0.3678196 0.3677842 0.3679863
                </tableData>
            <tableData breakPoint="-2.0">
                      39.38648293963254      56.26640419947507      73.14632545931758
                -10.0    0.2754177 0.2751283 0.2749817
                -5.0    0.3040189 0.3037861 0.3038424
                0.0    0.3375301 0.337675  0.3378711
                5.0    0.3613468 0.3612818 0.3612028
                10.0    0.375509  0.375391  0.3751143
                </tableData>
            <tableData breakPoint="2.0">
                      39.38648293963254      56.26640419947507      73.14632545931758
                -10.0    0.2837821 0.2834846 0.2833249
                -5.0    0.3163428 0.3162126 0.3161654
                0.0    0.3440106 0.3441442 0.3443277
                5.0    0.350904  0.3601411 0.3600618
                10.0    0.3742379 0.3741513 0.3738728
                </tableData>
            <tableData breakPoint="6.0">
                      39.38648293963254      56.26640419947507      73.14632545931758
                -10.0    0.2959481 0.2958877 0.295997
                -5.0    0.3319565 0.3319876 0.3321151
                0.0    0.3537578 0.3539069 0.3541118
                5.0    0.3711354 0.3711782 0.3713105
                10.0    0.3593545 0.3593092 0.3593491
                </tableData>
            <tableData breakPoint="10.0">
                      39.38648293963254      56.26640419947507      73.14632545931758
                -10.0    0.3070165 0.3070585 0.3072175
                -5.0    0.3262815 0.3290443 0.3291522
                0.0    0.3431288 0.3432536 0.3434291
                5.0    0.3466392 0.3465958 0.3467069
                10.0    0.3506687 0.3506718 0.3507885
                </tableData>
            <tableData breakPoint="14.0">
                      39.38648293963254      56.26640419947507      73.14632545931758
                -10.0    0.1187524 0.1182689 0.1176427
                -5.0    0.0704037 0.069798  0.0684197
                0.0    0.0664994 0.0665195 0.0665256
                5.0    0.0727516 0.0744527 0.0715594
                10.0    0.122037  0.1215243 0.1209356
                </tableData>
        </table>
    </function>
    <function name="aero/coefficient/CL__dFlapL_rad">
        <description>CL__dFlapL_rad = dCL__dFlapL_rad * dFlapL_rad</description>
        <product>
            <property>aero/coefficient/dCL__dFlapL_rad</property>
            <property>fcs/posFlapL_rad</property>
        </product>
    </function>
    <function name="aero/coefficient/dCL__dElev_rad">
        <description>dCL__dElev_rad</description>
        <table>
            <independentVar lookup="row">aero/beta-deg</independentVar>
            <independentVar lookup="column">velocities/vt-fps</independentVar>
            <independentVar lookup="table">aero/alpha-deg</independentVar>
            <tableData breakPoint="-6.0">
                      39.38648293963254      56.26640419947507      73.14632545931758
                -10.0    0.5710558 0.5711867 0.5711593
                -5.0    0.581557  0.5816872 0.5817925
                0.0    0.5880992 0.5882763 0.5884927
                5.0    0.581557  0.5816872 0.5817925
                10.0    0.5710558 0.5711867 0.5711593
                </tableData>
            <tableData breakPoint="-2.0">
                      39.38648293963254      56.26640419947507      73.14632545931758
                -10.0    0.6089201 0.6089594 0.609061
                -5.0    0.6178416 0.6178318 0.6180954
                0.0    0.6056372 0.6058218 0.6060791
                5.0    0.6178416 0.6179351 0.6180954
                10.0    0.6089201 0.6089594 0.609061
                </tableData>
            <tableData breakPoint="2.0">
                      39.38648293963254      56.26640419947507      73.14632545931758
                -10.0    0.5924251 0.592454  0.5925444
                -5.0    0.6055798 0.6056681 0.6058208
                0.0    0.6049964 0.605181  0.6054311
                5.0    0.6055798 0.6056681 0.6058208
                10.0    0.5924251 0.592454  0.5925444
                </tableData>
            <tableData breakPoint="6.0">
                      39.38648293963254      56.26640419947507      73.14632545931758
                -10.0    0.5729147 0.5730173 0.57334
                -5.0    0.5833963 0.583529  0.5836129
                0.0    0.5889854 0.5891809 0.5894375
                5.0    0.5833963 0.583529  0.5836129
                10.0    0.5729147 0.5730173 0.57334
                </tableData>
            <tableData breakPoint="10.0">
                      39.38648293963254      56.26640419947507      73.14632545931758
                -10.0    0.5724561 0.572676  0.572988
                -5.0    0.5852073 0.5852886 0.585422
                0.0    0.5922556 0.5924255 0.5926558
                5.0    0.5852073 0.5852886 0.585422
                10.0    0.5724561 0.572676  0.572988
                </tableData>
            <tableData breakPoint="14.0">
                      39.38648293963254      56.26640419947507      73.14632545931758
                -10.0    0.4953812 0.4954976 0.4957094
                -5.0    0.5285569 0.5287169 0.5288419
                0.0    0.5544878 0.5546605 0.5548972
                5.0    0.5285569 0.5287169 0.5288419
                10.0    0.4953812 0.4954976 0.4957094
                </tableData>
        </table>
    </function>
    <function name="aero/coefficient/CL__dElev_rad">
        <description>CL__dElev_rad = dCL__dElev_rad * dElev_rad</description>
        <product>
            <property>aero/coefficient/dCL__dElev_rad</property>
            <property>fcs/posElev_rad</property>
        </product>
    </function>
    <function name="aero/coefficient/CL">
        <description>CL summation</description>
        <sum>
            <property>aero/coefficient/CL__zero</property>
            <property>aero/coefficient/CL__alpha_rad</property>
            <property>aero/coefficient/CL__beta_rad</property>
            <property>aero/coefficient/CL__dpHat_rps</property>
            <property>aero/coefficient/CL__dqHat_rps</property>
            <property>aero/coefficient/CL__drHat_rps</property>
            <property>aero/coefficient/CL__dAilR_rad</property>
            <property>aero/coefficient/CL__dAilL_rad</property>
            <property>aero/coefficient/CL__dRud_rad</property>
            <property>aero/coefficient/CL__dFlapR_rad</property>
            <property>aero/coefficient/CL__dFlapL_rad</property>
            <property>aero/coefficient/CL__dElev_rad</property>
        </sum>
    </function>
    <function name="aero/coefficient/CD__zero">
        <description>CD__zero</description>
        <table>
            <independentVar lookup="row">aero/beta-deg</independentVar>
            <independentVar lookup="column">velocities/vt-fps</independentVar>
            <independentVar lookup="table">aero/alpha-deg</independentVar>
            <tableData breakPoint="-6.0">
                      39.38648293963254      56.26640419947507      73.14632545931758
                -10.0    0.15783518 0.15783386 0.15783194
                -5.0    0.15445938 0.15444566 0.1544299
                0.0    0.15758202 0.15755498 0.15752595
                5.0    0.15510948 0.15510511 0.15509866
                10.0    0.15541284 0.15541451 0.15541298
                </tableData>
            <tableData breakPoint="-2.0">
                      39.38648293963254      56.26640419947507      73.14632545931758
                -10.0    0.16359442 0.16359836 0.16360016
                -5.0    0.16367614 0.16367762 0.16367595
                0.0    0.16384158 0.16384267 0.16384352
                5.0    0.16359197 0.16359234 0.16359174
                10.0    0.16234302 0.16235087 0.1623553
                </tableData>
            <tableData breakPoint="2.0">
                      39.38648293963254      56.26640419947507      73.14632545931758
                -10.0    0.16231881 0.16231777 0.16231741
                -5.0    0.1623083  0.16230905 0.16230708
                0.0    0.16253575 0.16253623 0.16253409
                5.0    0.16224795 0.16224739 0.16224546
                10.0    0.16064546 0.1606485  0.16065113
                </tableData>
            <tableData breakPoint="6.0">
                      39.38648293963254      56.26640419947507      73.14632545931758
                -10.0    0.15180169 0.1517956  0.15178754
                -5.0    0.15105665 0.15104361 0.15102955
                0.0    0.15194894 0.15193864 0.15192633
                5.0    0.15355353 0.15354071 0.1535366
                10.0    0.15420367 0.15420387 0.1542018
                </tableData>
            <tableData breakPoint="10.0">
                      39.38648293963254      56.26640419947507      73.14632545931758
                -10.0    0.13660666 0.13658037 0.13655428
                -5.0    0.13555931 0.13553518 0.13550917
                0.0    0.13599784 0.13596718 0.13593141
                5.0    0.13552766 0.13548492 0.13533113
                10.0    0.13788325 0.13785631 0.13782841
                </tableData>
            <tableData breakPoint="14.0">
                      39.38648293963254      56.26640419947507      73.14632545931758
                -10.0    0.14308375 0.14313134 0.14318834
                -5.0    0.14184404 0.14188233 0.14194266
                0.0    0.14339506 0.14348547 0.14358316
                5.0    0.14184116 0.14188155 0.14194576
                10.0    0.14445158 0.1444866  0.14453604
                </tableData>
        </table>
    </function>
    <function name="aero/coefficient/dCD__alpha_rad">
        <description>dCD__alpha_rad</description>
        <table>
            <independentVar lookup="row">aero/beta-deg</independentVar>
            <independentVar lookup="column">velocities/vt-fps</independentVar>
            <independentVar lookup="table">aero/alpha-deg</independentVar>
            <tableData breakPoint="-6.0">
                      39.38648293963254      56.26640419947507      73.14632545931758
                -10.0    -0.1768745 -0.1769688 -0.1770926
                -5.0    -0.2063937 -0.2065268 -0.2067066
                0.0    -0.1680216 -0.1683552 -0.1687318
                5.0    -0.2063937 -0.2065268 -0.2067066
                10.0    -0.1768745 -0.1769688 -0.1770926
                </tableData>
            <tableData breakPoint="-2.0">
                      39.38648293963254      56.26640419947507      73.14632545931758
                -10.0    -0.0511051 -0.0510583 -0.0510647
                -5.0    -0.0532557 -0.0532823 -0.053333
                0.0    -0.0542912 -0.0542371 -0.0541983
                5.0    -0.0532557 -0.0532925 -0.053333
                10.0    -0.0511051 -0.0510583 -0.0510647
                </tableData>
            <tableData breakPoint="2.0">
                      39.38648293963254      56.26640419947507      73.14632545931758
                -10.0    0.0896899 0.0897788 0.0898401
                -5.0    0.0911652 0.0912275 0.0913078
                0.0    0.0916402 0.0916037 0.0916535
                5.0    0.0911652 0.0912275 0.0913078
                10.0    0.0896899 0.0897788 0.0898401
                </tableData>
            <tableData breakPoint="6.0">
                      39.38648293963254      56.26640419947507      73.14632545931758
                -10.0    0.2158705 0.2159989 0.21616
                -5.0    0.227502  0.2276283 0.227789
                0.0    0.2275355 0.227715  0.2279347
                5.0    0.227502  0.2276283 0.227789
                10.0    0.2158705 0.2159989 0.21616
                </tableData>
            <tableData breakPoint="10.0">
                      39.38648293963254      56.26640419947507      73.14632545931758
                -10.0    0.3361762 0.336448  0.3367559
                -5.0    0.342738  0.3431209 0.3435377
                0.0    0.339326  0.3396415 0.34002
                5.0    0.342738  0.3431209 0.3435377
                10.0    0.3361762 0.336448  0.3367559
                </tableData>
            <tableData breakPoint="14.0">
                      39.38648293963254      56.26640419947507      73.14632545931758
                -10.0    0.3204945 0.3204511 0.3203716
                -5.0    0.3258456 0.3258373 0.3257605
                0.0    0.3173574 0.3171429 0.3169289
                5.0    0.3258456 0.3258373 0.3257605
                10.0    0.3204945 0.3204511 0.3203716
                </tableData>
        </table>
    </function>
    <function name="aero/coefficient/CD__alpha_rad">
        <description>CD__alpha_rad = dCD__alpha_rad * alpha_rad</description>
        <product>
            <property>aero/coefficient/dCD__alpha_rad</property>
            <property>aero/alpha-rad</property>
        </product>
    </function>
    <function name="aero/coefficient/dCD__beta_rad">
        <description>dCD__beta_rad</description>
        <table>
            <independentVar lookup="row">aero/beta-deg</independentVar>
            <independentVar lookup="column">velocities/vt-fps</independentVar>
            <independentVar lookup="table">aero/alpha-deg</independentVar>
            <tableData breakPoint="-6.0">
                      39.38648293963254      56.26640419947507      73.14632545931758
                -10.0    -0.0011583 -0.0011385 -0.0011165
                -5.0    -0.0043433 -0.0044256 -0.0045016
                0.0    0.0573295 0.057232  0.0571432
                5.0    -0.0031063 -0.0031312 -0.0031619
                10.0    0.0150373 0.0150004 0.0149761
                </tableData>
            <tableData breakPoint="-2.0">
                      39.38648293963254      56.26640419947507      73.14632545931758
                -10.0    -0.0078866 -0.0078694 -0.0078601
                -5.0    -0.0053238 -0.005303  -0.0053145
                0.0    0.0014893 0.001488  0.0014879
                5.0    0.0062883 0.0062785 0.0062795
                10.0    0.0150566 0.015017  0.0149926
                </tableData>
            <tableData breakPoint="2.0">
                      39.38648293963254      56.26640419947507      73.14632545931758
                -10.0    -0.0074222 -0.0074081 -0.0074019
                -5.0    -0.0056681 -0.0056449 -0.0056479
                0.0    0.0017393 0.0017383 0.0017384
                5.0    0.0063597 0.0063515 0.0063541
                10.0    0.0170098 0.0169723 0.016949
                </tableData>
            <tableData breakPoint="6.0">
                      39.38648293963254      56.26640419947507      73.14632545931758
                -10.0    -0.0126091 -0.0126002 -0.012595
                -5.0    -0.0157815 -0.0158676 -0.0159493
                0.0    0.0023906 0.002273  0.0021739
                5.0    -0.0128306 -0.0127471 -0.0127794
                10.0    -0.0011532 -0.0011982 -0.0012377
                </tableData>
            <tableData breakPoint="10.0">
                      39.38648293963254      56.26640419947507      73.14632545931758
                -10.0    0.0048958 0.004923  0.0049565
                -5.0    0.0059367 0.0062037 0.0064539
                0.0    -0.0097251 -0.0097219 -0.0097242
                5.0    -0.005574  -0.0056277 -0.0044137
                10.0    -0.0122101 -0.0122336 -0.0122567
                </tableData>
            <tableData breakPoint="14.0">
                      39.38648293963254      56.26640419947507      73.14632545931758
                -10.0    0.0086226 0.0086884 0.0087232
                -5.0    0.0090921 0.0091513 0.009207
                0.0    -0.0017336 -0.0017745 -0.0018641
                5.0    -0.0090591 -0.0091424 -0.0092426
                10.0    -0.0164597 -0.0164535 -0.016445
                </tableData>
        </table>
    </function>
    <function name="aero/coefficient/CD__beta_rad">
        <description>CD__beta_rad = dCD__beta_rad * beta_rad</description>
        <product>
            <property>aero/coefficient/dCD__beta_rad</property>
            <property>aero/beta-rad</property>
        </product>
    </function>
    <function name="aero/coefficient/dCD__dpHat_rps">
        <description>dCD__dpHat_rps</description>
        <table>
            <independentVar lookup="row">aero/beta-deg</independentVar>
            <independentVar lookup="column">velocities/vt-fps</independentVar>
            <independentVar lookup="table">aero/alpha-deg</independentVar>
            <tableData breakPoint="-6.0">
                      39.38648293963254      56.26640419947507      73.14632545931758
                -10.0    0.0041944 0.00419   0.0041856
                -5.0    0.0032324 0.0032384 0.003244
                0.0    0.0055182 0.0055182 0.005516
                5.0    0.0083019 0.0082939 0.0082848
                10.0    0.0065873 0.0073136 0.0073018
                </tableData>
            <tableData breakPoint="-2.0">
                      39.38648293963254      56.26640419947507      73.14632545931758
                -10.0    0.0050271 0.0050378 0.0050397
                -5.0    0.0060812 0.0060992 0.006107
                0.0    0.0060682 0.0060852 0.0061028
                5.0    0.0060124 0.0060057 0.0060071
                10.0    0.0070415 0.0070881 0.0071138
                </tableData>
            <tableData breakPoint="2.0">
                      39.38648293963254      56.26640419947507      73.14632545931758
                -10.0    0.0081995 0.0082495 0.0082756
                -5.0    0.0064047 0.0063982 0.0064002
                0.0    0.0061761 0.0061928 0.00621
                5.0    0.0057997 0.0058119 0.0058235
                10.0    0.0040388 0.0040459 0.004043
                </tableData>
            <tableData breakPoint="6.0">
                      39.38648293963254      56.26640419947507      73.14632545931758
                -10.0    0.0091235 0.0089811 0.0091071
                -5.0    0.0108084 0.0108013 0.0107952
                0.0    0.0060866 0.0060867 0.0060874
                5.0    0.001648  0.001653  0.0016592
                10.0    0.0029768 0.0029805 0.0029863
                </tableData>
            <tableData breakPoint="10.0">
                      39.38648293963254      56.26640419947507      73.14632545931758
                -10.0    0.0096255 0.0096128 0.0096019
                -5.0    0.0070977 0.0070889 0.0070839
                0.0    0.0057579 0.0057614 0.0057666
                5.0    0.0036785 0.0036836 0.0036891
                10.0    0.0008979 0.0009057 0.0009124
                </tableData>
            <tableData breakPoint="14.0">
                      39.38648293963254      56.26640419947507      73.14632545931758
                -10.0    0.0011073 0.0010943 0.0010695
                -5.0    -0.0005681 -0.0005877 -0.0006207
                0.0    -0.0005234 -0.0005153 -0.0005053
                5.0    -0.0001099 -0.0001189 -0.0001363
                10.0    -0.0006263 -0.0006088 -0.0006051
                </tableData>
        </table>
    </function>
    <function name="aero/coefficient/CD__dpHat_rps">
        <description>CD__dpHat_rps = dCD__dpHat_rps * dpHat_rps</description>
        <product>
            <property>aero/coefficient/dCD__dpHat_rps</property>
            <property>velocities/p-aero-rad_sec</property>
            <property>aero/bi2vel</property>
        </product>
    </function>
    <function name="aero/coefficient/dCD__dqHat_rps">
        <description>dCD__dqHat_rps</description>
        <table>
            <independentVar lookup="row">aero/beta-deg</independentVar>
            <independentVar lookup="column">velocities/vt-fps</independentVar>
            <independentVar lookup="table">aero/alpha-deg</independentVar>
            <tableData breakPoint="-6.0">
                      39.38648293963254      56.26640419947507      73.14632545931758
                -10.0    -0.5044294 -0.504625  -0.5049297
                -5.0    -0.5223361 -0.5225888 -0.5229624
                0.0    -0.4492449 -0.4494915 -0.4498486
                5.0    -0.5223361 -0.5225888 -0.5229624
                10.0    -0.5044294 -0.504625  -0.5049297
                </tableData>
            <tableData breakPoint="-2.0">
                      39.38648293963254      56.26640419947507      73.14632545931758
                -10.0    -0.1160487 -0.1160057 -0.1160796
                -5.0    -0.1207908 -0.1208397 -0.120872
                0.0    -0.1190721 -0.1189109 -0.1188705
                5.0    -0.1207908 -0.1208661 -0.120872
                10.0    -0.1160487 -0.1160057 -0.1160796
                </tableData>
            <tableData breakPoint="2.0">
                      39.38648293963254      56.26640419947507      73.14632545931758
                -10.0    0.252645  0.2527275 0.2528948
                -5.0    0.2552729 0.2553861 0.2555653
                0.0    0.2662179 0.2661135 0.2661478
                5.0    0.2552729 0.2553861 0.2555653
                10.0    0.252645  0.2527275 0.2528948
                </tableData>
            <tableData breakPoint="6.0">
                      39.38648293963254      56.26640419947507      73.14632545931758
                -10.0    0.6029046 0.6031974 0.6036269
                -5.0    0.6276484 0.6279717 0.6284465
                0.0    0.6266912 0.6270521 0.6275593
                5.0    0.6276484 0.6279717 0.6284465
                10.0    0.6029046 0.6031974 0.6036269
                </tableData>
            <tableData breakPoint="10.0">
                      39.38648293963254      56.26640419947507      73.14632545931758
                -10.0    0.8959146 0.8963816 0.8970227
                -5.0    0.9434726 0.9440005 0.9447105
                0.0    0.9558702 0.9565281 0.9573678
                5.0    0.9434726 0.9440005 0.9447105
                10.0    0.8959146 0.8968991 0.8970227
                </tableData>
            <tableData breakPoint="14.0">
                      39.38648293963254      56.26640419947507      73.14632545931758
                -10.0    1.0364615 1.0365829 1.0367314
                -5.0    1.0476721 1.5914173 1.0481296
                0.0    1.0807034 1.0811674 1.08846
                5.0    1.0476721 1.0479075 1.0481296
                10.0    1.0364615 1.0365829 1.0367314
                </tableData>
        </table>
    </function>
    <function name="aero/coefficient/CD__dqHat_rps">
        <description>CD__dqHat_rps = dCD__dqHat_rps * dqHat_rps</description>
        <product>
            <property>aero/coefficient/dCD__dqHat_rps</property>
            <property>velocities/q-aero-rad_sec</property>
            <property>aero/ci2vel</property>
        </product>
    </function>
    <function name="aero/coefficient/dCD__drHat_rps">
        <description>dCD__drHat_rps</description>
        <table>
            <independentVar lookup="row">aero/beta-deg</independentVar>
            <independentVar lookup="column">velocities/vt-fps</independentVar>
            <independentVar lookup="table">aero/alpha-deg</independentVar>
            <tableData breakPoint="-6.0">
                      39.38648293963254      56.26640419947507      73.14632545931758
                -10.0    0.0159328 0.0159315 0.0159329
                -5.0    0.0120396 0.0120401 0.0120405
                0.0    0.0024301 0.0024305 0.0024281
                5.0    -0.0085972 -0.0085969 -0.0085963
                10.0    -0.0129188 -0.0129382 -0.0129339
                </tableData>
            <tableData breakPoint="-2.0">
                      39.38648293963254      56.26640419947507      73.14632545931758
                -10.0    0.0147656 0.0147644 0.0147636
                -5.0    0.0088578 0.0072781 0.0088592
                0.0    0.0018842 0.0018847 0.0018852
                5.0    -0.0054413 -0.0054415 -0.0054419
                10.0    -0.0118415 -0.0118401 -0.0118389
                </tableData>
            <tableData breakPoint="2.0">
                      39.38648293963254      56.26640419947507      73.14632545931758
                -10.0    0.015435  0.015436  0.0154373
                -5.0    0.0092554 0.0092859 0.0092596
                0.0    0.0018854 0.0018859 0.0018865
                5.0    -0.0053569 -0.005358  -0.0053596
                10.0    -0.0123172 -0.012318  -0.0123001
                </tableData>
            <tableData breakPoint="6.0">
                      39.38648293963254      56.26640419947507      73.14632545931758
                -10.0    0.017987  0.0179861 0.0179848
                -5.0    0.0110847 0.0110856 0.0110877
                0.0    0.0022817 0.0022824 0.0022831
                5.0    -0.0072132 -0.0072139 -0.007215
                10.0    -0.0147286 -0.014728  -0.0147298
                </tableData>
            <tableData breakPoint="10.0">
                      39.38648293963254      56.26640419947507      73.14632545931758
                -10.0    0.0164406 0.0164417 0.0164365
                -5.0    0.0086084 0.0086088 0.0086095
                0.0    0.0017311 0.0017327 0.0017334
                5.0    -0.0051142 -0.0051133 -0.0051121
                10.0    -0.0133768 -0.0133795 -0.0133812
                </tableData>
            <tableData breakPoint="14.0">
                      39.38648293963254      56.26640419947507      73.14632545931758
                -10.0    0.0157378 0.0157517 0.015771
                -5.0    0.0066496 0.0066424 0.0066344
                0.0    0.0015343 0.0015492 0.0015658
                5.0    -0.0052273 -0.0052229 -0.0052141
                10.0    -0.0118113 -0.0118152 -0.0118129
                </tableData>
        </table>
    </function>
    <function name="aero/coefficient/CD__drHat_rps">
        <description>CD__drHat_rps = dCD__drHat_rps * drHat_rps</description>
        <product>
            <property>aero/coefficient/dCD__drHat_rps</property>
            <property>velocities/r-aero-rad_sec</property>
            <property>aero/bi2vel</property>
        </product>
    </function>
    <function name="aero/coefficient/dCD__dAilR_rad">
        <description>dCD__dAilR_rad</description>
        <table>
            <independentVar lookup="row">aero/beta-deg</independentVar>
            <independentVar lookup="column">velocities/vt-fps</independentVar>
            <independentVar lookup="table">aero/alpha-deg</independentVar>
            <tableData breakPoint="-6.0">
                      39.38648293963254      56.26640419947507      73.14632545931758
                -10.0    -0.0151386 -0.0151441 -0.0151521
                -5.0    -0.0181295 -0.0181367 -0.018148
                0.0    -0.0152033 -0.0152126 -0.0152243
                5.0    -0.0148853 -0.0149094 -0.0149278
                10.0    -0.0144877 -0.0144968 -0.0145111
                </tableData>
            <tableData breakPoint="-2.0">
                      39.38648293963254      56.26640419947507      73.14632545931758
                -10.0    -0.005169  -0.005171  -0.0051762
                -5.0    -0.004789  -0.0047812 -0.0047841
                0.0    -0.0046059 -0.0045649 -0.0045746
                5.0    -0.0046566 -0.0046668 -0.0046744
                10.0    -0.0041174 -0.004112  -0.0041121
                </tableData>
            <tableData breakPoint="2.0">
                      39.38648293963254      56.26640419947507      73.14632545931758
                -10.0    0.0069104 0.0069138 0.0069195
                -5.0    0.0065116 0.0065152 0.0065061
                0.0    0.0063011 0.0062802 0.0062666
                5.0    0.0062992 0.0063106 0.0063217
                10.0    0.0056649 0.0056605 0.0056618
                </tableData>
            <tableData breakPoint="6.0">
                      39.38648293963254      56.26640419947507      73.14632545931758
                -10.0    0.0167398 0.0167492 0.0167585
                -5.0    0.0198003 0.0198074 0.019819
                0.0    0.0176955 0.0177064 0.0177213
                5.0    0.0160813 0.0160963 0.0161147
                10.0    0.0150558 0.015064  0.0150758
                </tableData>
            <tableData breakPoint="10.0">
                      39.38648293963254      56.26640419947507      73.14632545931758
                -10.0    0.0283134 0.0283303 0.0283489
                -5.0    0.027677  0.0276885 0.0277079
                0.0    0.0281588 0.0281833 0.0282122
                5.0    0.0254739 0.0254927 0.0255128
                10.0    0.0230004 0.0228817 0.0230275
                </tableData>
            <tableData breakPoint="14.0">
                      39.38648293963254      56.26640419947507      73.14632545931758
                -10.0    0.0344158 0.0344049 0.0343757
                -5.0    0.0323508 0.0323622 0.0323395
                0.0    0.0284039 0.0318062 0.0318498
                5.0    0.0295888 0.0295919 0.0295741
                10.0    0.0277292 0.0277429 0.0277627
                </tableData>
        </table>
    </function>
    <function name="aero/coefficient/CD__dAilR_rad">
        <description>CD__dAilR_rad = dCD__dAilR_rad * dAilR_rad</description>
        <product>
            <property>aero/coefficient/dCD__dAilR_rad</property>
            <property>fcs/posAilR_rad</property>
        </product>
    </function>
    <function name="aero/coefficient/dCD__dAilL_rad">
        <description>dCD__dAilL_rad</description>
        <table>
            <independentVar lookup="row">aero/beta-deg</independentVar>
            <independentVar lookup="column">velocities/vt-fps</independentVar>
            <independentVar lookup="table">aero/alpha-deg</independentVar>
            <tableData breakPoint="-6.0">
                      39.38648293963254      56.26640419947507      73.14632545931758
                -10.0    -0.0144877 -0.0144968 -0.0145111
                -5.0    -0.0148956 -0.0149094 -0.0149278
                0.0    -0.0152033 -0.0152126 -0.0152243
                5.0    -0.0181295 -0.0181367 -0.018148
                10.0    -0.0151386 -0.0151441 -0.0151521
                </tableData>
            <tableData breakPoint="-2.0">
                      39.38648293963254      56.26640419947507      73.14632545931758
                -10.0    -0.0041174 -0.004112  -0.0041121
                -5.0    -0.0046566 -0.0046566 -0.004677
                0.0    -0.0046059 -0.0045649 -0.0045746
                5.0    -0.004789  -0.0047914 -0.0047841
                10.0    -0.005169  -0.005171  -0.0051762
                </tableData>
            <tableData breakPoint="2.0">
                      39.38648293963254      56.26640419947507      73.14632545931758
                -10.0    0.0056649 0.0056605 0.0056618
                -5.0    0.0062964 0.0063106 0.0063217
                0.0    0.0063011 0.0062802 0.0062666
                5.0    0.0065116 0.0065152 0.0065061
                10.0    0.0069104 0.0069138 0.0069195
                </tableData>
            <tableData breakPoint="6.0">
                      39.38648293963254      56.26640419947507      73.14632545931758
                -10.0    0.0150558 0.015064  0.0150758
                -5.0    0.0160813 0.0160963 0.0161147
                0.0    0.0176955 0.0177064 0.0177213
                5.0    0.0198004 0.0198074 0.019819
                10.0    0.0167398 0.0167492 0.0167585
                </tableData>
            <tableData breakPoint="10.0">
                      39.38648293963254      56.26640419947507      73.14632545931758
                -10.0    0.0230004 0.0230125 0.0230275
                -5.0    0.0254739 0.0254927 0.0255128
                0.0    0.0281588 0.0281833 0.0282122
                5.0    0.027677  0.0276885 0.0277079
                10.0    0.0283134 0.0283303 0.0283489
                </tableData>
            <tableData breakPoint="14.0">
                      39.38648293963254      56.26640419947507      73.14632545931758
                -10.0    0.0277292 0.0277429 0.0277627
                -5.0    0.0295888 0.0295919 0.0295741
                0.0    0.0317679 0.0318062 0.0318498
                5.0    0.0323508 0.0323622 0.0323395
                10.0    0.0344158 0.0344049 0.0343757
                </tableData>
        </table>
    </function>
    <function name="aero/coefficient/CD__dAilL_rad">
        <description>CD__dAilL_rad = dCD__dAilL_rad * dAilL_rad</description>
        <product>
            <property>aero/coefficient/dCD__dAilL_rad</property>
            <property>fcs/posAilL_rad</property>
        </product>
    </function>
    <function name="aero/coefficient/dCD__dRud_rad">
        <description>dCD__dRud_rad</description>
        <table>
            <independentVar lookup="row">aero/beta-deg</independentVar>
            <independentVar lookup="column">velocities/vt-fps</independentVar>
            <independentVar lookup="table">aero/alpha-deg</independentVar>
            <tableData breakPoint="-6.0">
                      39.38648293963254      56.26640419947507      73.14632545931758
                -10.0    0.0085514 0.0086511 0.0086497
                -5.0    0.0061473 0.0061475 0.0061477
                0.0    0.0004015 0.0004016 0.0004017
                5.0    -0.0056287 -0.0056289 -0.0056289
                10.0    -0.0082179 -0.0082165 -0.0082154
                </tableData>
            <tableData breakPoint="-2.0">
                      39.38648293963254      56.26640419947507      73.14632545931758
                -10.0    0.0071983 0.0071983 0.0071985
                -5.0    0.0039793 0.0039898 0.0039801
                0.0    0.0002647 0.0002648 0.0002649
                5.0    -0.0035403 -0.0035405 -0.0035409
                10.0    -0.0068555 -0.0068555 -0.0068556
                </tableData>
            <tableData breakPoint="2.0">
                      39.38648293963254      56.26640419947507      73.14632545931758
                -10.0    0.0068964 0.0068975 0.0068987
                -5.0    0.0037133 0.0037141 0.0037152
                0.0    0.0001963 0.0001964 0.0001965
                5.0    -0.0032939 -0.0032946 -0.0032956
                10.0    -0.0065617 -0.0065626 -0.0065639
                </tableData>
            <tableData breakPoint="6.0">
                      39.38648293963254      56.26640419947507      73.14632545931758
                -10.0    0.0074753 0.0074754 0.0074757
                -5.0    0.00415   0.0041501 0.0041508
                0.0    0.0002023 0.0002022 0.0002028
                5.0    -0.0038191 -0.0038197 -0.0038206
                10.0    -0.0071847 -0.0071849 -0.0072261
                </tableData>
            <tableData breakPoint="10.0">
                      39.38648293963254      56.26640419947507      73.14632545931758
                -10.0    0.0049623 0.0058793 0.0058802
                -5.0    0.0029113 0.0029117 0.0029116
                0.0    0.0001382 0.0001384 0.0001387
                5.0    -0.0026822 -0.0026823 -0.0026831
                10.0    -0.0057601 -0.0057643 -0.0057706
                </tableData>
            <tableData breakPoint="14.0">
                      39.38648293963254      56.26640419947507      73.14632545931758
                -10.0    0.0051476 0.005142  0.0051421
                -5.0    0.0023461 0.0023591 0.0023456
                0.0    0.0001077 0.0001064 0.0001015
                5.0    -0.002152  -0.0021523 -0.0021555
                10.0    -0.0049685 -0.0049695 -0.0049694
                </tableData>
        </table>
    </function>
    <function name="aero/coefficient/CD__dRud_rad">
        <description>CD__dRud_rad = dCD__dRud_rad * dRud_rad</description>
        <product>
            <property>aero/coefficient/dCD__dRud_rad</property>
            <property>fcs/posRud_rad</property>
        </product>
    </function>
    <function name="aero/coefficient/dCD__dFlapR_rad">
        <description>dCD__dFlapR_rad</description>
        <table>
            <independentVar lookup="row">aero/beta-deg</independentVar>
            <independentVar lookup="column">velocities/vt-fps</independentVar>
            <independentVar lookup="table">aero/alpha-deg</independentVar>
            <tableData breakPoint="-6.0">
                      39.38648293963254      56.26640419947507      73.14632545931758
                -10.0    -0.0184419 -0.0184415 -0.0184793
                -5.0    -0.0184178 -0.0184313 -0.01845
                0.0    -0.0191177 -0.0191325 -0.019153
                5.0    -0.0163128 -0.0163225 -0.0163365
                10.0    -0.0167006 -0.0167066 -0.0167194
                </tableData>
            <tableData breakPoint="-2.0">
                      39.38648293963254      56.26640419947507      73.14632545931758
                -10.0    -0.0052871 -0.0052896 -0.0052963
                -5.0    -0.0052585 -0.005252  -0.0052662
                0.0    -0.0057784 -0.0057779 -0.0057806
                5.0    -0.0058028 -0.0058053 -0.005809
                10.0    -0.0062751 -0.0062742 -0.0062779
                </tableData>
            <tableData breakPoint="2.0">
                      39.38648293963254      56.26640419947507      73.14632545931758
                -10.0    0.0077756 0.0077793 0.0077877
                -5.0    0.0074219 0.0074267 0.0074321
                0.0    0.0071073 0.0071074 0.0071113
                5.0    0.0059119 0.0059145 0.0059184
                10.0    0.0047542 0.0047513 0.0047528
                </tableData>
            <tableData breakPoint="6.0">
                      39.38648293963254      56.26640419947507      73.14632545931758
                -10.0    0.0212966 0.0213108 0.0213308
                -5.0    0.0209018 0.0209165 0.0209374
                0.0    0.0199286 0.0199437 0.0199645
                5.0    0.0170224 0.0170343 0.0170524
                10.0    0.0155552 0.0155638 0.0155774
                </tableData>
            <tableData breakPoint="10.0">
                      39.38648293963254      56.26640419947507      73.14632545931758
                -10.0    0.0316215 0.0316393 0.0316691
                -5.0    0.0327943 0.0335501 0.0328472
                0.0    0.0321794 0.0321996 0.0322306
                5.0    0.0299255 0.0299467 0.0299753
                10.0    0.0283759 0.0283927 0.028452
                </tableData>
            <tableData breakPoint="14.0">
                      39.38648293963254      56.26640419947507      73.14632545931758
                -10.0    0.0277674 0.0277399 0.0277176
                -5.0    0.0255046 0.0254998 0.0254758
                0.0    0.0258618 0.0258738 0.0258868
                5.0    0.0250432 0.0250327 0.0249592
                10.0    0.0280113 0.0279938 0.0279709
                </tableData>
        </table>
    </function>
    <function name="aero/coefficient/CD__dFlapR_rad">
        <description>CD__dFlapR_rad = dCD__dFlapR_rad * dFlapR_rad</description>
        <product>
            <property>aero/coefficient/dCD__dFlapR_rad</property>
            <property>fcs/posFlapR_rad</property>
        </product>
    </function>
    <function name="aero/coefficient/dCD__dFlapL_rad">
        <description>dCD__dFlapL_rad</description>
        <table>
            <independentVar lookup="row">aero/beta-deg</independentVar>
            <independentVar lookup="column">velocities/vt-fps</independentVar>
            <independentVar lookup="table">aero/alpha-deg</independentVar>
            <tableData breakPoint="-6.0">
                      39.38648293963254      56.26640419947507      73.14632545931758
                -10.0    -0.0167006 -0.0167066 -0.0167194
                -5.0    -0.0163128 -0.0163225 -0.0163365
                0.0    -0.0191177 -0.0191325 -0.019153
                5.0    -0.0184178 -0.0184313 -0.0184412
                10.0    -0.0184419 -0.0184573 -0.0185188
                </tableData>
            <tableData breakPoint="-2.0">
                      39.38648293963254      56.26640419947507      73.14632545931758
                -10.0    -0.0062751 -0.0062742 -0.0062779
                -5.0    -0.0058028 -0.0057951 -0.005809
                0.0    -0.0057784 -0.0057779 -0.0057806
                5.0    -0.0052585 -0.0052622 -0.0052662
                10.0    -0.0052871 -0.0052896 -0.0052963
                </tableData>
            <tableData breakPoint="2.0">
                      39.38648293963254      56.26640419947507      73.14632545931758
                -10.0    0.0047542 0.0047513 0.0047528
                -5.0    0.0059119 0.0059145 0.0059184
                0.0    0.0071073 0.0071074 0.0071113
                5.0    0.0037094 0.0074267 0.0074321
                10.0    0.0078197 0.0077795 0.0077877
                </tableData>
            <tableData breakPoint="6.0">
                      39.38648293963254      56.26640419947507      73.14632545931758
                -10.0    0.0155552 0.0155638 0.0155774
                -5.0    0.0170224 0.0170343 0.0170524
                0.0    0.0199286 0.0199437 0.0199645
                5.0    0.0209018 0.0209165 0.0209374
                10.0    0.0212966 0.0213108 0.0213308
                </tableData>
            <tableData breakPoint="10.0">
                      39.38648293963254      56.26640419947507      73.14632545931758
                -10.0    0.0283759 0.0283927 0.0284158
                -5.0    0.0298395 0.0299467 0.0299753
                0.0    0.0321794 0.0321996 0.0322306
                5.0    0.0327943 0.0328153 0.0328472
                10.0    0.0316215 0.0316393 0.0316691
                </tableData>
            <tableData breakPoint="14.0">
                      39.38648293963254      56.26640419947507      73.14632545931758
                -10.0    0.0280113 0.0279938 0.0279709
                -5.0    0.0250432 0.0250327 0.0249592
                0.0    0.0258618 0.0258738 0.0258868
                5.0    0.0255046 0.0240148 0.0254758
                10.0    0.0277674 0.0277399 0.0277176
                </tableData>
        </table>
    </function>
    <function name="aero/coefficient/CD__dFlapL_rad">
        <description>CD__dFlapL_rad = dCD__dFlapL_rad * dFlapL_rad</description>
        <product>
            <property>aero/coefficient/dCD__dFlapL_rad</property>
            <property>fcs/posFlapL_rad</property>
        </product>
    </function>
    <function name="aero/coefficient/dCD__dElev_rad">
        <description>dCD__dElev_rad</description>
        <table>
            <independentVar lookup="row">aero/beta-deg</independentVar>
            <independentVar lookup="column">velocities/vt-fps</independentVar>
            <independentVar lookup="table">aero/alpha-deg</independentVar>
            <tableData breakPoint="-6.0">
                      39.38648293963254      56.26640419947507      73.14632545931758
                -10.0    -0.0423669 -0.0423843 -0.0424075
                -5.0    -0.043514  -0.0435358 -0.0435646
                0.0    -0.0358861 -0.0359025 -0.0359367
                5.0    -0.043514  -0.0435358 -0.0435646
                10.0    -0.0423669 -0.0423843 -0.0424075
                </tableData>
            <tableData breakPoint="-2.0">
                      39.38648293963254      56.26640419947507      73.14632545931758
                -10.0    -0.0119421 -0.0119433 -0.0119479
                -5.0    -0.0121982 -0.0121923 -0.0122087
                0.0    -0.0125254 -0.0125295 -0.0125369
                5.0    -0.0121982 -0.0122025 -0.0122087
                10.0    -0.0119421 -0.0119433 -0.0119479
                </tableData>
            <tableData breakPoint="2.0">
                      39.38648293963254      56.26640419947507      73.14632545931758
                -10.0    0.0150575 0.0150653 0.0150787
                -5.0    0.015449  0.0154575 0.0154694
                0.0    0.0165999 0.0166074 0.0166192
                5.0    0.015449  0.0154575 0.0154694
                10.0    0.0150575 0.0150653 0.0150787
                </tableData>
            <tableData breakPoint="6.0">
                      39.38648293963254      56.26640419947507      73.14632545931758
                -10.0    0.0408391 0.0408632 0.0408898
                -5.0    0.0424766 0.0425006 0.0425308
                0.0    0.0435378 0.0435636 0.0435972
                5.0    0.0424766 0.0425006 0.0425308
                10.0    0.0408391 0.0408632 0.0408898
                </tableData>
            <tableData breakPoint="10.0">
                      39.38648293963254      56.26640419947507      73.14632545931758
                -10.0    0.0629173 0.0629555 0.0630078
                -5.0    0.0662708 0.066308  0.0663587
                0.0    0.0676798 0.0677188 0.0677716
                5.0    0.0662708 0.066308  0.0663587
                10.0    0.0629173 0.0629555 0.0630078
                </tableData>
            <tableData breakPoint="14.0">
                      39.38648293963254      56.26640419947507      73.14632545931758
                -10.0    0.0783969 0.0784361 0.0784896
                -5.0    0.083476  0.0835481 0.0836055
                0.0    0.0860497 0.0860961 0.0861541
                5.0    0.083476  0.0835481 0.0836055
                10.0    0.0783969 0.0784361 0.0784896
                </tableData>
        </table>
    </function>
    <function name="aero/coefficient/CD__dElev_rad">
        <description>CD__dElev_rad = dCD__dElev_rad * dElev_rad</description>
        <product>
            <property>aero/coefficient/dCD__dElev_rad</property>
            <property>fcs/posElev_rad</property>
        </product>
    </function>
    <function name="aero/coefficient/CD">
        <description>CD summation</description>
        <sum>
            <property>aero/coefficient/CD__zero</property>
            <property>aero/coefficient/CD__alpha_rad</property>
            <property>aero/coefficient/CD__beta_rad</property>
            <property>aero/coefficient/CD__dpHat_rps</property>
            <property>aero/coefficient/CD__dqHat_rps</property>
            <property>aero/coefficient/CD__drHat_rps</property>
            <property>aero/coefficient/CD__dAilR_rad</property>
            <property>aero/coefficient/CD__dAilL_rad</property>
            <property>aero/coefficient/CD__dRud_rad</property>
            <property>aero/coefficient/CD__dFlapR_rad</property>
            <property>aero/coefficient/CD__dFlapL_rad</property>
            <property>aero/coefficient/CD__dElev_rad</property>
        </sum>
    </function>
    <function name="aero/coefficient/CY__zero">
        <description>CY__zero</description>
        <table>
            <independentVar lookup="row">aero/beta-deg</independentVar>
            <independentVar lookup="column">velocities/vt-fps</independentVar>
            <independentVar lookup="table">aero/alpha-deg</independentVar>
            <tableData breakPoint="-6.0">
                      39.38648293963254      56.26640419947507      73.14632545931758
                -10.0     0.0013838   0.00028016 -0.00116252
                -5.0    0.00594664 0.00539527 0.00516724
                0.0    0. 0. 0.
                5.0    -0.0047853  -0.00427688 -0.00405139
                10.0    -0.000882    0.00040455  0.00200941
                </tableData>
            <tableData breakPoint="-2.0">
                      39.38648293963254      56.26640419947507      73.14632545931758
                -10.0    -4.99769512e-05  7.03346676e-04  1.52490696e-03
                -5.0    0.00123869 0.00190349 0.00299844
                0.0    0. 0. 0.
                5.0    -0.00085096 -0.00139612 -0.00232214
                10.0     0.00032534 -0.00043368 -0.00111091
                </tableData>
            <tableData breakPoint="2.0">
                      39.38648293963254      56.26640419947507      73.14632545931758
                -10.0    -0.00018261  0.00057039 -0.00068151
                -5.0    0.00010108 0.00166645 0.00111718
                0.0    0. 0. 0.
                5.0     0.00035114 -0.00108937 -0.00036562
                10.0    0.00206988 0.00131577 0.00271349
                </tableData>
            <tableData breakPoint="6.0">
                      39.38648293963254      56.26640419947507      73.14632545931758
                -10.0    -0.00738977 -0.00843429 -0.01054734
                -5.0    0.00299457 0.00255211 0.00199962
                0.0    0. 0. 0.
                5.0    -0.00161081 -0.00116478 -0.00061618
                10.0    0.00720267 0.00842387 0.01019653
                </tableData>
            <tableData breakPoint="10.0">
                      39.38648293963254      56.26640419947507      73.14632545931758
                -10.0    0.00840558 0.00488701 0.0016136
                -5.0    -0.00572759 -0.00645635 -0.007489
                0.0    0. 0. 0.
                5.0    0.00686935 0.00781347 0.00921589
                10.0    -0.01011437 -0.0068193  -0.00370044
                </tableData>
            <tableData breakPoint="14.0">
                      39.38648293963254      56.26640419947507      73.14632545931758
                -10.0     4.41373976e-03 -5.07850898e-05 -3.35096474e-03
                -5.0    0.01043503 0.00888323 0.00678887
                0.0    0. 0. 0.
                5.0    -0.00953133 -0.00755969 -0.00514575
                10.0    -7.23677492e-03 -2.97167139e-03  5.19608448e-05
                </tableData>
        </table>
    </function>
    <function name="aero/coefficient/dCY__alpha_rad">
        <description>dCY__alpha_rad</description>
        <table>
            <independentVar lookup="row">aero/beta-deg</independentVar>
            <independentVar lookup="column">velocities/vt-fps</independentVar>
            <independentVar lookup="table">aero/alpha-deg</independentVar>
            <tableData breakPoint="-6.0">
                      39.38648293963254      56.26640419947507      73.14632545931758
                -10.0    0.0864019 0.0912114 0.092806
                -5.0    0.0800195 0.0857341 0.0926552
                0.0    -0.  0.  0.
                5.0    -0.0800195 -0.0857341 -0.0926552
                10.0    -0.0864019 -0.0912114 -0.092806
                </tableData>
            <tableData breakPoint="-2.0">
                      39.38648293963254      56.26640419947507      73.14632545931758
                -10.0    0.1337536 0.1737593 0.2325123
                -5.0    0.079594  0.1060196 0.1508492
                0.0    -0.  0.  0.
                5.0    -0.079594  -0.1059702 -0.1508492
                10.0    -0.1337536 -0.1737593 -0.2325123
                </tableData>
            <tableData breakPoint="2.0">
                      39.38648293963254      56.26640419947507      73.14632545931758
                -10.0    -0.099507  -0.1398185 -0.139259
                -5.0    -0.0467594 -0.0988621 -0.0964838
                0.0     0. -0. -0.
                5.0    0.0467594 0.0988621 0.0964838
                10.0    0.099507  0.1398185 0.139259
                </tableData>
            <tableData breakPoint="6.0">
                      39.38648293963254      56.26640419947507      73.14632545931758
                -10.0    -0.0350985 -0.0404961 -0.0406338
                -5.0    -0.0533663 -0.0601237 -0.063944
                0.0     0. -0. -0.
                5.0    0.0533663 0.0601237 0.063944
                10.0    0.0350985 0.0404961 0.0406338
                </tableData>
            <tableData breakPoint="10.0">
                      39.38648293963254      56.26640419947507      73.14632545931758
                -10.0    -0.0856094 -0.0822652 -0.0769836
                -5.0    0.0332127 0.0305456 0.0299084
                0.0     0. -0. -0.
                5.0    -0.0332127 -0.0305456 -0.0299084
                10.0    0.0856094 0.0822652 0.0769836
                </tableData>
            <tableData breakPoint="14.0">
                      39.38648293963254      56.26640419947507      73.14632545931758
                -10.0    -0.0614622 -0.0562524 -0.0520249
                -5.0    -0.058435  -0.0591382 -0.0575979
                0.0     0. -0. -0.
                5.0    0.058435  0.0591382 0.0575979
                10.0    0.0614622 0.0562524 0.0520249
                </tableData>
        </table>
    </function>
    <function name="aero/coefficient/CY__alpha_rad">
        <description>CY__alpha_rad = dCY__alpha_rad * alpha_rad</description>
        <product>
            <property>aero/coefficient/dCY__alpha_rad</property>
            <property>aero/alpha-rad</property>
        </product>
    </function>
    <function name="aero/coefficient/dCY__beta_rad">
        <description>dCY__beta_rad</description>
        <table>
            <independentVar lookup="row">aero/beta-deg</independentVar>
            <independentVar lookup="column">velocities/vt-fps</independentVar>
            <independentVar lookup="table">aero/alpha-deg</independentVar>
            <tableData breakPoint="-6.0">
                      39.38648293963254      56.26640419947507      73.14632545931758
                -10.0    -0.1255705 -0.1227761 -0.1224866
                -5.0    -0.0756887 -0.0696348 -0.0643133
                0.0    -0.0178278  0.020179   0.0566157
                5.0    -0.0889966 -0.0824506 -0.0771
                10.0    -0.1284456 -0.1266992 -0.1273389
                </tableData>
            <tableData breakPoint="-2.0">
                      39.38648293963254      56.26640419947507      73.14632545931758
                -10.0    -0.1588271 -0.1554738 -0.1543898
                -5.0    -0.1339136 -0.1269937 -0.1193344
                0.0    -0.1019396 -0.0858004 -0.070265
                5.0    -0.1383566 -0.1327971 -0.1270842
                10.0    -0.1604048 -0.1570189 -0.1567618
                </tableData>
            <tableData breakPoint="2.0">
                      39.38648293963254      56.26640419947507      73.14632545931758
                -10.0    -0.1584879 -0.1552452 -0.154177
                -5.0    -0.1391924 -0.1322488 -0.1245282
                0.0    -0.1063933 -0.0902466 -0.0747067
                5.0    -0.1443745 -0.1388617 -0.1331405
                10.0    -0.1693012 -0.1660521 -0.1658194
                </tableData>
            <tableData breakPoint="6.0">
                      39.38648293963254      56.26640419947507      73.14632545931758
                -10.0    -0.1613597 -0.1585806 -0.1613157
                -5.0    -0.0940572 -0.0880066 -0.0823854
                0.0    -0.0317707  0.0062696  0.0428087
                5.0    -0.1099139 -0.1039043 -0.0982384
                10.0    -0.1602877 -0.1585209 -0.1593057
                </tableData>
            <tableData breakPoint="10.0">
                      39.38648293963254      56.26640419947507      73.14632545931758
                -10.0    -0.1305374 -0.1347303 -0.1400393
                -5.0    -0.0760702 -0.0660304 -0.0603748
                0.0    -0.0718546 -0.0154198  0.0346034
                5.0    -0.0891538 -0.0815818 -0.0801635
                10.0    -0.1207468 -0.1236591 -0.1280826
                </tableData>
            <tableData breakPoint="14.0">
                      39.38648293963254      56.26640419947507      73.14632545931758
                -10.0    -0.1151554 -0.1227868 -0.1296079
                -5.0    -0.0624746 -0.0567682 -0.0578029
                0.0    0.0699978 0.1395519 0.1982632
                5.0    -0.0728302 -0.0719348 -0.0766316
                10.0    -0.0989806 -0.1054694 -0.110706
                </tableData>
        </table>
    </function>
    <function name="aero/coefficient/CY__beta_rad">
        <description>CY__beta_rad = dCY__beta_rad * beta_rad</description>
        <product>
            <property>aero/coefficient/dCY__beta_rad</property>
            <property>aero/beta-rad</property>
        </product>
    </function>
    <function name="aero/coefficient/dCY__dpHat_rps">
        <description>dCY__dpHat_rps</description>
        <table>
            <independentVar lookup="row">aero/beta-deg</independentVar>
            <independentVar lookup="column">velocities/vt-fps</independentVar>
            <independentVar lookup="table">aero/alpha-deg</independentVar>
            <tableData breakPoint="-6.0">
                      39.38648293963254      56.26640419947507      73.14632545931758
                -10.0    -0.019668  -0.017592  -0.0157415
                -5.0    -0.0254794 -0.0250748 -0.0247647
                0.0    -0.0318634 -0.0325186 -0.0334212
                5.0    -0.0335468 -0.0338335 -0.0337347
                10.0    -0.0323897 -0.0351566 -0.0359315
                </tableData>
            <tableData breakPoint="-2.0">
                      39.38648293963254      56.26640419947507      73.14632545931758
                -10.0    0.0169539 0.0246882 0.0358679
                -5.0     0.0006843 -0.0004203  0.0139992
                0.0    -0.0163625 -0.0173049 -0.0182859
                5.0    -0.0285863 -0.0308671 -0.0463096
                10.0    -0.0587396 -0.0510961 -0.0697306
                </tableData>
            <tableData breakPoint="2.0">
                      39.38648293963254      56.26640419947507      73.14632545931758
                -10.0    0.0467479 0.0412071 0.0598268
                -5.0    0.0154718 0.0180838 0.0335337
                0.0    0.004799  0.0057443 0.0067297
                5.0    -0.0126919 -0.0116413 -0.0257803
                10.0    -0.029037  -0.0365751 -0.0483071
                </tableData>
            <tableData breakPoint="6.0">
                      39.38648293963254      56.26640419947507      73.14632545931758
                -10.0    0.0161434 0.0177639 0.0154297
                -5.0    0.0180231 0.0183054 0.0185582
                0.0    0.0183193 0.0189727 0.0197289
                5.0    0.0110883 0.0106751 0.0097025
                10.0     0.0015785 -0.0005239 -0.0023394
                </tableData>
            <tableData breakPoint="10.0">
                      39.38648293963254      56.26640419947507      73.14632545931758
                -10.0    0.0312025 0.0312724 0.0314513
                -5.0    0.0398194 0.0390829 0.0391778
                0.0    0.043828  0.0443816 0.0451095
                5.0    0.0336688 0.0334642 0.0326815
                10.0    0.021626  0.0205063 0.0204716
                </tableData>
            <tableData breakPoint="14.0">
                      39.38648293963254      56.26640419947507      73.14632545931758
                -10.0    0.0633374 0.0634406 0.0634675
                -5.0    0.0677779 0.0677541 0.0677507
                0.0    0.0789333 0.0796929 0.0804553
                5.0    0.0617461 0.0610661 0.0605757
                10.0    0.0527255 0.0527707 0.0531744
                </tableData>
        </table>
    </function>
    <function name="aero/coefficient/CY__dpHat_rps">
        <description>CY__dpHat_rps = dCY__dpHat_rps * dpHat_rps</description>
        <product>
            <property>aero/coefficient/dCY__dpHat_rps</property>
            <property>velocities/p-aero-rad_sec</property>
            <property>aero/bi2vel</property>
        </product>
    </function>
    <function name="aero/coefficient/dCY__dqHat_rps">
        <description>dCY__dqHat_rps</description>
        <table>
            <independentVar lookup="row">aero/beta-deg</independentVar>
            <independentVar lookup="column">velocities/vt-fps</independentVar>
            <independentVar lookup="table">aero/alpha-deg</independentVar>
            <tableData breakPoint="-6.0">
                      39.38648293963254      56.26640419947507      73.14632545931758
                -10.0    0.2416419 0.2427011 0.2529601
                -5.0    0.1501406 0.1513788 0.1581004
                0.0    -0.  0.  0.
                5.0    -0.1501406 -0.1513788 -0.1581004
                10.0    -0.2416419 -0.2427011 -0.2529601
                </tableData>
            <tableData breakPoint="-2.0">
                      39.38648293963254      56.26640419947507      73.14632545931758
                -10.0    0.1332614 0.1467215 0.2318491
                -5.0    0.0708623 0.1223163 0.0979976
                0.0    -0.  0.  0.
                5.0    -0.0708623 -0.122188  -0.0979976
                10.0    -0.1332614 -0.1467215 -0.2318491
                </tableData>
            <tableData breakPoint="2.0">
                      39.38648293963254      56.26640419947507      73.14632545931758
                -10.0    -0.1384678 -0.1503678 -0.1744882
                -5.0    -0.0721098 -0.1219986 -0.0964002
                0.0    -0.  0.  0.
                5.0    0.0721098 0.1219986 0.0964002
                10.0    0.1384678 0.1503678 0.1744882
                </tableData>
            <tableData breakPoint="6.0">
                      39.38648293963254      56.26640419947507      73.14632545931758
                -10.0    -0.0420391 -0.0686709 -0.0736125
                -5.0    -0.0456739 -0.0608829 -0.0607761
                0.0     0. -0. -0.
                5.0    0.0456739 0.0608829 0.0607761
                10.0    0.0420391 0.0686709 0.0736125
                </tableData>
            <tableData breakPoint="10.0">
                      39.38648293963254      56.26640419947507      73.14632545931758
                -10.0    0.1850599 0.1859907 0.1862323
                -5.0    0.058833  0.0552548 0.0530316
                0.0     0. -0. -0.
                5.0    -0.058833  -0.0552548 -0.0530316
                10.0    -0.1850599 -0.1853732 -0.1862323
                </tableData>
            <tableData breakPoint="14.0">
                      39.38648293963254      56.26640419947507      73.14632545931758
                -10.0    0.3771149 0.3778088 0.3791602
                -5.0    0.3151451 0.0017799 0.3127485
                0.0     0.        -0.         0.0053738
                5.0    -0.3151451 -0.3132397 -0.3127485
                10.0    -0.3771149 -0.3778088 -0.3791602
                </tableData>
        </table>
    </function>
    <function name="aero/coefficient/CY__dqHat_rps">
        <description>CY__dqHat_rps = dCY__dqHat_rps * dqHat_rps</description>
        <product>
            <property>aero/coefficient/dCY__dqHat_rps</property>
            <property>velocities/q-aero-rad_sec</property>
            <property>aero/ci2vel</property>
        </product>
    </function>
    <function name="aero/coefficient/dCY__drHat_rps">
        <description>dCY__drHat_rps</description>
        <table>
            <independentVar lookup="row">aero/beta-deg</independentVar>
            <independentVar lookup="column">velocities/vt-fps</independentVar>
            <independentVar lookup="table">aero/alpha-deg</independentVar>
            <tableData breakPoint="-6.0">
                      39.38648293963254      56.26640419947507      73.14632545931758
                -10.0    0.1990734 0.199129  0.1990525
                -5.0    0.1890893 0.1891167 0.189064
                0.0    0.1645198 0.1645283 0.1643283
                5.0    0.1783073 0.1783306 0.178267
                10.0    0.2049495 0.2054449 0.205341
                </tableData>
            <tableData breakPoint="-2.0">
                      39.38648293963254      56.26640419947507      73.14632545931758
                -10.0    0.2074783 0.2070299 0.2078218
                -5.0    0.1969903 0.1914023 0.1971623
                0.0    0.1683588 0.1683426 0.1683624
                5.0    0.1852847 0.1850586 0.1854324
                10.0    0.2110923 0.2106549 0.2114476
                </tableData>
            <tableData breakPoint="2.0">
                      39.38648293963254      56.26640419947507      73.14632545931758
                -10.0    0.2167776 0.2164031 0.2172214
                -5.0    0.2038745 0.2039161 0.204077
                0.0    0.1727185 0.1727011 0.1727169
                5.0    0.1911101 0.1909051 0.1912762
                10.0    0.2185091 0.2181402 0.2187202
                </tableData>
            <tableData breakPoint="6.0">
                      39.38648293963254      56.26640419947507      73.14632545931758
                -10.0    0.2355377 0.2355849 0.2346063
                -5.0    0.2114848 0.2115131 0.2115835
                0.0    0.1773586 0.1773639 0.1773882
                5.0    0.196323  0.1963465 0.196403
                10.0    0.2266206 0.2266751 0.2282994
                </tableData>
            <tableData breakPoint="10.0">
                      39.38648293963254      56.26640419947507      73.14632545931758
                -10.0    0.2456825 0.2456231 0.2456708
                -5.0    0.2102736 0.2103101 0.2103582
                0.0    0.2116769 0.2116954 0.2117262
                5.0    0.1939828 0.1940075 0.194034
                10.0    0.2290846 0.2300977 0.230431
                </tableData>
            <tableData breakPoint="14.0">
                      39.38648293963254      56.26640419947507      73.14632545931758
                -10.0    0.2792043 0.2792487 0.2793014
                -5.0    0.2502245 0.2502796 0.2503292
                0.0    0.1993408 0.1993689 0.1994134
                5.0    0.2141837 0.214222  0.2142681
                10.0    0.266449  0.2668476 0.2671319
                </tableData>
        </table>
    </function>
    <function name="aero/coefficient/CY__drHat_rps">
        <description>CY__drHat_rps = dCY__drHat_rps * drHat_rps</description>
        <product>
            <property>aero/coefficient/dCY__drHat_rps</property>
            <property>velocities/r-aero-rad_sec</property>
            <property>aero/bi2vel</property>
        </product>
    </function>
    <function name="aero/coefficient/dCY__dAilR_rad">
        <description>dCY__dAilR_rad</description>
        <table>
            <independentVar lookup="row">aero/beta-deg</independentVar>
            <independentVar lookup="column">velocities/vt-fps</independentVar>
            <independentVar lookup="table">aero/alpha-deg</independentVar>
            <tableData breakPoint="-6.0">
                      39.38648293963254      56.26640419947507      73.14632545931758
                -10.0    0.0158922 0.0160777 0.0161446
                -5.0    0.0165018 0.016716  0.0168942
                0.0    0.0144436 0.0143579 0.0142722
                5.0    0.0129269 0.0130547 0.0131084
                10.0    0.0148389 0.0148712 0.0151463
                </tableData>
            <tableData breakPoint="-2.0">
                      39.38648293963254      56.26640419947507      73.14632545931758
                -10.0    0.0083889 0.0084879 0.0117611
                -5.0    0.00575   0.0060744 0.0079365
                0.0    0.0044812 0.0033757 0.0041295
                5.0    0.0053382 0.0044648 0.0042871
                10.0    0.0020911 0.0004916 0.0002638
                </tableData>
            <tableData breakPoint="2.0">
                      39.38648293963254      56.26640419947507      73.14632545931758
                -10.0    -0.0041819 -0.0042704 -0.0074829
                -5.0    -0.0045759 -0.0048417 -0.0067187
                0.0    -0.0043167 -0.0040879 -0.0039589
                5.0    -0.0048211 -0.003995  -0.0038198
                10.0    -0.0055934 -0.0040509 -0.003828
                </tableData>
            <tableData breakPoint="6.0">
                      39.38648293963254      56.26640419947507      73.14632545931758
                -10.0    -0.0154388 -0.0156033 -0.0188447
                -5.0    -0.0150471 -0.0152562 -0.0154247
                0.0    -0.0133277 -0.0132438 -0.0131768
                5.0    -0.0129677 -0.0129796 -0.0130941
                10.0    -0.0159555 -0.0160065 -0.016365
                </tableData>
            <tableData breakPoint="10.0">
                      39.38648293963254      56.26640419947507      73.14632545931758
                -10.0    -0.0202381 -0.0201423 -0.0199819
                -5.0    -0.0187059 -0.0188033 -0.0188105
                0.0    -0.0197429 -0.0196694 -0.0196048
                5.0    -0.0251271 -0.0251071 -0.0251921
                10.0    -0.0271074 -0.0269011 -0.0274581
                </tableData>
            <tableData breakPoint="14.0">
                      39.38648293963254      56.26640419947507      73.14632545931758
                -10.0    -0.0318894 -0.0317246 -0.0315942
                -5.0    -0.0296331 -0.0296265 -0.0295846
                0.0    -0.0224768 -0.0248974 -0.0248388
                5.0    -0.0267877 -0.0268786 -0.0270255
                10.0    -0.0288905 -0.0290703 -0.0292058
                </tableData>
        </table>
    </function>
    <function name="aero/coefficient/CY__dAilR_rad">
        <description>CY__dAilR_rad = dCY__dAilR_rad * dAilR_rad</description>
        <product>
            <property>aero/coefficient/dCY__dAilR_rad</property>
            <property>fcs/posAilR_rad</property>
        </product>
    </function>
    <function name="aero/coefficient/dCY__dAilL_rad">
        <description>dCY__dAilL_rad</description>
        <table>
            <independentVar lookup="row">aero/beta-deg</independentVar>
            <independentVar lookup="column">velocities/vt-fps</independentVar>
            <independentVar lookup="table">aero/alpha-deg</independentVar>
            <tableData breakPoint="-6.0">
                      39.38648293963254      56.26640419947507      73.14632545931758
                -10.0    -0.0148389 -0.0148712 -0.0151463
                -5.0    -0.0130527 -0.0130547 -0.0131084
                0.0    -0.0144436 -0.0143579 -0.0142722
                5.0    -0.0165018 -0.016716  -0.0168942
                10.0    -0.0158922 -0.0160777 -0.0161446
                </tableData>
            <tableData breakPoint="-2.0">
                      39.38648293963254      56.26640419947507      73.14632545931758
                -10.0    -0.0020911 -0.0004916 -0.0002638
                -5.0    -0.0053382 -0.0044153 -0.0042718
                0.0    -0.0044812 -0.0033757 -0.0041295
                5.0    -0.00575   -0.006025  -0.0079365
                10.0    -0.0083889 -0.0084879 -0.0117611
                </tableData>
            <tableData breakPoint="2.0">
                      39.38648293963254      56.26640419947507      73.14632545931758
                -10.0    0.0055934 0.0040509 0.003828
                -5.0    0.0049211 0.003995  0.0038198
                0.0    0.0043167 0.0040879 0.0039589
                5.0    0.0045759 0.0048417 0.0067187
                10.0    0.0041819 0.0042704 0.0074829
                </tableData>
            <tableData breakPoint="6.0">
                      39.38648293963254      56.26640419947507      73.14632545931758
                -10.0    0.0159555 0.0160065 0.016365
                -5.0    0.0129677 0.0129796 0.0130941
                0.0    0.0133277 0.0132438 0.0131768
                5.0    0.0150472 0.0152562 0.0154247
                10.0    0.0154388 0.0156033 0.0188447
                </tableData>
            <tableData breakPoint="10.0">
                      39.38648293963254      56.26640419947507      73.14632545931758
                -10.0    0.0271074 0.0272773 0.0274581
                -5.0    0.0251271 0.0251071 0.0251921
                0.0    0.0197429 0.0196694 0.0196048
                5.0    0.0187059 0.0188033 0.0188105
                10.0    0.0202381 0.0201423 0.0199819
                </tableData>
            <tableData breakPoint="14.0">
                      39.38648293963254      56.26640419947507      73.14632545931758
                -10.0    0.0288905 0.0290703 0.0292058
                -5.0    0.0267877 0.0268786 0.0270255
                0.0    0.0249667 0.0248974 0.0248388
                5.0    0.0296331 0.0296265 0.0295846
                10.0    0.0318894 0.0317246 0.0315942
                </tableData>
        </table>
    </function>
    <function name="aero/coefficient/CY__dAilL_rad">
        <description>CY__dAilL_rad = dCY__dAilL_rad * dAilL_rad</description>
        <product>
            <property>aero/coefficient/dCY__dAilL_rad</property>
            <property>fcs/posAilL_rad</property>
        </product>
    </function>
    <function name="aero/coefficient/dCY__dRud_rad">
        <description>dCY__dRud_rad</description>
        <table>
            <independentVar lookup="row">aero/beta-deg</independentVar>
            <independentVar lookup="column">velocities/vt-fps</independentVar>
            <independentVar lookup="table">aero/alpha-deg</independentVar>
            <tableData breakPoint="-6.0">
                      39.38648293963254      56.26640419947507      73.14632545931758
                -10.0    0.0824588 0.0825624 0.0825346
                -5.0    0.0884931 0.0885057 0.0884926
                0.0    0.0900042 0.0900188 0.0900245
                5.0    0.0889534 0.0889661 0.0889527
                10.0    0.0888955 0.088885  0.0888197
                </tableData>
            <tableData breakPoint="-2.0">
                      39.38648293963254      56.26640419947507      73.14632545931758
                -10.0    0.0850552 0.0850509 0.085055
                -5.0    0.0851569 0.0852151 0.0851814
                0.0    0.0851135 0.0851275 0.0851466
                5.0    0.0856604 0.0856697 0.0856857
                10.0    0.0857887 0.0857848 0.085789
                </tableData>
            <tableData breakPoint="2.0">
                      39.38648293963254      56.26640419947507      73.14632545931758
                -10.0    0.080806  0.0808316 0.0808546
                -5.0    0.080569  0.0805864 0.0806046
                0.0    0.0800346 0.0800457 0.0800603
                5.0    0.0810108 0.0810277 0.0810454
                10.0    0.0813561 0.0813823 0.0814077
                </tableData>
            <tableData breakPoint="6.0">
                      39.38648293963254      56.26640419947507      73.14632545931758
                -10.0    0.0748807 0.0748897 0.0749443
                -5.0    0.0752585 0.0752683 0.0752936
                0.0    0.073494  0.073504  0.0735277
                5.0    0.0755485 0.0755592 0.0755838
                10.0    0.0753777 0.0753869 0.0755222
                </tableData>
            <tableData breakPoint="10.0">
                      39.38648293963254      56.26640419947507      73.14632545931758
                -10.0    0.0647393 0.0666901 0.0666984
                -5.0    0.0640838 0.0640892 0.0641002
                0.0    0.072586  0.0725969 0.0726097
                5.0    0.0643093 0.0643217 0.0643293
                10.0    0.0672219 0.0672262 0.0672453
                </tableData>
            <tableData breakPoint="14.0">
                      39.38648293963254      56.26640419947507      73.14632545931758
                -10.0    0.0636843 0.0636908 0.0636943
                -5.0    0.061293  0.0612985 0.0613035
                0.0    0.0595673 0.0595758 0.0595866
                5.0    0.0614535 0.0614584 0.0614645
                10.0    0.0641365 0.0641428 0.0641499
                </tableData>
        </table>
    </function>
    <function name="aero/coefficient/CY__dRud_rad">
        <description>CY__dRud_rad = dCY__dRud_rad * dRud_rad</description>
        <product>
            <property>aero/coefficient/dCY__dRud_rad</property>
            <property>fcs/posRud_rad</property>
        </product>
    </function>
    <function name="aero/coefficient/dCY__dFlapR_rad">
        <description>dCY__dFlapR_rad</description>
        <table>
            <independentVar lookup="row">aero/beta-deg</independentVar>
            <independentVar lookup="column">velocities/vt-fps</independentVar>
            <independentVar lookup="table">aero/alpha-deg</independentVar>
            <tableData breakPoint="-6.0">
                      39.38648293963254      56.26640419947507      73.14632545931758
                -10.0    0.0042508 0.0044983 0.0043721
                -5.0    0.0082546 0.0083726 0.0084903
                0.0    0.0055778 0.0055619 0.0056371
                5.0    0.0102535 0.0101544 0.0103953
                10.0    0.0138852 0.0137787 0.0141117
                </tableData>
            <tableData breakPoint="-2.0">
                      39.38648293963254      56.26640419947507      73.14632545931758
                -10.0    0.0025911 0.0028845 0.0043728
                -5.0    0.0009175 0.0012824 0.0021175
                0.0    -0.0026906 -0.0027344 -0.0027588
                5.0    0.001478  0.0008031 0.0003783
                10.0     0.0010947  0.0001114 -0.0005097
                </tableData>
            <tableData breakPoint="2.0">
                      39.38648293963254      56.26640419947507      73.14632545931758
                -10.0    -0.0059133 -0.0062089 -0.0076924
                -5.0    -0.0104791 -0.0107965 -0.0116813
                0.0    -0.013376  -0.0133429 -0.0133298
                5.0    -0.0178597 -0.0171991 -0.0167884
                10.0    -0.0086569 -0.0076794 -0.0070598
                </tableData>
            <tableData breakPoint="6.0">
                      39.38648293963254      56.26640419947507      73.14632545931758
                -10.0    -0.011168  -0.0112717 -0.0113055
                -5.0    -0.0191643 -0.0192897 -0.0192748
                0.0    -0.0230322 -0.0230271 -0.0230803
                5.0    -0.0283499 -0.0282557 -0.0284251
                10.0    -0.0215185 -0.0214554 -0.0217628
                </tableData>
            <tableData breakPoint="10.0">
                      39.38648293963254      56.26640419947507      73.14632545931758
                -10.0    -0.0148529 -0.0146817 -0.0145775
                -5.0    -0.0115746 -0.012547  -0.0126666
                0.0    -0.0252572 -0.0248638 -0.0248783
                5.0    -0.0468198 -0.0468107 -0.0468534
                10.0    -0.0362836 -0.0364046 -0.0364267
                </tableData>
            <tableData breakPoint="14.0">
                      39.38648293963254      56.26640419947507      73.14632545931758
                -10.0    -0.0290419 -0.0289186 -0.0288292
                -5.0    -0.0250194 -0.0250331 -0.025015
                0.0    -0.0221919 -0.0221971 -0.0222074
                5.0    -0.0369221 -0.0369819 -0.0370759
                10.0    -0.0298242 -0.0299719 -0.0300958
                </tableData>
        </table>
    </function>
    <function name="aero/coefficient/CY__dFlapR_rad">
        <description>CY__dFlapR_rad = dCY__dFlapR_rad * dFlapR_rad</description>
        <product>
            <property>aero/coefficient/dCY__dFlapR_rad</property>
            <property>fcs/posFlapR_rad</property>
        </product>
    </function>
    <function name="aero/coefficient/dCY__dFlapL_rad">
        <description>dCY__dFlapL_rad</description>
        <table>
            <independentVar lookup="row">aero/beta-deg</independentVar>
            <independentVar lookup="column">velocities/vt-fps</independentVar>
            <independentVar lookup="table">aero/alpha-deg</independentVar>
            <tableData breakPoint="-6.0">
                      39.38648293963254      56.26640419947507      73.14632545931758
                -10.0    -0.0138852 -0.0137787 -0.0141117
                -5.0    -0.0102535 -0.0101544 -0.0103953
                0.0    -0.0055778 -0.0055619 -0.0056371
                5.0    -0.0082546 -0.0083726 -0.0085119
                10.0    -0.0042508 -0.0043457 -0.004253
                </tableData>
            <tableData breakPoint="-2.0">
                      39.38648293963254      56.26640419947507      73.14632545931758
                -10.0    -0.0010947 -0.0001114  0.0005097
                -5.0    -0.001478  -0.0007536 -0.0003783
                0.0    0.0026906 0.0027344 0.0027588
                5.0    -0.0009175 -0.0012329 -0.0021175
                10.0    -0.0025911 -0.0028845 -0.0043728
                </tableData>
            <tableData breakPoint="2.0">
                      39.38648293963254      56.26640419947507      73.14632545931758
                -10.0    0.0086569 0.0076794 0.0070598
                -5.0    0.0178597 0.0171991 0.0167884
                0.0    0.013376  0.0133429 0.0133298
                5.0    0.0100577 0.0107965 0.0116813
                10.0    0.0062425 0.0062077 0.0076924
                </tableData>
            <tableData breakPoint="6.0">
                      39.38648293963254      56.26640419947507      73.14632545931758
                -10.0    0.0215185 0.0214554 0.0217628
                -5.0    0.0283499 0.0282557 0.0284251
                0.0    0.0230322 0.0230271 0.0230803
                5.0    0.0191643 0.0192897 0.0192748
                10.0    0.011168  0.0112717 0.0113055
                </tableData>
            <tableData breakPoint="10.0">
                      39.38648293963254      56.26640419947507      73.14632545931758
                -10.0    0.0362836 0.0364046 0.0365256
                -5.0    0.0471906 0.0468107 0.0468534
                0.0    0.0252572 0.0248638 0.0248783
                5.0    0.0115746 0.0126582 0.0126666
                10.0    0.0148529 0.0146817 0.0145775
                </tableData>
            <tableData breakPoint="14.0">
                      39.38648293963254      56.26640419947507      73.14632545931758
                -10.0    0.0298242 0.0299719 0.0300958
                -5.0    0.0369221 0.0369819 0.0370759
                0.0    0.0221919 0.0221971 0.0222074
                5.0    0.0250194 0.0254164 0.025015
                10.0    0.0290419 0.0289186 0.0288292
                </tableData>
        </table>
    </function>
    <function name="aero/coefficient/CY__dFlapL_rad">
        <description>CY__dFlapL_rad = dCY__dFlapL_rad * dFlapL_rad</description>
        <product>
            <property>aero/coefficient/dCY__dFlapL_rad</property>
            <property>fcs/posFlapL_rad</property>
        </product>
    </function>
    <function name="aero/coefficient/dCY__dElev_rad">
        <description>dCY__dElev_rad</description>
        <table>
            <independentVar lookup="row">aero/beta-deg</independentVar>
            <independentVar lookup="column">velocities/vt-fps</independentVar>
            <independentVar lookup="table">aero/alpha-deg</independentVar>
            <tableData breakPoint="-6.0">
                      39.38648293963254      56.26640419947507      73.14632545931758
                -10.0    0.0065698 0.0066222 0.0074048
                -5.0    0.0022064 0.0022587 0.0027871
                0.0    -0.  0. -0.
                5.0    -0.0022064 -0.0022587 -0.0027871
                10.0    -0.0065698 -0.0066222 -0.0074048
                </tableData>
            <tableData breakPoint="-2.0">
                      39.38648293963254      56.26640419947507      73.14632545931758
                -10.0    0.006734  0.0070654 0.0074853
                -5.0    0.0019077 0.0021825 0.0023959
                0.0    -0.  0.  0.
                5.0    -0.0019077 -0.0021331 -0.0023959
                10.0    -0.006734  -0.0070654 -0.0074853
                </tableData>
            <tableData breakPoint="2.0">
                      39.38648293963254      56.26640419947507      73.14632545931758
                -10.0    -0.006398  -0.0067319 -0.0071461
                -5.0    -0.0030655 -0.003291  -0.0035511
                0.0     0. -0. -0.
                5.0    0.0030655 0.003291  0.0035511
                10.0    0.006398  0.0067319 0.0071461
                </tableData>
            <tableData breakPoint="6.0">
                      39.38648293963254      56.26640419947507      73.14632545931758
                -10.0    -0.0091106 -0.0091522 -0.0123986
                -5.0    -0.0038192 -0.0038665 -0.0046672
                0.0     0. -0. -0.
                5.0    0.0038192 0.0038665 0.0046672
                10.0    0.0091106 0.0091522 0.0123986
                </tableData>
            <tableData breakPoint="10.0">
                      39.38648293963254      56.26640419947507      73.14632545931758
                -10.0    -0.0154217 -0.0159004 -0.0160437
                -5.0    -0.010041  -0.0102255 -0.0103738
                0.0    -0.  0.  0.
                5.0    0.010041  0.0102255 0.0103738
                10.0    0.0154217 0.0159004 0.0160437
                </tableData>
            <tableData breakPoint="14.0">
                      39.38648293963254      56.26640419947507      73.14632545931758
                -10.0    0.0125785 0.0124807 0.0124363
                -5.0    0.004762  0.0046481 0.0045918
                0.0    -0. -0. -0.
                5.0    -0.004762  -0.0046481 -0.0045918
                10.0    -0.0125785 -0.0124807 -0.0124363
                </tableData>
        </table>
    </function>
    <function name="aero/coefficient/CY__dElev_rad">
        <description>CY__dElev_rad = dCY__dElev_rad * dElev_rad</description>
        <product>
            <property>aero/coefficient/dCY__dElev_rad</property>
            <property>fcs/posElev_rad</property>
        </product>
    </function>
    <function name="aero/coefficient/CY">
        <description>CY summation</description>
        <sum>
            <property>aero/coefficient/CY__zero</property>
            <property>aero/coefficient/CY__alpha_rad</property>
            <property>aero/coefficient/CY__beta_rad</property>
            <property>aero/coefficient/CY__dpHat_rps</property>
            <property>aero/coefficient/CY__dqHat_rps</property>
            <property>aero/coefficient/CY__drHat_rps</property>
            <property>aero/coefficient/CY__dAilR_rad</property>
            <property>aero/coefficient/CY__dAilL_rad</property>
            <property>aero/coefficient/CY__dRud_rad</property>
            <property>aero/coefficient/CY__dFlapR_rad</property>
            <property>aero/coefficient/CY__dFlapL_rad</property>
            <property>aero/coefficient/CY__dElev_rad</property>
        </sum>
    </function>
    <function name="aero/coefficient/CMl__zero">
        <description>CMl__zero</description>
        <table>
            <independentVar lookup="row">aero/beta-deg</independentVar>
            <independentVar lookup="column">velocities/vt-fps</independentVar>
            <independentVar lookup="table">aero/alpha-deg</independentVar>
            <tableData breakPoint="-6.0">
                      39.38648293963254      56.26640419947507      73.14632545931758
                -10.0    0.00143722 0.00139643 0.00141546
                -5.0    0.00112099 0.00108775 0.00109961
                0.0    0. 0. 0.
                5.0    -0.00125453 -0.00127338 -0.00130003
                10.0    -0.01851382 -0.01845289 -0.01846816
                </tableData>
            <tableData breakPoint="-2.0">
                      39.38648293963254      56.26640419947507      73.14632545931758
                -10.0    0.00052624 0.0004503  0.00048393
                -5.0    0.00097207 0.00097277 0.00096422
                0.0    0. 0. 0.
                5.0    -0.00113767 -0.0011314  -0.00112857
                10.0    -0.00426425 -0.00417349 -0.00417816
                </tableData>
            <tableData breakPoint="2.0">
                      39.38648293963254      56.26640419947507      73.14632545931758
                -10.0    -0.00188531 -0.00176701 -0.00180846
                -5.0    -0.00057238 -0.00042702 -0.00054801
                0.0    0. 0. 0.
                5.0    0.00073042 0.00058127 0.0007072
                10.0    0.00809059 0.00795621 0.00796699
                </tableData>
            <tableData breakPoint="6.0">
                      39.38648293963254      56.26640419947507      73.14632545931758
                -10.0    -0.00757767 -0.00756589 -0.00758239
                -5.0    -0.00190179 -0.00188914 -0.00182018
                0.0    0. 0. 0.
                5.0    0.00228305 0.00233036 0.00227675
                10.0    0.01714514 0.01711209 0.01706375
                </tableData>
            <tableData breakPoint="10.0">
                      39.38648293963254      56.26640419947507      73.14632545931758
                -10.0    -0.00756557 -0.0075804  -0.00766625
                -5.0    -0.00249304 -0.00238145 -0.00226952
                0.0    0. 0. 0.
                5.0    0.00296717 0.00290534 0.00289436
                10.0    0.00749476 0.00747423 0.00756964
                </tableData>
            <tableData breakPoint="14.0">
                      39.38648293963254      56.26640419947507      73.14632545931758
                -10.0    -0.01099121 -0.01124546 -0.01139706
                -5.0    -0.00331869 -0.00317642 -0.00329088
                0.0    0. 0. 0.
                5.0    0.00309029 0.00300555 0.00315678
                10.0    0.00816293 0.00840729 0.00857993
                </tableData>
        </table>
    </function>
    <function name="aero/coefficient/dCMl__alpha_rad">
        <description>dCMl__alpha_rad</description>
        <table>
            <independentVar lookup="row">aero/beta-deg</independentVar>
            <independentVar lookup="column">velocities/vt-fps</independentVar>
            <independentVar lookup="table">aero/alpha-deg</independentVar>
            <tableData breakPoint="-6.0">
                      39.38648293963254      56.26640419947507      73.14632545931758
                -10.0    0.0194225 0.0190202 0.0189672
                -5.0    0.0106372 0.0100939 0.0098188
                0.0     0. -0. -0.
                5.0    -0.0106372 -0.0100939 -0.0098188
                10.0    -0.0194225 -0.0190202 -0.0189672
                </tableData>
            <tableData breakPoint="-2.0">
                      39.38648293963254      56.26640419947507      73.14632545931758
                -10.0    0.030125  0.0308184 0.0306767
                -5.0    0.0355395 0.0376827 0.035565
                0.0     0. -0. -0.
                5.0    -0.0355395 -0.0376759 -0.035565
                10.0    -0.030125  -0.0308184 -0.0306767
                </tableData>
            <tableData breakPoint="2.0">
                      39.38648293963254      56.26640419947507      73.14632545931758
                -10.0    0.0374928 0.0368887 0.0369747
                -5.0    0.0157516 0.0137508 0.0153581
                0.0     0. -0. -0.
                5.0    -0.0157516 -0.0137508 -0.0153581
                10.0    -0.0374928 -0.0368887 -0.0369747
                </tableData>
            <tableData breakPoint="6.0">
                      39.38648293963254      56.26640419947507      73.14632545931758
                -10.0    0.0350454 0.0349053 0.0342462
                -5.0    0.0175215 0.0171628 0.0160425
                0.0     0. -0. -0.
                5.0    -0.0175215 -0.0171628 -0.0160425
                10.0    -0.0350454 -0.0349053 -0.0342462
                </tableData>
            <tableData breakPoint="10.0">
                      39.38648293963254      56.26640419947507      73.14632545931758
                -10.0    0.0281811 0.0273893 0.0272222
                -5.0    0.0162649 0.015558  0.0145053
                0.0     0. -0. -0.
                5.0    -0.0162649 -0.015558  -0.0145053
                10.0    -0.0281811 -0.0273893 -0.0272222
                </tableData>
            <tableData breakPoint="14.0">
                      39.38648293963254      56.26640419947507      73.14632545931758
                -10.0    0.0310632 0.0310597 0.0310716
                -5.0    0.0118223 0.0102716 0.0092618
                0.0     0. -0.  0.
                5.0    -0.0118223 -0.0102716 -0.0092618
                10.0    -0.0310632 -0.0310597 -0.0310716
                </tableData>
        </table>
    </function>
    <function name="aero/coefficient/CMl__alpha_rad">
        <description>CMl__alpha_rad = dCMl__alpha_rad * alpha_rad</description>
        <product>
            <property>aero/coefficient/dCMl__alpha_rad</property>
            <property>aero/alpha-rad</property>
        </product>
    </function>
    <function name="aero/coefficient/dCMl__beta_rad">
        <description>dCMl__beta_rad</description>
        <table>
            <independentVar lookup="row">aero/beta-deg</independentVar>
            <independentVar lookup="column">velocities/vt-fps</independentVar>
            <independentVar lookup="table">aero/alpha-deg</independentVar>
            <tableData breakPoint="-6.0">
                      39.38648293963254      56.26640419947507      73.14632545931758
                -10.0    0.0167086 0.0164682 0.0164142
                -5.0    0.020327  0.0201122 0.0201726
                0.0    0.018366  0.0161661 0.0130591
                5.0    0.0218572 0.0222394 0.0224692
                10.0    0.1145503 0.1141945 0.114119
                </tableData>
            <tableData breakPoint="-2.0">
                      39.38648293963254      56.26640419947507      73.14632545931758
                -10.0    0.0033448 0.0026066 0.0026706
                -5.0    0.004319  0.0037929 0.0040034
                0.0    0.0096377 0.0100137 0.0100116
                5.0    0.0062167 0.0056123 0.0058868
                10.0    0.024762  0.0239389 0.023837
                </tableData>
            <tableData breakPoint="2.0">
                      39.38648293963254      56.26640419947507      73.14632545931758
                -10.0    -0.0127997 -0.0120731 -0.0121404
                -5.0    -0.0082167 -0.0076573 -0.0078726
                0.0    -0.0084324 -0.0087899 -0.0087798
                5.0    -0.0100277 -0.0094249 -0.0096968
                10.0    -0.0483533 -0.0475346 -0.0474262
                </tableData>
            <tableData breakPoint="6.0">
                      39.38648293963254      56.26640419947507      73.14632545931758
                -10.0    -0.0498337 -0.0496079 -0.04991
                -5.0    -0.0231457 -0.0229476 -0.023017
                0.0    -0.0185603 -0.0163492 -0.0131839
                5.0    -0.0275146 -0.0280036 -0.0282489
                10.0    -0.1046513 -0.1043036 -0.1042342
                </tableData>
            <tableData breakPoint="10.0">
                      39.38648293963254      56.26640419947507      73.14632545931758
                -10.0    -0.0552408 -0.0557211 -0.0561589
                -5.0    -0.033441  -0.0324267 -0.0319844
                0.0    -0.0373102 -0.0307178 -0.0217535
                5.0    -0.0388742 -0.0384301 -0.0391446
                10.0    -0.0548351 -0.0551128 -0.0556054
                </tableData>
            <tableData breakPoint="14.0">
                      39.38648293963254      56.26640419947507      73.14632545931758
                -10.0    -0.0699698 -0.0710258 -0.0716784
                -5.0    -0.0517536 -0.0522755 -0.054259
                0.0    -0.0362046 -0.0180626  0.0029097
                5.0    -0.0491364 -0.0503174 -0.0527224
                10.0    -0.053765  -0.0547643 -0.0555374
                </tableData>
        </table>
    </function>
    <function name="aero/coefficient/CMl__beta_rad">
        <description>CMl__beta_rad = dCMl__beta_rad * beta_rad</description>
        <product>
            <property>aero/coefficient/dCMl__beta_rad</property>
            <property>aero/beta-rad</property>
        </product>
    </function>
    <function name="aero/coefficient/dCMl__dpHat_rps">
        <description>dCMl__dpHat_rps</description>
        <table>
            <independentVar lookup="row">aero/beta-deg</independentVar>
            <independentVar lookup="column">velocities/vt-fps</independentVar>
            <independentVar lookup="table">aero/alpha-deg</independentVar>
            <tableData breakPoint="-6.0">
                      39.38648293963254      56.26640419947507      73.14632545931758
                -10.0    -0.296432  -0.2941824 -0.2916348
                -5.0    -0.3066101 -0.3070173 -0.3072023
                0.0    -0.3275421 -0.3411299 -0.3548166
                5.0    -0.3071251 -0.3075568 -0.307936
                10.0    -0.2915201 -0.2908518 -0.2880854
                </tableData>
            <tableData breakPoint="-2.0">
                      39.38648293963254      56.26640419947507      73.14632545931758
                -10.0    -0.3733909 -0.3692827 -0.3655509
                -5.0    -0.3828949 -0.3807775 -0.386626
                0.0    -0.3865943 -0.3934968 -0.405399
                5.0    -0.3841352 -0.3868159 -0.3903136
                10.0    -0.36803   -0.3653484 -0.3656358
                </tableData>
            <tableData breakPoint="2.0">
                      39.38648293963254      56.26640419947507      73.14632545931758
                -10.0    -0.370997  -0.3709733 -0.3706987
                -5.0    -0.3856803 -0.3891171 -0.3924284
                0.0    -0.387366  -0.3939768 -0.4058849
                5.0    -0.3821801 -0.380064  -0.3850582
                10.0    -0.3851264 -0.3810002 -0.3771912
                </tableData>
            <tableData breakPoint="6.0">
                      39.38648293963254      56.26640419947507      73.14632545931758
                -10.0    -0.3059523 -0.3038305 -0.3009344
                -5.0    -0.3096843 -0.3100887 -0.3103376
                0.0    -0.3301068 -0.343699  -0.3572555
                5.0    -0.3094509 -0.3098323 -0.3102104
                10.0    -0.332288  -0.3300136 -0.3274495
                </tableData>
            <tableData breakPoint="10.0">
                      39.38648293963254      56.26640419947507      73.14632545931758
                -10.0    -0.3156698 -0.3127387 -0.3103923
                -5.0    -0.331421  -0.33187   -0.3310894
                0.0    -0.3730813 -0.3960994 -0.4190381
                5.0    -0.3307749 -0.3312672 -0.3306191
                10.0    -0.314535  -0.3117164 -0.3093839
                </tableData>
            <tableData breakPoint="14.0">
                      39.38648293963254      56.26640419947507      73.14632545931758
                -10.0    -0.3020384 -0.2989404 -0.2969743
                -5.0    -0.3054279 -0.3045438 -0.3018807
                0.0    -0.3641097 -0.3971957 -0.4295514
                5.0    -0.3079175 -0.3071344 -0.3046126
                10.0    -0.3061585 -0.3031161 -0.3012082
                </tableData>
        </table>
    </function>
    <function name="aero/coefficient/CMl__dpHat_rps">
        <description>CMl__dpHat_rps = dCMl__dpHat_rps * dpHat_rps</description>
        <product>
            <property>aero/coefficient/dCMl__dpHat_rps</property>
            <property>velocities/p-aero-rad_sec</property>
            <property>aero/bi2vel</property>
        </product>
    </function>
    <function name="aero/coefficient/dCMl__dqHat_rps">
        <description>dCMl__dqHat_rps</description>
        <table>
            <independentVar lookup="row">aero/beta-deg</independentVar>
            <independentVar lookup="column">velocities/vt-fps</independentVar>
            <independentVar lookup="table">aero/alpha-deg</independentVar>
            <tableData breakPoint="-6.0">
                      39.38648293963254      56.26640419947507      73.14632545931758
                -10.0    0.0071188 0.0071666 0.0080584
                -5.0    -0.0002198 -0.0007465 -0.0003118
                0.0     0. -0. -0.
                5.0    0.0002198 0.0007465 0.0003118
                10.0    -0.0071188 -0.0071666 -0.0080584
                </tableData>
            <tableData breakPoint="-2.0">
                      39.38648293963254      56.26640419947507      73.14632545931758
                -10.0    0.0709076 0.0719419 0.0726265
                -5.0    0.0248482 0.0311528 0.0239561
                0.0     0. -0. -0.
                5.0    -0.0248482 -0.031135  -0.0239561
                10.0    -0.0709076 -0.0719419 -0.0726265
                </tableData>
            <tableData breakPoint="2.0">
                      39.38648293963254      56.26640419947507      73.14632545931758
                -10.0    0.0402037 0.0407102 0.0414532
                -5.0     0.0032437 -0.0020485  0.0024357
                0.0     0. -0. -0.
                5.0    -0.0032437  0.0020485 -0.0024357
                10.0    -0.0402037 -0.0407102 -0.0414532
                </tableData>
            <tableData breakPoint="6.0">
                      39.38648293963254      56.26640419947507      73.14632545931758
                -10.0    0.0090766 0.0088148 0.0083543
                -5.0    0.0138941 0.0131134 0.0126069
                0.0     0. -0. -0.
                5.0    -0.0138941 -0.0131134 -0.0126069
                10.0    -0.0090766 -0.0088148 -0.0083543
                </tableData>
            <tableData breakPoint="10.0">
                      39.38648293963254      56.26640419947507      73.14632545931758
                -10.0    0.0085746 0.0088431 0.0085293
                -5.0    0.0040878 0.0030696 0.0022166
                0.0     0. -0. -0.
                5.0    -0.0040878 -0.0030696 -0.0022166
                10.0    -0.0085746 -0.0085979 -0.0085293
                </tableData>
            <tableData breakPoint="14.0">
                      39.38648293963254      56.26640419947507      73.14632545931758
                -10.0    0.0083764 0.0078872 0.0073501
                -5.0    0.003138  0.0562051 0.0011602
                0.0    -0.         0.        -0.0003415
                5.0    -0.003138  -0.0020382 -0.0011602
                10.0    -0.0083764 -0.0078872 -0.0073501
                </tableData>
        </table>
    </function>
    <function name="aero/coefficient/CMl__dqHat_rps">
        <description>CMl__dqHat_rps = dCMl__dqHat_rps * dqHat_rps</description>
        <product>
            <property>aero/coefficient/dCMl__dqHat_rps</property>
            <property>velocities/q-aero-rad_sec</property>
            <property>aero/ci2vel</property>
        </product>
    </function>
    <function name="aero/coefficient/dCMl__drHat_rps">
        <description>dCMl__drHat_rps</description>
        <table>
            <independentVar lookup="row">aero/beta-deg</independentVar>
            <independentVar lookup="column">velocities/vt-fps</independentVar>
            <independentVar lookup="table">aero/alpha-deg</independentVar>
            <tableData breakPoint="-6.0">
                      39.38648293963254      56.26640419947507      73.14632545931758
                -10.0    -0.0964599 -0.0964073 -0.0963528
                -5.0    -0.046457  -0.0464667 -0.0464897
                0.0    -0.0490778 -0.0493984 -0.0498786
                5.0    -0.0471972 -0.0472071 -0.0472311
                10.0    -0.0443863 -0.0442068 -0.0441667
                </tableData>
            <tableData breakPoint="-2.0">
                      39.38648293963254      56.26640419947507      73.14632545931758
                -10.0    -0.0226658 -0.0225791 -0.022518
                -5.0    -0.0144768 -0.0166408 -0.0144575
                0.0    -0.0169591 -0.0171376 -0.0172325
                5.0    -0.0154452 -0.0154223 -0.0154261
                10.0    -0.0137378 -0.013656  -0.0135982
                </tableData>
            <tableData breakPoint="2.0">
                      39.38648293963254      56.26640419947507      73.14632545931758
                -10.0    0.038212  0.0381265 0.0380636
                -5.0    0.0189392 0.018911  0.0189145
                0.0    0.016599  0.0167652 0.0168526
                5.0    0.017861  0.017835  0.0178351
                10.0    0.0205668 0.0204882 0.0204379
                </tableData>
            <tableData breakPoint="6.0">
                      39.38648293963254      56.26640419947507      73.14632545931758
                -10.0    0.0899126 0.0898702 0.0896412
                -5.0    0.0523979 0.0524067 0.0524088
                0.0    0.0498391 0.0501473 0.0504312
                5.0    0.0510739 0.0510819 0.0510828
                10.0    0.0624152 0.0623733 0.0624716
                </tableData>
            <tableData breakPoint="10.0">
                      39.38648293963254      56.26640419947507      73.14632545931758
                -10.0    0.0924665 0.0923808 0.092343
                -5.0    0.0846913 0.0846955 0.0846729
                0.0    0.0842001 0.0846833 0.0851222
                5.0    0.0832084 0.0832115 0.0831874
                10.0    0.0923942 0.092368  0.0922346
                </tableData>
            <tableData breakPoint="14.0">
                      39.38648293963254      56.26640419947507      73.14632545931758
                -10.0    0.1099248 0.1098366 0.1097771
                -5.0    0.103211  0.1031207 0.1029881
                0.0    0.1016291 0.1021962 0.1026587
                5.0    0.1019194 0.1017908 0.1015977
                10.0    0.1158563 0.1155969 0.115262
                </tableData>
        </table>
    </function>
    <function name="aero/coefficient/CMl__drHat_rps">
        <description>CMl__drHat_rps = dCMl__drHat_rps * drHat_rps</description>
        <product>
            <property>aero/coefficient/dCMl__drHat_rps</property>
            <property>velocities/r-aero-rad_sec</property>
            <property>aero/bi2vel</property>
        </product>
    </function>
    <function name="aero/coefficient/dCMl__dAilR_rad">
        <description>dCMl__dAilR_rad</description>
        <table>
            <independentVar lookup="row">aero/beta-deg</independentVar>
            <independentVar lookup="column">velocities/vt-fps</independentVar>
            <independentVar lookup="table">aero/alpha-deg</independentVar>
            <tableData breakPoint="-6.0">
                      39.38648293963254      56.26640419947507      73.14632545931758
                -10.0    -0.1014463 -0.1014151 -0.1013686
                -5.0    -0.1050919 -0.1052106 -0.105312
                0.0    -0.1060761 -0.106505  -0.1069137
                5.0    -0.1047847 -0.1047718 -0.1047599
                10.0    -0.102385  -0.1023606 -0.1023649
                </tableData>
            <tableData breakPoint="-2.0">
                      39.38648293963254      56.26640419947507      73.14632545931758
                -10.0    -0.1004967 -0.1003987 -0.1003544
                -5.0    -0.1035003 -0.1034522 -0.1037441
                0.0    -0.1050937 -0.1085745 -0.105764
                5.0    -0.1040729 -0.104114  -0.1040386
                10.0    -0.1009716 -0.1009143 -0.1009234
                </tableData>
            <tableData breakPoint="2.0">
                      39.38648293963254      56.26640419947507      73.14632545931758
                -10.0    -0.1002878 -0.1001995 -0.1001386
                -5.0    -0.1034109 -0.1033693 -0.1036312
                0.0    -0.1049049 -0.1053527 -0.1055493
                5.0    -0.1035872 -0.1036158 -0.1035536
                10.0    -0.1002863 -0.1002214 -0.1002291
                </tableData>
            <tableData breakPoint="6.0">
                      39.38648293963254      56.26640419947507      73.14632545931758
                -10.0    -0.1166727 -0.1166353 -0.1168946
                -5.0    -0.1049546 -0.105066  -0.1051611
                0.0    -0.1052046 -0.1056182 -0.1059976
                5.0    -0.1035153 -0.1034802 -0.103453
                10.0    -0.101002  -0.1009747 -0.1009716
                </tableData>
            <tableData breakPoint="10.0">
                      39.38648293963254      56.26640419947507      73.14632545931758
                -10.0    -0.1023105 -0.1022472 -0.1022159
                -5.0    -0.1051773 -0.1052888 -0.1053495
                0.0    -0.1065592 -0.10716   -0.1076952
                5.0    -0.1033228 -0.1032705 -0.1031905
                10.0    -0.0994575 -0.0999939 -0.0994487
                </tableData>
            <tableData breakPoint="14.0">
                      39.38648293963254      56.26640419947507      73.14632545931758
                -10.0    -0.099951  -0.099798  -0.0996729
                -5.0    -0.0993006 -0.0992403 -0.0991046
                0.0    -0.0998442 -0.1012006 -0.1017754
                5.0    -0.0984601 -0.0982331 -0.0979785
                10.0    -0.0968652 -0.0968398 -0.096864
                </tableData>
        </table>
    </function>
    <function name="aero/coefficient/CMl__dAilR_rad">
        <description>CMl__dAilR_rad = dCMl__dAilR_rad * dAilR_rad</description>
        <product>
            <property>aero/coefficient/dCMl__dAilR_rad</property>
            <property>fcs/posAilR_rad</property>
        </product>
    </function>
    <function name="aero/coefficient/dCMl__dAilL_rad">
        <description>dCMl__dAilL_rad</description>
        <table>
            <independentVar lookup="row">aero/beta-deg</independentVar>
            <independentVar lookup="column">velocities/vt-fps</independentVar>
            <independentVar lookup="table">aero/alpha-deg</independentVar>
            <tableData breakPoint="-6.0">
                      39.38648293963254      56.26640419947507      73.14632545931758
                -10.0    0.102385  0.1023606 0.1023649
                -5.0    0.1048053 0.1047718 0.1047599
                0.0    0.1060761 0.106505  0.1069137
                5.0    0.1050919 0.1052106 0.105312
                10.0    0.1014463 0.1014151 0.1013686
                </tableData>
            <tableData breakPoint="-2.0">
                      39.38648293963254      56.26640419947507      73.14632545931758
                -10.0    0.1009716 0.1009143 0.1009234
                -5.0    0.1040729 0.1041209 0.1040526
                0.0    0.1050937 0.1085745 0.105764
                5.0    0.1035003 0.103459  0.1037441
                10.0    0.1004967 0.1003987 0.1003544
                </tableData>
            <tableData breakPoint="2.0">
                      39.38648293963254      56.26640419947507      73.14632545931758
                -10.0    0.1002863 0.1002214 0.1002291
                -5.0    0.1035879 0.1036158 0.1035536
                0.0    0.1049049 0.1053527 0.1055493
                5.0    0.1034109 0.1033693 0.1036312
                10.0    0.1002878 0.1001995 0.1001386
                </tableData>
            <tableData breakPoint="6.0">
                      39.38648293963254      56.26640419947507      73.14632545931758
                -10.0    0.101002  0.1009747 0.1009716
                -5.0    0.1035153 0.1034802 0.103453
                0.0    0.1052046 0.1056182 0.1059976
                5.0    0.1049545 0.105066  0.1051611
                10.0    0.1166727 0.1166353 0.1168946
                </tableData>
            <tableData breakPoint="10.0">
                      39.38648293963254      56.26640419947507      73.14632545931758
                -10.0    0.0994575 0.0994283 0.0994487
                -5.0    0.1033228 0.1032705 0.1031905
                0.0    0.1065592 0.10716   0.1076952
                5.0    0.1051773 0.1052888 0.1053495
                10.0    0.1023105 0.1022472 0.1022159
                </tableData>
            <tableData breakPoint="14.0">
                      39.38648293963254      56.26640419947507      73.14632545931758
                -10.0    0.0968652 0.0968398 0.096864
                -5.0    0.0984601 0.0982331 0.0979785
                0.0    0.1005028 0.1012006 0.1017754
                5.0    0.0993006 0.0992403 0.0991046
                10.0    0.099951  0.099798  0.0996729
                </tableData>
        </table>
    </function>
    <function name="aero/coefficient/CMl__dAilL_rad">
        <description>CMl__dAilL_rad = dCMl__dAilL_rad * dAilL_rad</description>
        <product>
            <property>aero/coefficient/dCMl__dAilL_rad</property>
            <property>fcs/posAilL_rad</property>
        </product>
    </function>
    <function name="aero/coefficient/dCMl__dRud_rad">
        <description>dCMl__dRud_rad</description>
        <table>
            <independentVar lookup="row">aero/beta-deg</independentVar>
            <independentVar lookup="column">velocities/vt-fps</independentVar>
            <independentVar lookup="table">aero/alpha-deg</independentVar>
            <tableData breakPoint="-6.0">
                      39.38648293963254      56.26640419947507      73.14632545931758
                -10.0    0.0002704 0.0002497 0.0002481
                -5.0    0.0009421 0.0009412 0.0009359
                0.0    0.0011297 0.0011247 0.0011078
                5.0    0.0009849 0.000984  0.0009787
                10.0    0.0009021 0.0008998 0.0008951
                </tableData>
            <tableData breakPoint="-2.0">
                      39.38648293963254      56.26640419947507      73.14632545931758
                -10.0    2.67e-05 2.66e-05 2.62e-05
                -5.0    0.0003648 0.000371  0.0003634
                0.0    0.0003429 0.000342  0.000341
                5.0    0.0003816 0.000381  0.0003803
                10.0    4.66e-05 4.65e-05 4.60e-05
                </tableData>
            <tableData breakPoint="2.0">
                      39.38648293963254      56.26640419947507      73.14632545931758
                -10.0    0.000357  0.0003575 0.0003575
                -5.0    -1.15e-05 -1.24e-05 -1.26e-05
                0.0    -0.0001969 -0.0001985 -0.0001996
                5.0    -8.8e-06 -9.7e-06 -1.0e-05
                10.0    0.0003643 0.0003646 0.0003645
                </tableData>
            <tableData breakPoint="6.0">
                      39.38648293963254      56.26640419947507      73.14632545931758
                -10.0    0.000265  0.0002649 0.0002625
                -5.0    -8.40e-06 -8.20e-06 -1.65e-05
                0.0    -0.0004459 -0.0004448 -0.0004538
                5.0    -1.46e-05 -1.56e-05 -2.44e-05
                10.0    0.0002715 0.0002714 0.0002278
                </tableData>
            <tableData breakPoint="10.0">
                      39.38648293963254      56.26640419947507      73.14632545931758
                -10.0    -0.0003915 -0.0003248 -0.0003271
                -5.0    -0.0006193 -0.0006215 -0.0006242
                0.0    -0.0005607 -0.0005569 -0.0005543
                5.0    -0.0006359 -0.0006379 -0.0006396
                10.0    -0.0003263 -0.0003317 -0.0003341
                </tableData>
            <tableData breakPoint="14.0">
                      39.38648293963254      56.26640419947507      73.14632545931758
                -10.0    -9.970e-05 -1.025e-04 -1.045e-04
                -5.0    -0.0005537 -0.0005565 -0.0005585
                0.0    -0.0008945 -0.0008842 -0.0008723
                5.0    -0.0005645 -0.0005668 -0.00057
                10.0    -0.0001106 -0.0001105 -0.0001122
                </tableData>
        </table>
    </function>
    <function name="aero/coefficient/CMl__dRud_rad">
        <description>CMl__dRud_rad = dCMl__dRud_rad * dRud_rad</description>
        <product>
            <property>aero/coefficient/dCMl__dRud_rad</property>
            <property>fcs/posRud_rad</property>
        </product>
    </function>
    <function name="aero/coefficient/dCMl__dFlapR_rad">
        <description>dCMl__dFlapR_rad</description>
        <table>
            <independentVar lookup="row">aero/beta-deg</independentVar>
            <independentVar lookup="column">velocities/vt-fps</independentVar>
            <independentVar lookup="table">aero/alpha-deg</independentVar>
            <tableData breakPoint="-6.0">
                      39.38648293963254      56.26640419947507      73.14632545931758
                -10.0    -0.0408253 -0.0408082 -0.0407893
                -5.0    -0.040935  -0.0409673 -0.0409973
                0.0    -0.0405197 -0.0407036 -0.0408167
                5.0    -0.0394661 -0.0394762 -0.0394446
                10.0    -0.0395379 -0.0395245 -0.0395087
                </tableData>
            <tableData breakPoint="-2.0">
                      39.38648293963254      56.26640419947507      73.14632545931758
                -10.0    -0.0378859 -0.0378421 -0.0378137
                -5.0    -0.0395141 -0.0394624 -0.0395666
                0.0    -0.0400534 -0.040195  -0.0402748
                5.0    -0.0394294 -0.039479  -0.0394349
                10.0    -0.0397309 -0.0397017 -0.0396881
                </tableData>
            <tableData breakPoint="2.0">
                      39.38648293963254      56.26640419947507      73.14632545931758
                -10.0    -0.0398424 -0.0398023 -0.0397699
                -5.0    -0.0404482 -0.0404042 -0.0404962
                0.0    -0.0414923 -0.041631  -0.0417092
                5.0    -0.0414356 -0.0414822 -0.0414385
                10.0    -0.0404495 -0.0404157 -0.0404004
                </tableData>
            <tableData breakPoint="6.0">
                      39.38648293963254      56.26640419947507      73.14632545931758
                -10.0    -0.0422524 -0.0422388 -0.0422169
                -5.0    -0.043581  -0.0436119 -0.0436025
                0.0    -0.0439842 -0.0441684 -0.0443079
                5.0    -0.0439549 -0.0439655 -0.0439452
                10.0    -0.044744  -0.0447267 -0.0447072
                </tableData>
            <tableData breakPoint="10.0">
                      39.38648293963254      56.26640419947507      73.14632545931758
                -10.0    -0.0425929 -0.0425298 -0.0424989
                -5.0    -0.0431053 -0.0432768 -0.0436774
                0.0    -0.0443072 -0.0451497 -0.0454292
                5.0    -0.0451601 -0.045155  -0.0451424
                10.0    -0.0462015 -0.0461899 -0.0462224
                </tableData>
            <tableData breakPoint="14.0">
                      39.38648293963254      56.26640419947507      73.14632545931758
                -10.0    -0.0260214 -0.0258861 -0.0257415
                -5.0    -0.020615  -0.0205182 -0.0203606
                0.0    -0.0216902 -0.0220728 -0.0224418
                5.0    -0.02342   -0.0232902 -0.0232496
                10.0    -0.0326154 -0.0325095 -0.0323885
                </tableData>
        </table>
    </function>
    <function name="aero/coefficient/CMl__dFlapR_rad">
        <description>CMl__dFlapR_rad = dCMl__dFlapR_rad * dFlapR_rad</description>
        <product>
            <property>aero/coefficient/dCMl__dFlapR_rad</property>
            <property>fcs/posFlapR_rad</property>
        </product>
    </function>
    <function name="aero/coefficient/dCMl__dFlapL_rad">
        <description>dCMl__dFlapL_rad</description>
        <table>
            <independentVar lookup="row">aero/beta-deg</independentVar>
            <independentVar lookup="column">velocities/vt-fps</independentVar>
            <independentVar lookup="table">aero/alpha-deg</independentVar>
            <tableData breakPoint="-6.0">
                      39.38648293963254      56.26640419947507      73.14632545931758
                -10.0    0.0395379 0.0395245 0.0395087
                -5.0    0.0394661 0.0394762 0.0394446
                0.0    0.0405197 0.0407036 0.0408167
                5.0    0.040935  0.0409673 0.0409749
                10.0    0.0408253 0.0408125 0.0407841
                </tableData>
            <tableData breakPoint="-2.0">
                      39.38648293963254      56.26640419947507      73.14632545931758
                -10.0    0.0397309 0.0397017 0.0396881
                -5.0    0.0394294 0.0394859 0.0394349
                0.0    0.0400534 0.040195  0.0402748
                5.0    0.0395141 0.0394692 0.0395666
                10.0    0.0378859 0.0378421 0.0378137
                </tableData>
            <tableData breakPoint="2.0">
                      39.38648293963254      56.26640419947507      73.14632545931758
                -10.0    0.0404495 0.0404157 0.0404004
                -5.0    0.0414356 0.0414822 0.0414385
                0.0    0.0414923 0.041631  0.0417092
                5.0    0.0380587 0.0404042 0.0404962
                10.0    0.0398898 0.0398021 0.0397699
                </tableData>
            <tableData breakPoint="6.0">
                      39.38648293963254      56.26640419947507      73.14632545931758
                -10.0    0.044744  0.0447267 0.0447072
                -5.0    0.0439549 0.0439655 0.0439452
                0.0    0.0439842 0.0441684 0.0443079
                5.0    0.043581  0.0436119 0.0436025
                10.0    0.0422524 0.0422388 0.0422169
                </tableData>
            <tableData breakPoint="10.0">
                      39.38648293963254      56.26640419947507      73.14632545931758
                -10.0    0.0462015 0.0461899 0.0461956
                -5.0    0.0452657 0.045155  0.0451424
                0.0    0.0443072 0.0451497 0.0454292
                5.0    0.0431053 0.0436653 0.0436774
                10.0    0.0425929 0.0425298 0.0424989
                </tableData>
            <tableData breakPoint="14.0">
                      39.38648293963254      56.26640419947507      73.14632545931758
                -10.0    0.0326154 0.0325095 0.0323885
                -5.0    0.02342   0.0232902 0.0232496
                0.0    0.0216902 0.0220728 0.0224418
                5.0    0.020615  0.0208048 0.0203606
                10.0    0.0260214 0.0258861 0.0257415
                </tableData>
        </table>
    </function>
    <function name="aero/coefficient/CMl__dFlapL_rad">
        <description>CMl__dFlapL_rad = dCMl__dFlapL_rad * dFlapL_rad</description>
        <product>
            <property>aero/coefficient/dCMl__dFlapL_rad</property>
            <property>fcs/posFlapL_rad</property>
        </product>
    </function>
    <function name="aero/coefficient/dCMl__dElev_rad">
        <description>dCMl__dElev_rad</description>
        <table>
            <independentVar lookup="row">aero/beta-deg</independentVar>
            <independentVar lookup="column">velocities/vt-fps</independentVar>
            <independentVar lookup="table">aero/alpha-deg</independentVar>
            <tableData breakPoint="-6.0">
                      39.38648293963254      56.26640419947507      73.14632545931758
                -10.0    0.002536  0.002516  0.0025215
                -5.0    0.0019141 0.0019119 0.0019766
                0.0     0. -0.  0.
                5.0    -0.0019141 -0.0019119 -0.0019766
                10.0    -0.002536  -0.002516  -0.0025215
                </tableData>
            <tableData breakPoint="-2.0">
                      39.38648293963254      56.26640419947507      73.14632545931758
                -10.0    -0.000149  -0.0001563 -0.0001641
                -5.0    -0.00207   -0.0020448 -0.0020823
                0.0    -0.  0.  0.
                5.0    0.00207   0.0020517 0.0020823
                10.0    0.000149  0.0001563 0.0001641
                </tableData>
            <tableData breakPoint="2.0">
                      39.38648293963254      56.26640419947507      73.14632545931758
                -10.0    0.0033688 0.003364  0.0033623
                -5.0    0.0003209 0.00034   0.0003132
                0.0    -0.  0.  0.
                5.0    -0.0003209 -0.00034   -0.0003132
                10.0    -0.0033688 -0.003364  -0.0033623
                </tableData>
            <tableData breakPoint="6.0">
                      39.38648293963254      56.26640419947507      73.14632545931758
                -10.0    0.0035139 0.0035107 0.0031342
                -5.0    0.0015995 0.0015972 0.0015811
                0.0     0. -0. -0.
                5.0    -0.0015995 -0.0015972 -0.0015811
                10.0    -0.0035139 -0.0035107 -0.0031342
                </tableData>
            <tableData breakPoint="10.0">
                      39.38648293963254      56.26640419947507      73.14632545931758
                -10.0    0.0018779 0.0018053 0.0018037
                -5.0    0.0014672 0.0014505 0.0014305
                0.0    -0.  0.  0.
                5.0    -0.0014672 -0.0014505 -0.0014305
                10.0    -0.0018779 -0.0018053 -0.0018037
                </tableData>
            <tableData breakPoint="14.0">
                      39.38648293963254      56.26640419947507      73.14632545931758
                -10.0    0.0003642 0.0003281 0.0002921
                -5.0    0.0005687 0.0005442 0.00051
                0.0    -0. -0. -0.
                5.0    -0.0005687 -0.0005442 -0.00051
                10.0    -0.0003642 -0.0003281 -0.0002921
                </tableData>
        </table>
    </function>
    <function name="aero/coefficient/CMl__dElev_rad">
        <description>CMl__dElev_rad = dCMl__dElev_rad * dElev_rad</description>
        <product>
            <property>aero/coefficient/dCMl__dElev_rad</property>
            <property>fcs/posElev_rad</property>
        </product>
    </function>
    <function name="aero/coefficient/CMl">
        <description>CMl summation</description>
        <sum>
            <property>aero/coefficient/CMl__zero</property>
            <property>aero/coefficient/CMl__alpha_rad</property>
            <property>aero/coefficient/CMl__beta_rad</property>
            <property>aero/coefficient/CMl__dpHat_rps</property>
            <property>aero/coefficient/CMl__dqHat_rps</property>
            <property>aero/coefficient/CMl__drHat_rps</property>
            <property>aero/coefficient/CMl__dAilR_rad</property>
            <property>aero/coefficient/CMl__dAilL_rad</property>
            <property>aero/coefficient/CMl__dRud_rad</property>
            <property>aero/coefficient/CMl__dFlapR_rad</property>
            <property>aero/coefficient/CMl__dFlapL_rad</property>
            <property>aero/coefficient/CMl__dElev_rad</property>
        </sum>
    </function>
    <function name="aero/coefficient/CMm__zero">
        <description>CMm__zero</description>
        <table>
            <independentVar lookup="row">aero/beta-deg</independentVar>
            <independentVar lookup="column">velocities/vt-fps</independentVar>
            <independentVar lookup="table">aero/alpha-deg</independentVar>
            <tableData breakPoint="-6.0">
                      39.38648293963254      56.26640419947507      73.14632545931758
                -10.0    0.04084048 0.04470305 0.04858101
                -5.0    0.04126264 0.04751945 0.05231369
                0.0    0.01909254 0.01900387 0.01846444
                5.0    0.03796049 0.0427542  0.04645852
                10.0    0.2749261  0.27860106 0.28225955
                </tableData>
            <tableData breakPoint="-2.0">
                      39.38648293963254      56.26640419947507      73.14632545931758
                -10.0    0.00544924 0.00635954 0.00735754
                -5.0    0.00930647 0.01026083 0.01098074
                0.0    0.00731479 0.00620219 0.00515387
                5.0    0.00628438 0.00718153 0.00772423
                10.0    0.05379415 0.05450576 0.05531323
                </tableData>
            <tableData breakPoint="2.0">
                      39.38648293963254      56.26640419947507      73.14632545931758
                -10.0    -0.00527953 -0.0048227  -0.0015154
                -5.0    -0.00031253 -0.00197653  0.00204088
                0.0     2.39194556e-04 -9.41415072e-04  8.49764332e-05
                5.0     0.00056215 -0.00110559  0.00284277
                10.0    -0.10675606 -0.1063699  -0.10313245
                </tableData>
            <tableData breakPoint="6.0">
                      39.38648293963254      56.26640419947507      73.14632545931758
                -10.0    -0.06209321 -0.05771321 -0.05454321
                -5.0    -0.00095971  0.00484719  0.00932768
                0.0    -0.00450676 -0.00165916  0.00219903
                5.0    -0.00178907  0.00333103  0.00719636
                10.0    -0.20925838 -0.20497635 -0.20045417
                </tableData>
            <tableData breakPoint="10.0">
                      39.38648293963254      56.26640419947507      73.14632545931758
                -10.0    -0.01493786 -0.00944104 -0.0041717
                -5.0    0.02990493 0.03642342 0.04265737
                0.0    0.0330325  0.04033562 0.04768423
                5.0    0.02613119 0.03352201 0.0402659
                10.0    -0.00183819  0.00437042  0.00918682
                </tableData>
            <tableData breakPoint="14.0">
                      39.38648293963254      56.26640419947507      73.14632545931758
                -10.0    -0.07363881 -0.06781503 -0.06323227
                -5.0    -0.01349251 -0.00583197  0.00124172
                0.0    0.03402515 0.04720745 0.06017119
                5.0    -0.0193346  -0.01197464 -0.00537745
                10.0    -0.02865077 -0.02297174 -0.01907232
                </tableData>
        </table>
    </function>
    <function name="aero/coefficient/dCMm__alpha_rad">
        <description>dCMm__alpha_rad</description>
        <table>
            <independentVar lookup="row">aero/beta-deg</independentVar>
            <independentVar lookup="column">velocities/vt-fps</independentVar>
            <independentVar lookup="table">aero/alpha-deg</independentVar>
            <tableData breakPoint="-6.0">
                      39.38648293963254      56.26640419947507      73.14632545931758
                -10.0    -1.0790256 -1.0869264 -1.0892711
                -5.0    -1.1031903 -1.1216933 -1.1391869
                0.0    -1.3054438 -1.3998326 -1.4986834
                5.0    -1.1031903 -1.1216933 -1.1391869
                10.0    -1.0790256 -1.0869264 -1.0892711
                </tableData>
            <tableData breakPoint="-2.0">
                      39.38648293963254      56.26640419947507      73.14632545931758
                -10.0    -1.3835684 -1.4185234 -1.4767897
                -5.0    -1.4332665 -1.4874795 -1.5855618
                0.0    -1.4288366 -1.5563113 -1.6798187
                5.0    -1.4332665 -1.4876074 -1.5855618
                10.0    -1.3835684 -1.4185234 -1.4767897
                </tableData>
            <tableData breakPoint="2.0">
                      39.38648293963254      56.26640419947507      73.14632545931758
                -10.0    -1.355305  -1.3079202 -1.3098487
                -5.0    -1.3792893 -1.2653693 -1.2743459
                0.0    -1.3223893 -1.2037266 -1.1502608
                5.0    -1.3792893 -1.2653693 -1.2743459
                10.0    -1.355305  -1.3079202 -1.3098487
                </tableData>
            <tableData breakPoint="6.0">
                      39.38648293963254      56.26640419947507      73.14632545931758
                -10.0    -1.2856134 -1.2898742 -1.3030368
                -5.0    -1.36361   -1.3658268 -1.3666937
                0.0    -1.3353912 -1.3062009 -1.290519
                5.0    -1.36361   -1.3658268 -1.3666937
                10.0    -1.2856134 -1.2898742 -1.3030368
                </tableData>
            <tableData breakPoint="10.0">
                      39.38648293963254      56.26640419947507      73.14632545931758
                -10.0    -1.6078679 -1.6221704 -1.6334846
                -5.0    -1.5850325 -1.5949357 -1.6064606
                0.0    -1.6000213 -1.6033079 -1.6072247
                5.0    -1.5850325 -1.5949357 -1.6064606
                10.0    -1.6078679 -1.6221704 -1.6334846
                </tableData>
            <tableData breakPoint="14.0">
                      39.38648293963254      56.26640419947507      73.14632545931758
                -10.0    -1.4014068 -1.4118354 -1.4197575
                -5.0    -1.4275935 -1.4408687 -1.4541536
                0.0    -1.6078704 -1.6382003 -1.6679824
                5.0    -1.4275935 -1.4408687 -1.4541536
                10.0    -1.4014068 -1.4118354 -1.4197575
                </tableData>
        </table>
    </function>
    <function name="aero/coefficient/CMm__alpha_rad">
        <description>CMm__alpha_rad = dCMm__alpha_rad * alpha_rad</description>
        <product>
            <property>aero/coefficient/dCMm__alpha_rad</property>
            <property>aero/alpha-rad</property>
        </product>
    </function>
    <function name="aero/coefficient/dCMm__beta_rad">
        <description>dCMm__beta_rad</description>
        <table>
            <independentVar lookup="row">aero/beta-deg</independentVar>
            <independentVar lookup="column">velocities/vt-fps</independentVar>
            <independentVar lookup="table">aero/alpha-deg</independentVar>
            <tableData breakPoint="-6.0">
                      39.38648293963254      56.26640419947507      73.14632545931758
                -10.0    0.0373235 0.051894  0.0665205
                -5.0    0.0750937 0.1233131 0.1619094
                0.0    -0.0026566 -0.0422707 -0.1102794
                5.0    -0.0372538 -0.0687073 -0.0948141
                10.0    -1.3785353 -1.3920309 -1.4053999
                </tableData>
            <tableData breakPoint="-2.0">
                      39.38648293963254      56.26640419947507      73.14632545931758
                -10.0    -0.0433638 -0.037148  -0.0272148
                -5.0    0.0110822 0.0229545 0.0422532
                0.0    -0.0007018 -0.0035582 -0.0082142
                5.0     0.0235483  0.0123057 -0.0049364
                10.0    -0.2336321 -0.2387095 -0.2475511
                </tableData>
            <tableData breakPoint="2.0">
                      39.38648293963254      56.26640419947507      73.14632545931758
                -10.0    -0.0670246 -0.0645043 -0.0569024
                -5.0    -0.0393027 -0.0352615 -0.0237753
                0.0    0.0105227 0.0093424 0.007093
                5.0    0.0292796 0.0252813 0.0145863
                10.0    0.6484423 0.6463269 0.6391252
                </tableData>
            <tableData breakPoint="6.0">
                      39.38648293963254      56.26640419947507      73.14632545931758
                -10.0    -0.3462059 -0.338491  -0.3392724
                -5.0    0.0050991 0.0286713 0.0489381
                0.0     0.0073452 -0.0061732 -0.0332604
                5.0     0.0044046 -0.0112974 -0.0245149
                10.0    1.1894002 1.1822466 1.1752806
                </tableData>
            <tableData breakPoint="10.0">
                      39.38648293963254      56.26640419947507      73.14632545931758
                -10.0    -0.3305041 -0.3246481 -0.313548
                -5.0    -7.25000e-05  1.79511e-02  3.72870e-02
                0.0     0.0074193 -0.0388381 -0.1132184
                5.0     0.0433164  0.0152966 -0.0098828
                10.0    0.2554485 0.2455143 0.2370093
                </tableData>
            <tableData breakPoint="14.0">
                      39.38648293963254      56.26640419947507      73.14632545931758
                -10.0    -0.41666   -0.4055097 -0.3943266
                -5.0    -0.0254073 -0.0035559  0.0203304
                0.0    -0.0056051 -0.0567625 -0.1342651
                5.0    0.0923528 0.0739457 0.0555197
                10.0    0.1588975 0.1485766 0.1413087
                </tableData>
        </table>
    </function>
    <function name="aero/coefficient/CMm__beta_rad">
        <description>CMm__beta_rad = dCMm__beta_rad * beta_rad</description>
        <product>
            <property>aero/coefficient/dCMm__beta_rad</property>
            <property>aero/beta-rad</property>
        </product>
    </function>
    <function name="aero/coefficient/dCMm__dpHat_rps">
        <description>dCMm__dpHat_rps</description>
        <table>
            <independentVar lookup="row">aero/beta-deg</independentVar>
            <independentVar lookup="column">velocities/vt-fps</independentVar>
            <independentVar lookup="table">aero/alpha-deg</independentVar>
            <tableData breakPoint="-6.0">
                      39.38648293963254      56.26640419947507      73.14632545931758
                -10.0    -0.2656148 -0.268621  -0.2711549
                -5.0    -0.1250927 -0.1265487 -0.128022
                0.0    -0.0148738 -0.0149776 -0.0160958
                5.0    0.0954344 0.0957815 0.0970446
                10.0    0.203536  0.2004042 0.1997526
                </tableData>
            <tableData breakPoint="-2.0">
                      39.38648293963254      56.26640419947507      73.14632545931758
                -10.0    -0.3436461 -0.3499025 -0.3603142
                -5.0    -0.2267784 -0.2247148 -0.2656986
                0.0    -0.0681701 -0.0804642 -0.1037913
                5.0     0.028151   0.0233193 -0.0157818
                10.0    0.1257297 0.136447  0.1141151
                </tableData>
            <tableData breakPoint="2.0">
                      39.38648293963254      56.26640419947507      73.14632545931758
                -10.0    -0.2344694 -0.2236903 -0.2427383
                -5.0    -0.1068522 -0.1064016 -0.1347101
                0.0    0.0279129 0.0187305 0.0106746
                5.0    0.1439034 0.1460081 0.1179154
                10.0    0.4540234 0.4429374 0.4262194
                </tableData>
            <tableData breakPoint="6.0">
                      39.38648293963254      56.26640419947507      73.14632545931758
                -10.0    -0.3547195 -0.3515371 -0.3601826
                -5.0    -0.1126421 -0.1128035 -0.1135663
                0.0    -0.008449  -0.0085277 -0.0086621
                5.0    0.0887521 0.086884  0.0894647
                10.0    0.7210775 0.7187984 0.7163402
                </tableData>
            <tableData breakPoint="10.0">
                      39.38648293963254      56.26640419947507      73.14632545931758
                -10.0    -0.196604  -0.198381  -0.1991357
                -5.0    -0.1005567 -0.105095  -0.1053674
                0.0    -0.0004107 -0.0051543 -0.0052425
                5.0    0.1097508 0.1040432 0.1024459
                10.0    0.1953261 0.1955687 0.1955693
                </tableData>
            <tableData breakPoint="14.0">
                      39.38648293963254      56.26640419947507      73.14632545931758
                -10.0    -0.1486852 -0.1494586 -0.1501478
                -5.0    -0.073832  -0.0740709 -0.0744382
                0.0    -0.0019652 -0.0020238 -0.0021188
                5.0    0.083477  0.0826289 0.0821042
                10.0    0.1441123 0.1445736 0.1454123
                </tableData>
        </table>
    </function>
    <function name="aero/coefficient/CMm__dpHat_rps">
        <description>CMm__dpHat_rps = dCMm__dpHat_rps * dpHat_rps</description>
        <product>
            <property>aero/coefficient/dCMm__dpHat_rps</property>
            <property>velocities/p-aero-rad_sec</property>
            <property>aero/bi2vel</property>
        </product>
    </function>
    <function name="aero/coefficient/dCMm__dqHat_rps">
        <description>dCMm__dqHat_rps</description>
        <table>
            <independentVar lookup="row">aero/beta-deg</independentVar>
            <independentVar lookup="column">velocities/vt-fps</independentVar>
            <independentVar lookup="table">aero/alpha-deg</independentVar>
            <tableData breakPoint="-6.0">
                      39.38648293963254      56.26640419947507      73.14632545931758
                -10.0    -14.3497758 -14.354534  -14.3587502
                -5.0    -14.5375685 -14.544076  -14.5577067
                0.0    -14.7814412 -14.8357765 -14.903969
                5.0    -14.5375685 -14.544076  -14.5577067
                10.0    -14.3497758 -14.354534  -14.3587502
                </tableData>
            <tableData breakPoint="-2.0">
                      39.38648293963254      56.26640419947507      73.14632545931758
                -10.0    -13.7766865 -13.7921684 -13.8913724
                -5.0    -14.0637349 -14.1707028 -14.1344059
                0.0    -14.0838587 -14.3198902 -14.2305471
                5.0    -14.0637349 -14.171035  -14.1344059
                10.0    -13.7766865 -13.7921684 -13.8913724
                </tableData>
            <tableData breakPoint="2.0">
                      39.38648293963254      56.26640419947507      73.14632545931758
                -10.0    -14.5582946 -14.5475507 -14.5242406
                -5.0    -14.58526   -14.471436  -14.5370197
                0.0    -14.4069938 -14.3347449 -14.3061981
                5.0    -14.58526   -14.471436  -14.5370197
                10.0    -14.5582946 -14.5475507 -14.5242406
                </tableData>
            <tableData breakPoint="6.0">
                      39.38648293963254      56.26640419947507      73.14632545931758
                -10.0    -13.2912437 -13.3416603 -13.3564777
                -5.0    -12.8514137 -12.9200624 -12.9174261
                0.0    -12.9591527 -13.0127015 -12.9892168
                5.0    -12.8514137 -12.9200624 -12.9174261
                10.0    -13.2912437 -13.3416603 -13.3564777
                </tableData>
            <tableData breakPoint="10.0">
                      39.38648293963254      56.26640419947507      73.14632545931758
                -10.0    -11.6736794 -11.6791137 -11.6959417
                -5.0    -12.6789802 -12.7013464 -12.7245306
                0.0    -12.7231779 -12.7344712 -12.7487165
                5.0    -12.6789802 -12.7013464 -12.7245306
                10.0    -11.6736794 -11.6795733 -11.6959417
                </tableData>
            <tableData breakPoint="14.0">
                      39.38648293963254      56.26640419947507      73.14632545931758
                -10.0    -10.5826469 -10.5976389 -10.6090762
                -5.0    -10.9166079 -11.3827818 -10.9623459
                0.0    -12.0213361 -12.0464356 -12.0547988
                5.0    -10.9166079 -10.9411484 -10.9623459
                10.0    -10.5826469 -10.5976389 -10.6090762
                </tableData>
        </table>
    </function>
    <function name="aero/coefficient/CMm__dqHat_rps">
        <description>CMm__dqHat_rps = dCMm__dqHat_rps * dqHat_rps</description>
        <product>
            <property>aero/coefficient/dCMm__dqHat_rps</property>
            <property>velocities/q-aero-rad_sec</property>
            <property>aero/ci2vel</property>
        </product>
    </function>
    <function name="aero/coefficient/dCMm__drHat_rps">
        <description>dCMm__drHat_rps</description>
        <table>
            <independentVar lookup="row">aero/beta-deg</independentVar>
            <independentVar lookup="column">velocities/vt-fps</independentVar>
            <independentVar lookup="table">aero/alpha-deg</independentVar>
            <tableData breakPoint="-6.0">
                      39.38648293963254      56.26640419947507      73.14632545931758
                -10.0    -0.5790524 -0.578948  -0.5787818
                -5.0    0.0780491 0.0780438 0.0781347
                0.0    0.0166014 0.016593  0.0154143
                5.0    -0.0455129 -0.0455081 -0.0456037
                10.0    -0.0938398 -0.099263  -0.0992761
                </tableData>
            <tableData breakPoint="-2.0">
                      39.38648293963254      56.26640419947507      73.14632545931758
                -10.0    0.0196092 0.0201799 0.0194887
                -5.0     0.0731524 -0.0622931  0.0728246
                0.0    0.0179729 0.0179582 0.0179496
                5.0    -0.0422355 -0.0427188 -0.0419433
                10.0    -0.0864968 -0.0869914 -0.0862169
                </tableData>
            <tableData breakPoint="2.0">
                      39.38648293963254      56.26640419947507      73.14632545931758
                -10.0    0.4101454 0.4106439 0.4097003
                -5.0    0.0533931 0.0543307 0.053046
                0.0    0.0165999 0.0165838 0.0165777
                5.0    -0.0286963 -0.0292419 -0.0284091
                10.0    -0.066028  -0.066517  -0.0640338
                </tableData>
            <tableData breakPoint="6.0">
                      39.38648293963254      56.26640419947507      73.14632545931758
                -10.0    0.6278488 0.627866  0.624187
                -5.0    0.0362278 0.036223  0.0363063
                0.0    0.0120726 0.0120612 0.0120708
                5.0    -0.018787  -0.0187743 -0.0188154
                10.0    -0.1865897 -0.1865624 -0.1902686
                </tableData>
            <tableData breakPoint="10.0">
                      39.38648293963254      56.26640419947507      73.14632545931758
                -10.0    0.1591984 0.1587115 0.1588309
                -5.0    0.023938  0.0239131 0.0238638
                0.0    0.0112331 0.0112332 0.0112298
                5.0    -0.0143167 -0.0142902 -0.0142442
                10.0    -0.1463922 -0.1477709 -0.1464649
                </tableData>
            <tableData breakPoint="14.0">
                      39.38648293963254      56.26640419947507      73.14632545931758
                -10.0    0.1492624 0.149261  0.1493099
                -5.0    0.0891602 0.0891196 0.0889658
                0.0    0.0078343 0.0078047 0.0077539
                5.0    0.0040942 0.0041646 0.004193
                10.0    -0.251226  -0.2495986 -0.2465101
                </tableData>
        </table>
    </function>
    <function name="aero/coefficient/CMm__drHat_rps">
        <description>CMm__drHat_rps = dCMm__drHat_rps * drHat_rps</description>
        <product>
            <property>aero/coefficient/dCMm__drHat_rps</property>
            <property>velocities/r-aero-rad_sec</property>
            <property>aero/bi2vel</property>
        </product>
    </function>
    <function name="aero/coefficient/dCMm__dAilR_rad">
        <description>dCMm__dAilR_rad</description>
        <table>
            <independentVar lookup="row">aero/beta-deg</independentVar>
            <independentVar lookup="column">velocities/vt-fps</independentVar>
            <independentVar lookup="table">aero/alpha-deg</independentVar>
            <tableData breakPoint="-6.0">
                      39.38648293963254      56.26640419947507      73.14632545931758
                -10.0    -0.1808089 -0.1810899 -0.1811705
                -5.0    -0.1934162 -0.1942263 -0.1949429
                0.0    -0.1998414 -0.2024803 -0.2050344
                5.0    -0.1956423 -0.195779  -0.1957495
                10.0    -0.176572  -0.1766264 -0.1766485
                </tableData>
            <tableData breakPoint="-2.0">
                      39.38648293963254      56.26640419947507      73.14632545931758
                -10.0    -0.1963305 -0.1963386 -0.2002586
                -5.0    -0.1861086 -0.1865936 -0.1919174
                0.0    -0.1904148 -0.2311543 -0.1996307
                5.0    -0.1674054 -0.1692446 -0.1693492
                10.0    -0.1440779 -0.1458564 -0.1463429
                </tableData>
            <tableData breakPoint="2.0">
                      39.38648293963254      56.26640419947507      73.14632545931758
                -10.0    -0.1747641 -0.1745773 -0.1707927
                -5.0    -0.1737824 -0.1731829 -0.1687511
                0.0    -0.1706671 -0.165337  -0.1636112
                5.0    -0.1473024 -0.1457827 -0.1456465
                10.0    -0.106008  -0.1045214 -0.1045531
                </tableData>
            <tableData breakPoint="6.0">
                      39.38648293963254      56.26640419947507      73.14632545931758
                -10.0    -0.4079037 -0.4077316 -0.4155837
                -5.0    -0.1634382 -0.1629469 -0.1627047
                0.0    -0.1587856 -0.157552  -0.1564823
                5.0    -0.1330852 -0.1332279 -0.133291
                10.0    -0.0981132 -0.0982601 -0.0982312
                </tableData>
            <tableData breakPoint="10.0">
                      39.38648293963254      56.26640419947507      73.14632545931758
                -10.0    -0.1583197 -0.1584198 -0.1586413
                -5.0    -0.1540441 -0.1538037 -0.1537901
                0.0    -0.1499657 -0.1490979 -0.1483833
                5.0    -0.119099  -0.1190596 -0.1192236
                10.0    -0.0868238 -0.0864799 -0.0873206
                </tableData>
            <tableData breakPoint="14.0">
                      39.38648293963254      56.26640419947507      73.14632545931758
                -10.0    -0.1505045 -0.1506777 -0.1508811
                -5.0    -0.1436096 -0.1436056 -0.1437194
                0.0    -0.1251111 -0.1332578 -0.132961
                5.0    -0.1176201 -0.1176899 -0.1179026
                10.0    -0.0930812 -0.0932972 -0.0935923
                </tableData>
        </table>
    </function>
    <function name="aero/coefficient/CMm__dAilR_rad">
        <description>CMm__dAilR_rad = dCMm__dAilR_rad * dAilR_rad</description>
        <product>
            <property>aero/coefficient/dCMm__dAilR_rad</property>
            <property>fcs/posAilR_rad</property>
        </product>
    </function>
    <function name="aero/coefficient/dCMm__dAilL_rad">
        <description>dCMm__dAilL_rad</description>
        <table>
            <independentVar lookup="row">aero/beta-deg</independentVar>
            <independentVar lookup="column">velocities/vt-fps</independentVar>
            <independentVar lookup="table">aero/alpha-deg</independentVar>
            <tableData breakPoint="-6.0">
                      39.38648293963254      56.26640419947507      73.14632545931758
                -10.0    -0.176572  -0.1766264 -0.1766485
                -5.0    -0.1958366 -0.195779  -0.1957495
                0.0    -0.1998414 -0.2024803 -0.2050344
                5.0    -0.1934162 -0.1942263 -0.1949429
                10.0    -0.1808089 -0.1810899 -0.1811705
                </tableData>
            <tableData breakPoint="-2.0">
                      39.38648293963254      56.26640419947507      73.14632545931758
                -10.0    -0.1440779 -0.1458564 -0.1463429
                -5.0    -0.1674054 -0.1691167 -0.1697894
                0.0    -0.1904148 -0.2311543 -0.1996307
                5.0    -0.1861086 -0.1867216 -0.1919174
                10.0    -0.1963305 -0.1963386 -0.2002586
                </tableData>
            <tableData breakPoint="2.0">
                      39.38648293963254      56.26640419947507      73.14632545931758
                -10.0    -0.106008  -0.1045214 -0.1045531
                -5.0    -0.1470905 -0.1457827 -0.1456465
                0.0    -0.1706671 -0.165337  -0.1636112
                5.0    -0.1737824 -0.1731829 -0.1687511
                10.0    -0.1747641 -0.1745773 -0.1707927
                </tableData>
            <tableData breakPoint="6.0">
                      39.38648293963254      56.26640419947507      73.14632545931758
                -10.0    -0.0981132 -0.0982601 -0.0982312
                -5.0    -0.1330852 -0.1332279 -0.133291
                0.0    -0.1587856 -0.157552  -0.1564823
                5.0    -0.1634374 -0.1629469 -0.1627047
                10.0    -0.4079037 -0.4077316 -0.4155837
                </tableData>
            <tableData breakPoint="10.0">
                      39.38648293963254      56.26640419947507      73.14632545931758
                -10.0    -0.0868238 -0.0870501 -0.0873206
                -5.0    -0.119099  -0.1190596 -0.1192236
                0.0    -0.1499657 -0.1490979 -0.1483833
                5.0    -0.1540441 -0.1538037 -0.1537901
                10.0    -0.1583197 -0.1584198 -0.1586413
                </tableData>
            <tableData breakPoint="14.0">
                      39.38648293963254      56.26640419947507      73.14632545931758
                -10.0    -0.0930812 -0.0932972 -0.0935923
                -5.0    -0.1176201 -0.1176899 -0.1179026
                0.0    -0.1337548 -0.1332578 -0.132961
                5.0    -0.1436096 -0.1436056 -0.1437194
                10.0    -0.1505045 -0.1506777 -0.1508811
                </tableData>
        </table>
    </function>
    <function name="aero/coefficient/CMm__dAilL_rad">
        <description>CMm__dAilL_rad = dCMm__dAilL_rad * dAilL_rad</description>
        <product>
            <property>aero/coefficient/dCMm__dAilL_rad</property>
            <property>fcs/posAilL_rad</property>
        </product>
    </function>
    <function name="aero/coefficient/dCMm__dRud_rad">
        <description>dCMm__dRud_rad</description>
        <table>
            <independentVar lookup="row">aero/beta-deg</independentVar>
            <independentVar lookup="column">velocities/vt-fps</independentVar>
            <independentVar lookup="table">aero/alpha-deg</independentVar>
            <tableData breakPoint="-6.0">
                      39.38648293963254      56.26640419947507      73.14632545931758
                -10.0    0.0349765 0.0361065 0.0361137
                -5.0    0.0158952 0.0158991 0.0159342
                0.0    0.0006642 0.0006637 0.0006636
                5.0    -0.0149633 -0.0149675 -0.0150028
                10.0    -0.0283585 -0.0284046 -0.0284599
                </tableData>
            <tableData breakPoint="-2.0">
                      39.38648293963254      56.26640419947507      73.14632545931758
                -10.0    0.0206056 0.0206265 0.0206453
                -5.0    0.0142333 0.0143739 0.0142529
                0.0    0.0008447 0.0008451 0.0008452
                5.0    -0.013501  -0.0135117 -0.0135176
                10.0    -0.0199928 -0.0200128 -0.0200308
                </tableData>
            <tableData breakPoint="2.0">
                      39.38648293963254      56.26640419947507      73.14632545931758
                -10.0    0.0115439 0.0115301 0.011526
                -5.0    0.0077365 0.0077255 0.0077214
                0.0    0.0008506 0.0008487 0.0008474
                5.0    -0.0072194 -0.0072096 -0.0072075
                10.0    -0.0116263 -0.0116129 -0.0116074
                </tableData>
            <tableData breakPoint="6.0">
                      39.38648293963254      56.26640419947507      73.14632545931758
                -10.0    0.0046915 0.0046925 0.004756
                -5.0    0.0041895 0.004198  0.0042006
                0.0    0.0007828 0.0007805 0.0007787
                5.0    -0.003992  -0.0039891 -0.0039788
                10.0    -0.0048596 -0.0048618 -0.0047392
                </tableData>
            <tableData breakPoint="10.0">
                      39.38648293963254      56.26640419947507      73.14632545931758
                -10.0    -0.0033289  0.0008017  0.0007757
                -5.0    -0.0003238 -0.0003276 -0.0003338
                0.0    0.0004087 0.0004084 0.0004037
                5.0    -2.83e-05 -2.00e-05 -6.30e-06
                10.0    -0.0008424 -0.0007572 -0.0007186
                </tableData>
            <tableData breakPoint="14.0">
                      39.38648293963254      56.26640419947507      73.14632545931758
                -10.0    -0.000927  -0.0009524 -0.0009786
                -5.0    -0.0038313 -0.0038437 -0.0038314
                0.0    0.0001695 0.0001848 0.000186
                5.0    0.0033526 0.0033663 0.0034062
                10.0    0.0007926 0.0008019 0.0008321
                </tableData>
        </table>
    </function>
    <function name="aero/coefficient/CMm__dRud_rad">
        <description>CMm__dRud_rad = dCMm__dRud_rad * dRud_rad</description>
        <product>
            <property>aero/coefficient/dCMm__dRud_rad</property>
            <property>fcs/posRud_rad</property>
        </product>
    </function>
    <function name="aero/coefficient/dCMm__dFlapR_rad">
        <description>dCMm__dFlapR_rad</description>
        <table>
            <independentVar lookup="row">aero/beta-deg</independentVar>
            <independentVar lookup="column">velocities/vt-fps</independentVar>
            <independentVar lookup="table">aero/alpha-deg</independentVar>
            <tableData breakPoint="-6.0">
                      39.38648293963254      56.26640419947507      73.14632545931758
                -10.0    -0.0754853 -0.076304  -0.0756537
                -5.0    -0.0139503 -0.014226  -0.0144791
                0.0    0.0540468 0.0523923 0.0513185
                5.0    0.1448676 0.1447366 0.1449795
                10.0    0.1995733 0.1995635 0.1996108
                </tableData>
            <tableData breakPoint="-2.0">
                      39.38648293963254      56.26640419947507      73.14632545931758
                -10.0    -0.0552465 -0.055459  -0.0571148
                -5.0     0.0020201  0.0015578 -0.0006313
                0.0    0.0653395 0.062257  0.0607176
                5.0    0.1476704 0.1464099 0.1456
                10.0    0.1979546 0.1971262 0.196614
                </tableData>
            <tableData breakPoint="2.0">
                      39.38648293963254      56.26640419947507      73.14632545931758
                -10.0    -0.0554656 -0.0550459 -0.05325
                -5.0    0.0070278 0.0077964 0.0099538
                0.0    0.054859  0.0577254 0.0590697
                5.0    0.1181321 0.1196934 0.1207896
                10.0    0.1819549 0.183263  0.1841935
                </tableData>
            <tableData breakPoint="6.0">
                      39.38648293963254      56.26640419947507      73.14632545931758
                -10.0    -0.0661634 -0.0660396 -0.0660854
                -5.0    -0.0256616 -0.025382  -0.024336
                0.0    0.0270854 0.0280748 0.0300087
                5.0    0.0753257 0.0755934 0.0766493
                10.0    0.112079  0.112231  0.1127004
                </tableData>
            <tableData breakPoint="10.0">
                      39.38648293963254      56.26640419947507      73.14632545931758
                -10.0    -0.0519434 -0.0513501 -0.0512267
                -5.0    -0.0056601 -0.0124604 -0.0155376
                0.0    0.0280237 0.0179801 0.0190094
                5.0    0.060337  0.0606913 0.0609216
                10.0    0.0845489 0.0847115 0.0844109
                </tableData>
            <tableData breakPoint="14.0">
                      39.38648293963254      56.26640419947507      73.14632545931758
                -10.0    -0.0647602 -0.0646151 -0.0645169
                -5.0    -0.0184519 -0.0180972 -0.0178265
                0.0    0.0050204 0.0058735 0.0067293
                5.0    0.0278261 0.0281585 0.0284234
                10.0    0.0172696 0.0172979 0.0173134
                </tableData>
        </table>
    </function>
    <function name="aero/coefficient/CMm__dFlapR_rad">
        <description>CMm__dFlapR_rad = dCMm__dFlapR_rad * dFlapR_rad</description>
        <product>
            <property>aero/coefficient/dCMm__dFlapR_rad</property>
            <property>fcs/posFlapR_rad</property>
        </product>
    </function>
    <function name="aero/coefficient/dCMm__dFlapL_rad">
        <description>dCMm__dFlapL_rad</description>
        <table>
            <independentVar lookup="row">aero/beta-deg</independentVar>
            <independentVar lookup="column">velocities/vt-fps</independentVar>
            <independentVar lookup="table">aero/alpha-deg</independentVar>
            <tableData breakPoint="-6.0">
                      39.38648293963254      56.26640419947507      73.14632545931758
                -10.0    0.1995733 0.1995635 0.1996108
                -5.0    0.1448676 0.1447366 0.1449795
                0.0    0.0540468 0.0523923 0.0513185
                5.0    -0.0139503 -0.014226  -0.0141426
                10.0    -0.0754853 -0.0756185 -0.0759262
                </tableData>
            <tableData breakPoint="-2.0">
                      39.38648293963254      56.26640419947507      73.14632545931758
                -10.0    0.1979546 0.1971262 0.196614
                -5.0    0.1476704 0.1465378 0.1456
                0.0    0.0653395 0.062257  0.0607176
                5.0     0.0020201  0.0014298 -0.0006313
                10.0    -0.0552465 -0.055459  -0.0571148
                </tableData>
            <tableData breakPoint="2.0">
                      39.38648293963254      56.26640419947507      73.14632545931758
                -10.0    0.1819549 0.183263  0.1841935
                -5.0    0.1181321 0.1196934 0.1207896
                0.0    0.054859  0.0577254 0.0590697
                5.0    0.0311481 0.0077964 0.0099538
                10.0    -0.0561594 -0.0550484 -0.05325
                </tableData>
            <tableData breakPoint="6.0">
                      39.38648293963254      56.26640419947507      73.14632545931758
                -10.0    0.112079  0.112231  0.1127004
                -5.0    0.0753257 0.0755934 0.0766493
                0.0    0.0270854 0.0280748 0.0300087
                5.0    -0.0256616 -0.025382  -0.024336
                10.0    -0.0661634 -0.0660396 -0.0660854
                </tableData>
            <tableData breakPoint="10.0">
                      39.38648293963254      56.26640419947507      73.14632545931758
                -10.0    0.0845489 0.0847115 0.0847297
                -5.0    0.0667503 0.0606913 0.0609216
                0.0    0.0280237 0.0179801 0.0190094
                5.0    -0.0056601 -0.0158252 -0.0155376
                10.0    -0.0519434 -0.0513501 -0.0512267
                </tableData>
            <tableData breakPoint="14.0">
                      39.38648293963254      56.26640419947507      73.14632545931758
                -10.0    0.0172696 0.0172979 0.0173134
                -5.0    0.0278261 0.0281585 0.0284234
                0.0    0.0050204 0.0058735 0.0067293
                5.0    -0.0184519 -0.0196306 -0.0178265
                10.0    -0.0647602 -0.0646151 -0.0645169
                </tableData>
        </table>
    </function>
    <function name="aero/coefficient/CMm__dFlapL_rad">
        <description>CMm__dFlapL_rad = dCMm__dFlapL_rad * dFlapL_rad</description>
        <product>
            <property>aero/coefficient/dCMm__dFlapL_rad</property>
            <property>fcs/posFlapL_rad</property>
        </product>
    </function>
    <function name="aero/coefficient/dCMm__dElev_rad">
        <description>dCMm__dElev_rad</description>
        <table>
            <independentVar lookup="row">aero/beta-deg</independentVar>
            <independentVar lookup="column">velocities/vt-fps</independentVar>
            <independentVar lookup="table">aero/alpha-deg</independentVar>
            <tableData breakPoint="-6.0">
                      39.38648293963254      56.26640419947507      73.14632545931758
                -10.0    -1.4760165 -1.4767328 -1.4775125
                -5.0    -1.4970811 -1.4977448 -1.4990347
                0.0    -1.5149239 -1.5162314 -1.5233738
                5.0    -1.4970811 -1.4977448 -1.4990347
                10.0    -1.4760165 -1.4767328 -1.4775125
                </tableData>
            <tableData breakPoint="-2.0">
                      39.38648293963254      56.26640419947507      73.14632545931758
                -10.0    -1.5721583 -1.5730833 -1.5743646
                -5.0    -1.5916227 -1.5925434 -1.5940895
                0.0    -1.554477  -1.5563064 -1.5577387
                5.0    -1.5916227 -1.5926714 -1.5940895
                10.0    -1.5721583 -1.5730833 -1.5743646
                </tableData>
            <tableData breakPoint="2.0">
                      39.38648293963254      56.26640419947507      73.14632545931758
                -10.0    -1.5188582 -1.5190207 -1.5192908
                -5.0    -1.5514388 -1.5515076 -1.5516689
                0.0    -1.5477645 -1.5472139 -1.5474705
                5.0    -1.5514388 -1.5515076 -1.5516689
                10.0    -1.5188582 -1.5190207 -1.5192908
                </tableData>
            <tableData breakPoint="6.0">
                      39.38648293963254      56.26640419947507      73.14632545931758
                -10.0    -1.4596907 -1.4601717 -1.4706011
                -5.0    -1.4886669 -1.4891002 -1.4934195
                0.0    -1.5067568 -1.5069371 -1.5114831
                5.0    -1.4886669 -1.4891002 -1.4934195
                10.0    -1.4596907 -1.4601717 -1.4706011
                </tableData>
            <tableData breakPoint="10.0">
                      39.38648293963254      56.26640419947507      73.14632545931758
                -10.0    -1.4606329 -1.4633167 -1.4648279
                -5.0    -1.4947703 -1.4962954 -1.4978791
                0.0    -1.5039907 -1.505623  -1.5074251
                5.0    -1.4947703 -1.4962954 -1.4978791
                10.0    -1.4606329 -1.4633167 -1.4648279
                </tableData>
            <tableData breakPoint="14.0">
                      39.38648293963254      56.26640419947507      73.14632545931758
                -10.0    -1.2953694 -1.2963725 -1.2973041
                -5.0    -1.3853012 -1.3871455 -1.3887086
                0.0    -1.4617291 -1.4638715 -1.4661662
                5.0    -1.3853012 -1.3871455 -1.3887086
                10.0    -1.2953694 -1.2963725 -1.2973041
                </tableData>
        </table>
    </function>
    <function name="aero/coefficient/CMm__dElev_rad">
        <description>CMm__dElev_rad = dCMm__dElev_rad * dElev_rad</description>
        <product>
            <property>aero/coefficient/dCMm__dElev_rad</property>
            <property>fcs/posElev_rad</property>
        </product>
    </function>
    <function name="aero/coefficient/CMm">
        <description>CMm summation</description>
        <sum>
            <property>aero/coefficient/CMm__zero</property>
            <property>aero/coefficient/CMm__alpha_rad</property>
            <property>aero/coefficient/CMm__beta_rad</property>
            <property>aero/coefficient/CMm__dpHat_rps</property>
            <property>aero/coefficient/CMm__dqHat_rps</property>
            <property>aero/coefficient/CMm__drHat_rps</property>
            <property>aero/coefficient/CMm__dAilR_rad</property>
            <property>aero/coefficient/CMm__dAilL_rad</property>
            <property>aero/coefficient/CMm__dRud_rad</property>
            <property>aero/coefficient/CMm__dFlapR_rad</property>
            <property>aero/coefficient/CMm__dFlapL_rad</property>
            <property>aero/coefficient/CMm__dElev_rad</property>
        </sum>
    </function>
    <function name="aero/coefficient/CMn__zero">
        <description>CMn__zero</description>
        <table>
            <independentVar lookup="row">aero/beta-deg</independentVar>
            <independentVar lookup="column">velocities/vt-fps</independentVar>
            <independentVar lookup="table">aero/alpha-deg</independentVar>
            <tableData breakPoint="-6.0">
                      39.38648293963254      56.26640419947507      73.14632545931758
                -10.0    -0.00107846 -0.00137215 -0.0015482
                -5.0    -0.00253738 -0.00319189 -0.00326098
                0.0    0. 0. 0.
                5.0     0.00045198  0.00016049 -0.00041926
                10.0    -0.00033346  0.00012331  0.0004006
                </tableData>
            <tableData breakPoint="-2.0">
                      39.38648293963254      56.26640419947507      73.14632545931758
                -10.0    0.00038511 0.00225179 0.00350089
                -5.0    0.00074309 0.002355   0.00165905
                0.0    0. 0. 0.
                5.0    -0.00108438 -0.0026218  -0.00195836
                10.0    -0.00077769 -0.00262087 -0.00388532
                </tableData>
            <tableData breakPoint="2.0">
                      39.38648293963254      56.26640419947507      73.14632545931758
                -10.0     0.00392527 -0.00233924  0.00047409
                -5.0     0.00023449 -0.00409001 -0.00035416
                0.0    0. 0. 0.
                5.0    -0.00048448  0.00391232  0.0001408
                10.0    -0.00486058  0.0014321  -0.00139705
                </tableData>
            <tableData breakPoint="6.0">
                      39.38648293963254      56.26640419947507      73.14632545931758
                -10.0    0.00472183 0.00475277 0.00480877
                -5.0    -0.00227831 -0.00260693 -0.00332003
                0.0    0. 0. 0.
                5.0    -0.00085053 -0.00149351 -0.0014412
                10.0    -0.00399512 -0.00385951 -0.0031269
                </tableData>
            <tableData breakPoint="10.0">
                      39.38648293963254      56.26640419947507      73.14632545931758
                -10.0    0.00622004 0.00654861 0.00707018
                -5.0    0.00270324 0.00286653 0.00292223
                0.0    0. 0. 0.
                5.0    -0.00578302 -0.0064072  -0.00716983
                10.0    -0.00574075 -0.00556313 -0.00587687
                </tableData>
            <tableData breakPoint="14.0">
                      39.38648293963254      56.26640419947507      73.14632545931758
                -10.0    0.01433645 0.01565662 0.0169014
                -5.0    0.00399894 0.00382341 0.00454817
                0.0    0. 0. 0.
                5.0    -0.00435043 -0.00429955 -0.00511736
                10.0    -0.01273825 -0.01371814 -0.01461038
                </tableData>
        </table>
    </function>
    <function name="aero/coefficient/dCMn__alpha_rad">
        <description>dCMn__alpha_rad</description>
        <table>
            <independentVar lookup="row">aero/beta-deg</independentVar>
            <independentVar lookup="column">velocities/vt-fps</independentVar>
            <independentVar lookup="table">aero/alpha-deg</independentVar>
            <tableData breakPoint="-6.0">
                      39.38648293963254      56.26640419947507      73.14632545931758
                -10.0    -0.0257129 -0.0300042 -0.0326498
                -5.0    -0.0157751 -0.0193959 -0.018972
                0.0    -0.  0.  0.
                5.0    0.0157751 0.0193959 0.018972
                10.0    0.0257129 0.0300042 0.0326498
                </tableData>
            <tableData breakPoint="-2.0">
                      39.38648293963254      56.26640419947507      73.14632545931758
                -10.0    -0.0344344  0.0665509  0.0465328
                -5.0    0.0122628 0.1023643 0.0336035
                0.0    -0.  0.  0.
                5.0    -0.0122628 -0.1023885 -0.0336035
                10.0     0.0344344 -0.0665509 -0.0465328
                </tableData>
            <tableData breakPoint="2.0">
                      39.38648293963254      56.26640419947507      73.14632545931758
                -10.0    -0.0812017  0.0503837  0.0259029
                -5.0    0.0058801 0.0857582 0.0277281
                0.0     0. -0. -0.
                5.0    -0.0058801 -0.0857582 -0.0277281
                10.0     0.0812017 -0.0503837 -0.0259029
                </tableData>
            <tableData breakPoint="6.0">
                      39.38648293963254      56.26640419947507      73.14632545931758
                -10.0    -0.0066036 -0.0053137  0.0016424
                -5.0    0.0084091 0.0089472 0.015207
                0.0     0. -0. -0.
                5.0    -0.0084091 -0.0089472 -0.015207
                10.0     0.0066036  0.0053137 -0.0016424
                </tableData>
            <tableData breakPoint="10.0">
                      39.38648293963254      56.26640419947507      73.14632545931758
                -10.0    -0.0142089 -0.0107805 -0.0096651
                -5.0    -0.0250072 -0.0273199 -0.0278296
                0.0     0. -0. -0.
                5.0    0.0250072 0.0273199 0.0278296
                10.0    0.0142089 0.0107805 0.0096651
                </tableData>
            <tableData breakPoint="14.0">
                      39.38648293963254      56.26640419947507      73.14632545931758
                -10.0    -0.0354823 -0.036368  -0.0374555
                -5.0    -0.0119214 -0.0083739 -0.0066844
                0.0     0. -0. -0.
                5.0    0.0119214 0.0083739 0.0066844
                10.0    0.0354823 0.036368  0.0374555
                </tableData>
        </table>
    </function>
    <function name="aero/coefficient/CMn__alpha_rad">
        <description>CMn__alpha_rad = dCMn__alpha_rad * alpha_rad</description>
        <product>
            <property>aero/coefficient/dCMn__alpha_rad</property>
            <property>aero/alpha-rad</property>
        </product>
    </function>
    <function name="aero/coefficient/dCMn__beta_rad">
        <description>dCMn__beta_rad</description>
        <table>
            <independentVar lookup="row">aero/beta-deg</independentVar>
            <independentVar lookup="column">velocities/vt-fps</independentVar>
            <independentVar lookup="table">aero/alpha-deg</independentVar>
            <tableData breakPoint="-6.0">
                      39.38648293963254      56.26640419947507      73.14632545931758
                -10.0    0.0904774 0.0905026 0.090082
                -5.0    0.0611745 0.0545976 0.0503649
                0.0    0.0507587 0.0355115 0.0126548
                5.0    0.0850714 0.0893349 0.0925373
                10.0    0.0985671 0.0976579 0.0966573
                </tableData>
            <tableData breakPoint="-2.0">
                      39.38648293963254      56.26640419947507      73.14632545931758
                -10.0    0.0931767 0.093995  0.1026608
                -5.0    0.0833417 0.085498  0.0920693
                0.0    0.0766731 0.0906728 0.0947597
                5.0    0.0872526 0.0885502 0.0954992
                10.0    0.095426  0.0961097 0.1048634
                </tableData>
            <tableData breakPoint="2.0">
                      39.38648293963254      56.26640419947507      73.14632545931758
                -10.0    0.092657  0.093274  0.1019462
                -5.0    0.0866936 0.0887147 0.095242
                0.0    0.0783954 0.0921784 0.0961609
                5.0    0.0895583 0.0907508 0.0976869
                10.0    0.0980159 0.0984715 0.1072344
                </tableData>
            <tableData breakPoint="6.0">
                      39.38648293963254      56.26640419947507      73.14632545931758
                -10.0    0.1137728 0.1138417 0.1172831
                -5.0    0.0633174 0.0567334 0.0523081
                0.0    0.0559122 0.0404959 0.0170668
                5.0    0.0991713 0.1037209 0.1068678
                10.0    0.1096091 0.1087237 0.1076467
                </tableData>
            <tableData breakPoint="10.0">
                      39.38648293963254      56.26640419947507      73.14632545931758
                -10.0    0.1148913 0.1181792 0.1205727
                -5.0    0.06546   0.057917  0.0515885
                0.0    0.0809025 0.0506891 0.0073828
                5.0    0.1007516 0.0984901 0.1002624
                10.0    0.1121452 0.1125328 0.1137355
                </tableData>
            <tableData breakPoint="14.0">
                      39.38648293963254      56.26640419947507      73.14632545931758
                -10.0    0.1336492 0.1380848 0.1423966
                -5.0    0.0990139 0.0998067 0.1050479
                0.0     0.0401853 -0.0247922 -0.1011552
                5.0    0.1030417 0.1052629 0.1115704
                10.0    0.1244922 0.1269781 0.12927
                </tableData>
        </table>
    </function>
    <function name="aero/coefficient/CMn__beta_rad">
        <description>CMn__beta_rad = dCMn__beta_rad * beta_rad</description>
        <product>
            <property>aero/coefficient/dCMn__beta_rad</property>
            <property>aero/beta-rad</property>
        </product>
    </function>
    <function name="aero/coefficient/dCMn__dpHat_rps">
        <description>dCMn__dpHat_rps</description>
        <table>
            <independentVar lookup="row">aero/beta-deg</independentVar>
            <independentVar lookup="column">velocities/vt-fps</independentVar>
            <independentVar lookup="table">aero/alpha-deg</independentVar>
            <tableData breakPoint="-6.0">
                      39.38648293963254      56.26640419947507      73.14632545931758
                -10.0    -0.0769365 -0.0859434 -0.0867049
                -5.0    -0.1311774 -0.1539483 -0.1719089
                0.0    -0.2684076 -0.3975542 -0.5276245
                5.0    -0.1291246 -0.1514637 -0.1711212
                10.0    -0.0734743 -0.0807354 -0.0803592
                </tableData>
            <tableData breakPoint="-2.0">
                      39.38648293963254      56.26640419947507      73.14632545931758
                -10.0    -0.2401186 -0.2612884 -0.309301
                -5.0    -0.2925915 -0.3228397 -0.4374257
                0.0    -0.3270672 -0.48101   -0.6506802
                5.0    -0.279119  -0.4185882 -0.4780346
                10.0    -0.1725754 -0.311686  -0.3567077
                </tableData>
            <tableData breakPoint="2.0">
                      39.38648293963254      56.26640419947507      73.14632545931758
                -10.0    0.17949   0.3260793 0.3709094
                -5.0    0.2859766 0.4275358 0.4868037
                0.0    0.3330442 0.4868982 0.6568558
                5.0    0.2961914 0.3273412 0.4402597
                10.0    0.242949  0.2646253 0.3143102
                </tableData>
            <tableData breakPoint="6.0">
                      39.38648293963254      56.26640419947507      73.14632545931758
                -10.0    0.0797267 0.0878959 0.0904418
                -5.0    0.1368425 0.1592032 0.1777408
                0.0    0.2768823 0.4065137 0.5357757
                5.0    0.1381729 0.160983  0.1808578
                10.0    0.0818622 0.0909021 0.0916872
                </tableData>
            <tableData breakPoint="10.0">
                      39.38648293963254      56.26640419947507      73.14632545931758
                -10.0    0.0230838 0.0178256 0.0082098
                -5.0    0.0716684 0.0843124 0.0891844
                0.0    0.2610067 0.3918293 0.5221146
                5.0    0.0715985 0.0843069 0.0895792
                10.0    0.0241355 0.0195191 0.0102814
                </tableData>
            <tableData breakPoint="14.0">
                      39.38648293963254      56.26640419947507      73.14632545931758
                -10.0    -0.026594  -0.0362667 -0.0447104
                -5.0    0.0223668 0.0264341 0.0216243
                0.0    0.2414702 0.3753367 0.5066669
                5.0    0.0228758 0.0272318 0.022959
                10.0    -0.0254218 -0.03493   -0.0434463
                </tableData>
        </table>
    </function>
    <function name="aero/coefficient/CMn__dpHat_rps">
        <description>CMn__dpHat_rps = dCMn__dpHat_rps * dpHat_rps</description>
        <product>
            <property>aero/coefficient/dCMn__dpHat_rps</property>
            <property>velocities/p-aero-rad_sec</property>
            <property>aero/bi2vel</property>
        </product>
    </function>
    <function name="aero/coefficient/dCMn__dqHat_rps">
        <description>dCMn__dqHat_rps</description>
        <table>
            <independentVar lookup="row">aero/beta-deg</independentVar>
            <independentVar lookup="column">velocities/vt-fps</independentVar>
            <independentVar lookup="table">aero/alpha-deg</independentVar>
            <tableData breakPoint="-6.0">
                      39.38648293963254      56.26640419947507      73.14632545931758
                -10.0    -0.0457392 -0.0505534 -0.043879
                -5.0    -0.0328814 -0.0407037 -0.0381831
                0.0    -0.  0.  0.
                5.0    0.0328814 0.0407037 0.0381831
                10.0    0.0457392 0.0505534 0.043879
                </tableData>
            <tableData breakPoint="-2.0">
                      39.38648293963254      56.26640419947507      73.14632545931758
                -10.0    -0.0151811  0.0272137 -0.2214826
                -5.0    -0.0052603  0.2416211 -0.0533952
                0.0    -0. -0.  0.
                5.0     0.0052603 -0.2416839  0.0533952
                10.0     0.0151811 -0.0272137  0.2214826
                </tableData>
            <tableData breakPoint="2.0">
                      39.38648293963254      56.26640419947507      73.14632545931758
                -10.0     0.0144331 -0.027615   0.044838
                -5.0    0.0210289 0.2217639 0.0672034
                0.0     0. -0. -0.
                5.0    -0.0210289 -0.2217639 -0.0672034
                10.0    -0.0144331  0.027615  -0.044838
                </tableData>
            <tableData breakPoint="6.0">
                      39.38648293963254      56.26640419947507      73.14632545931758
                -10.0    -0.0186093 -0.0127999  0.0008022
                -5.0    0.0051206 0.0138008 0.0213229
                0.0     0. -0. -0.
                5.0    -0.0051206 -0.0138008 -0.0213229
                10.0     0.0186093  0.0127999 -0.0008022
                </tableData>
            <tableData breakPoint="10.0">
                      39.38648293963254      56.26640419947507      73.14632545931758
                -10.0    -0.123744  -0.124906  -0.1244138
                -5.0    -0.0164022 -0.0106556 -0.0053949
                0.0     0. -0. -0.
                5.0    0.0164022 0.0106556 0.0053949
                10.0    0.123744  0.1245761 0.1244138
                </tableData>
            <tableData breakPoint="14.0">
                      39.38648293963254      56.26640419947507      73.14632545931758
                -10.0    -0.2521559 -0.2517218 -0.2514967
                -5.0    -0.1930219 -0.0479835 -0.1862311
                0.0     0.        -0.        -0.0015339
                5.0    0.1930219 0.1893041 0.1862311
                10.0    0.2521559 0.2517218 0.2514967
                </tableData>
        </table>
    </function>
    <function name="aero/coefficient/CMn__dqHat_rps">
        <description>CMn__dqHat_rps = dCMn__dqHat_rps * dqHat_rps</description>
        <product>
            <property>aero/coefficient/dCMn__dqHat_rps</property>
            <property>velocities/q-aero-rad_sec</property>
            <property>aero/ci2vel</property>
        </product>
    </function>
    <function name="aero/coefficient/dCMn__drHat_rps">
        <description>dCMn__drHat_rps</description>
        <table>
            <independentVar lookup="row">aero/beta-deg</independentVar>
            <independentVar lookup="column">velocities/vt-fps</independentVar>
            <independentVar lookup="table">aero/alpha-deg</independentVar>
            <tableData breakPoint="-6.0">
                      39.38648293963254      56.26640419947507      73.14632545931758
                -10.0    -0.0953692 -0.0955279 -0.0956009
                -5.0    -0.0933248 -0.093722  -0.0941633
                0.0    -0.083654  -0.0866283 -0.091041
                5.0    -0.0878573 -0.0882534 -0.0887024
                10.0    -0.10117   -0.1015822 -0.1016515
                </tableData>
            <tableData breakPoint="-2.0">
                      39.38648293963254      56.26640419947507      73.14632545931758
                -10.0    -0.1034695 -0.1044704 -0.1068922
                -5.0    -0.0981578 -0.097882  -0.1027129
                0.0    -0.0844753 -0.0894558 -0.0920348
                5.0    -0.0923125 -0.094211  -0.0968212
                10.0    -0.1064001 -0.1073872 -0.1097747
                </tableData>
            <tableData breakPoint="2.0">
                      39.38648293963254      56.26640419947507      73.14632545931758
                -10.0    -0.1073084 -0.1080993 -0.1105255
                -5.0    -0.1006614 -0.1025173 -0.1050202
                0.0    -0.0860029 -0.0907758 -0.0932539
                5.0    -0.0943372 -0.0961119 -0.0986517
                10.0    -0.1093003 -0.1101015 -0.1123951
                </tableData>
            <tableData breakPoint="6.0">
                      39.38648293963254      56.26640419947507      73.14632545931758
                -10.0    -0.1168156 -0.116963  -0.1155751
                -5.0    -0.1053419 -0.1057212 -0.1059254
                0.0    -0.0910077 -0.0938846 -0.0965145
                5.0    -0.0977082 -0.0980857 -0.0982841
                10.0    -0.1136718 -0.1138243 -0.1154953
                </tableData>
            <tableData breakPoint="10.0">
                      39.38648293963254      56.26640419947507      73.14632545931758
                -10.0    -0.1238999 -0.1235772 -0.1233039
                -5.0    -0.1057197 -0.1058463 -0.1057662
                0.0    -0.094297  -0.0969729 -0.0993821
                5.0    -0.0975192 -0.0976388 -0.0975465
                10.0    -0.1154688 -0.1164226 -0.1165106
                </tableData>
            <tableData breakPoint="14.0">
                      39.38648293963254      56.26640419947507      73.14632545931758
                -10.0    -0.1406268 -0.1403612 -0.1401632
                -5.0    -0.1205211 -0.1204267 -0.1201354
                0.0    -0.0965017 -0.0989382 -0.1010106
                5.0    -0.1021566 -0.1020607 -0.1017754
                10.0    -0.1338103 -0.1340219 -0.134163
                </tableData>
        </table>
    </function>
    <function name="aero/coefficient/CMn__drHat_rps">
        <description>CMn__drHat_rps = dCMn__drHat_rps * drHat_rps</description>
        <product>
            <property>aero/coefficient/dCMn__drHat_rps</property>
            <property>velocities/r-aero-rad_sec</property>
            <property>aero/bi2vel</property>
        </product>
    </function>
    <function name="aero/coefficient/dCMn__dAilR_rad">
        <description>dCMn__dAilR_rad</description>
        <table>
            <independentVar lookup="row">aero/beta-deg</independentVar>
            <independentVar lookup="column">velocities/vt-fps</independentVar>
            <independentVar lookup="table">aero/alpha-deg</independentVar>
            <tableData breakPoint="-6.0">
                      39.38648293963254      56.26640419947507      73.14632545931758
                -10.0    -0.0031374 -0.0037151 -0.0038019
                -5.0    -0.0058991 -0.0072981 -0.0083205
                0.0    -0.0074393 -0.0111369 -0.0145187
                5.0    -4.708e-04 -2.940e-05  6.073e-04
                10.0    -0.0006192 -0.0002757  0.0003461
                </tableData>
            <tableData breakPoint="-2.0">
                      39.38648293963254      56.26640419947507      73.14632545931758
                -10.0    -0.0040241 -0.0030772 -0.0125266
                -5.0    -0.0027609 -0.0027315 -0.0143659
                0.0    -0.0038422 -0.1013798 -0.020169
                5.0    -0.0029128 -0.00696   -0.0054033
                10.0     0.001393  -0.0027709 -0.0012438
                </tableData>
            <tableData breakPoint="2.0">
                      39.38648293963254      56.26640419947507      73.14632545931758
                -10.0    0.0019054 0.0009128 0.0102225
                -5.0    0.0025321 0.0024402 0.0139545
                0.0    0.0041628 0.0161587 0.0204753
                5.0    0.0027176 0.0065161 0.00493
                10.0    5.9700e-05 4.0732e-03 2.5898e-03
                </tableData>
            <tableData breakPoint="6.0">
                      39.38648293963254      56.26640419947507      73.14632545931758
                -10.0    0.0027934 0.0033431 0.0072049
                -5.0    0.0057122 0.0070895 0.0080931
                0.0    0.0073267 0.0109397 0.0141124
                5.0     0.0006745  0.0001428 -0.0006355
                10.0     0.0007636  0.0004275 -0.0002274
                </tableData>
            <tableData breakPoint="10.0">
                      39.38648293963254      56.26640419947507      73.14632545931758
                -10.0    -0.0009204 -0.0010697 -0.0014304
                -5.0    0.0011168 0.0018372 0.0021385
                0.0    0.0043627 0.007582  0.0103555
                5.0    -4.800e-06 -1.780e-04 -7.162e-04
                10.0    -0.0014914 -0.0019862 -0.002273
                </tableData>
            <tableData breakPoint="14.0">
                      39.38648293963254      56.26640419947507      73.14632545931758
                -10.0    -0.0038243 -0.0041882 -0.004502
                -5.0    -0.0028627 -0.0027756 -0.0029295
                0.0    -0.0002027  0.0037434  0.0058857
                5.0    -0.004141  -0.0046441 -0.005267
                10.0    -0.0038845 -0.0042675 -0.0045188
                </tableData>
        </table>
    </function>
    <function name="aero/coefficient/CMn__dAilR_rad">
        <description>CMn__dAilR_rad = dCMn__dAilR_rad * dAilR_rad</description>
        <product>
            <property>aero/coefficient/dCMn__dAilR_rad</property>
            <property>fcs/posAilR_rad</property>
        </product>
    </function>
    <function name="aero/coefficient/dCMn__dAilL_rad">
        <description>dCMn__dAilL_rad</description>
        <table>
            <independentVar lookup="row">aero/beta-deg</independentVar>
            <independentVar lookup="column">velocities/vt-fps</independentVar>
            <independentVar lookup="table">aero/alpha-deg</independentVar>
            <tableData breakPoint="-6.0">
                      39.38648293963254      56.26640419947507      73.14632545931758
                -10.0     0.0006192  0.0002757 -0.0003461
                -5.0     5.475e-04  2.940e-05 -6.073e-04
                0.0    0.0074393 0.0111369 0.0145187
                5.0    0.0058991 0.0072981 0.0083205
                10.0    0.0031374 0.0037151 0.0038019
                </tableData>
            <tableData breakPoint="-2.0">
                      39.38648293963254      56.26640419947507      73.14632545931758
                -10.0    -0.001393   0.0027709  0.0012438
                -5.0    0.0029128 0.0069358 0.0054012
                0.0    0.0038422 0.1013798 0.020169
                5.0    0.0027609 0.0027073 0.0143659
                10.0    0.0040241 0.0030772 0.0125266
                </tableData>
            <tableData breakPoint="2.0">
                      39.38648293963254      56.26640419947507      73.14632545931758
                -10.0    -5.9700e-05 -4.0732e-03 -2.5898e-03
                -5.0    -0.0027731 -0.0065161 -0.00493
                0.0    -0.0041628 -0.0161587 -0.0204753
                5.0    -0.0025321 -0.0024402 -0.0139545
                10.0    -0.0019054 -0.0009128 -0.0102225
                </tableData>
            <tableData breakPoint="6.0">
                      39.38648293963254      56.26640419947507      73.14632545931758
                -10.0    -0.0007636 -0.0004275  0.0002274
                -5.0    -0.0006745 -0.0001428  0.0006355
                0.0    -0.0073267 -0.0109397 -0.0141124
                5.0    -0.0057122 -0.0070895 -0.0080931
                10.0    -0.0027934 -0.0033431 -0.0072049
                </tableData>
            <tableData breakPoint="10.0">
                      39.38648293963254      56.26640419947507      73.14632545931758
                -10.0    0.0014914 0.0019126 0.002273
                -5.0    4.800e-06 1.780e-04 7.162e-04
                0.0    -0.0043627 -0.007582  -0.0103555
                5.0    -0.0011168 -0.0018372 -0.0021385
                10.0    0.0009204 0.0010697 0.0014304
                </tableData>
            <tableData breakPoint="14.0">
                      39.38648293963254      56.26640419947507      73.14632545931758
                -10.0    0.0038845 0.0042675 0.0045188
                -5.0    0.004141  0.0046441 0.005267
                0.0    -0.0010605 -0.0037434 -0.0058857
                5.0    0.0028627 0.0027756 0.0029295
                10.0    0.0038243 0.0041882 0.004502
                </tableData>
        </table>
    </function>
    <function name="aero/coefficient/CMn__dAilL_rad">
        <description>CMn__dAilL_rad = dCMn__dAilL_rad * dAilL_rad</description>
        <product>
            <property>aero/coefficient/dCMn__dAilL_rad</property>
            <property>fcs/posAilL_rad</property>
        </product>
    </function>
    <function name="aero/coefficient/dCMn__dRud_rad">
        <description>dCMn__dRud_rad</description>
        <table>
            <independentVar lookup="row">aero/beta-deg</independentVar>
            <independentVar lookup="column">velocities/vt-fps</independentVar>
            <independentVar lookup="table">aero/alpha-deg</independentVar>
            <tableData breakPoint="-6.0">
                      39.38648293963254      56.26640419947507      73.14632545931758
                -10.0    -0.0406188 -0.0406659 -0.0407177
                -5.0    -0.0437392 -0.0437564 -0.0438239
                0.0    -0.0442013 -0.0442538 -0.0444178
                5.0    -0.0439434 -0.0439608 -0.0440284
                10.0    -0.0441754 -0.0441733 -0.0442053
                </tableData>
            <tableData breakPoint="-2.0">
                      39.38648293963254      56.26640419947507      73.14632545931758
                -10.0    -0.0427418 -0.0427929 -0.0427882
                -5.0    -0.0425814 -0.0426293 -0.0426226
                0.0    -0.0425345 -0.042555  -0.0425758
                5.0    -0.042823  -0.0428459 -0.0428635
                10.0    -0.0431002 -0.0431507 -0.0431455
                </tableData>
            <tableData breakPoint="2.0">
                      39.38648293963254      56.26640419947507      73.14632545931758
                -10.0    -0.0403425 -0.0403029 -0.040324
                -5.0    -0.039978  -0.0399532 -0.0399677
                0.0    -0.0397703 -0.0397435 -0.0397399
                5.0    -0.040191  -0.0401683 -0.0401804
                10.0    -0.0405946 -0.0405556 -0.0405784
                </tableData>
            <tableData breakPoint="6.0">
                      39.38648293963254      56.26640419947507      73.14632545931758
                -10.0    -0.0380616 -0.0380685 -0.038038
                -5.0    -0.0376112 -0.0376199 -0.0375498
                0.0    -0.0365907 -0.0366088 -0.0365473
                5.0    -0.0377478 -0.0377571 -0.0376866
                10.0    -0.0382992 -0.0383064 -0.0383066
                </tableData>
            <tableData breakPoint="10.0">
                      39.38648293963254      56.26640419947507      73.14632545931758
                -10.0    -0.0332811 -0.0345526 -0.0345498
                -5.0    -0.0335527 -0.0335479 -0.0335451
                0.0    -0.0331762 -0.033205  -0.0332426
                5.0    -0.0336769 -0.0336762 -0.0336737
                10.0    -0.0348433 -0.0348296 -0.0348333
                </tableData>
            <tableData breakPoint="14.0">
                      39.38648293963254      56.26640419947507      73.14632545931758
                -10.0    -0.032296  -0.0322911 -0.0322883
                -5.0    -0.0302663 -0.0302628 -0.0302564
                0.0    -0.0288741 -0.0289226 -0.0289783
                5.0    -0.0303303 -0.0303262 -0.0303215
                10.0    -0.032507  -0.0325026 -0.0325015
                </tableData>
        </table>
    </function>
    <function name="aero/coefficient/CMn__dRud_rad">
        <description>CMn__dRud_rad = dCMn__dRud_rad * dRud_rad</description>
        <product>
            <property>aero/coefficient/dCMn__dRud_rad</property>
            <property>fcs/posRud_rad</property>
        </product>
    </function>
    <function name="aero/coefficient/dCMn__dFlapR_rad">
        <description>dCMn__dFlapR_rad</description>
        <table>
            <independentVar lookup="row">aero/beta-deg</independentVar>
            <independentVar lookup="column">velocities/vt-fps</independentVar>
            <independentVar lookup="table">aero/alpha-deg</independentVar>
            <tableData breakPoint="-6.0">
                      39.38648293963254      56.26640419947507      73.14632545931758
                -10.0    -0.0019606 -0.0022732 -0.002223
                -5.0    -0.0035174 -0.0039494 -0.0042706
                0.0    -0.0047846 -0.0063897 -0.0072932
                5.0    -0.0056001 -0.0057389 -0.0053216
                10.0    -0.0068255 -0.0068037 -0.0063471
                </tableData>
            <tableData breakPoint="-2.0">
                      39.38648293963254      56.26640419947507      73.14632545931758
                -10.0     0.0001702  0.0013331 -0.0026874
                -5.0     6.0000e-07  7.0960e-04 -3.9965e-03
                0.0     0.000652  -0.0029714 -0.0047074
                5.0    -0.0015583 -0.0047403 -0.0037407
                10.0    -0.0007002 -0.0034546 -0.0023841
                </tableData>
            <tableData breakPoint="2.0">
                      39.38648293963254      56.26640419947507      73.14632545931758
                -10.0    0.0013085 0.0001348 0.0041224
                -5.0    0.0038225 0.0030759 0.007765
                0.0    0.0065792 0.0102051 0.011943
                5.0    0.0079778 0.0111519 0.010137
                10.0    0.0004429 0.003207  0.0021244
                </tableData>
            <tableData breakPoint="6.0">
                      39.38648293963254      56.26640419947507      73.14632545931758
                -10.0    0.0045401 0.0047641 0.0048092
                -5.0    0.0082673 0.0087015 0.008676
                0.0    0.0126044 0.0142293 0.0154236
                5.0    0.0135733 0.0137248 0.0134852
                10.0    0.0087877 0.0087936 0.0084578
                </tableData>
            <tableData breakPoint="10.0">
                      39.38648293963254      56.26640419947507      73.14632545931758
                -10.0    0.0050395 0.0048452 0.0046805
                -5.0    0.0056067 0.0082154 0.0087476
                0.0    0.0106785 0.0151192 0.016612
                5.0    0.0191306 0.0191462 0.0190585
                10.0    0.0143198 0.0142113 0.0140455
                </tableData>
            <tableData breakPoint="14.0">
                      39.38648293963254      56.26640419947507      73.14632545931758
                -10.0    0.0106702 0.0105155 0.0103901
                -5.0    0.012859  0.012935  0.0128928
                0.0    0.0161514 0.0176663 0.0191218
                5.0    0.0213834 0.0213271 0.0211901
                10.0    0.0182158 0.0181275 0.0180839
                </tableData>
        </table>
    </function>
    <function name="aero/coefficient/CMn__dFlapR_rad">
        <description>CMn__dFlapR_rad = dCMn__dFlapR_rad * dFlapR_rad</description>
        <product>
            <property>aero/coefficient/dCMn__dFlapR_rad</property>
            <property>fcs/posFlapR_rad</property>
        </product>
    </function>
    <function name="aero/coefficient/dCMn__dFlapL_rad">
        <description>dCMn__dFlapL_rad</description>
        <table>
            <independentVar lookup="row">aero/beta-deg</independentVar>
            <independentVar lookup="column">velocities/vt-fps</independentVar>
            <independentVar lookup="table">aero/alpha-deg</independentVar>
            <tableData breakPoint="-6.0">
                      39.38648293963254      56.26640419947507      73.14632545931758
                -10.0    0.0068255 0.0068037 0.0063471
                -5.0    0.0056001 0.0057389 0.0053216
                0.0    0.0047846 0.0063897 0.0072932
                5.0    0.0035174 0.0039494 0.0042863
                10.0    0.0019606 0.0021845 0.0021543
                </tableData>
            <tableData breakPoint="-2.0">
                      39.38648293963254      56.26640419947507      73.14632545931758
                -10.0    0.0007002 0.0034546 0.0023841
                -5.0    0.0015583 0.0047161 0.0037407
                0.0    -0.000652   0.0029714  0.0047074
                5.0    -6.0000e-07 -7.3380e-04  3.9965e-03
                10.0    -0.0001702 -0.0013331  0.0026874
                </tableData>
            <tableData breakPoint="2.0">
                      39.38648293963254      56.26640419947507      73.14632545931758
                -10.0    -0.0004429 -0.003207  -0.0021244
                -5.0    -0.0079778 -0.0111519 -0.010137
                0.0    -0.0065792 -0.0102051 -0.011943
                5.0    -5.1900e-05 -3.0759e-03 -7.7650e-03
                10.0    -0.0015272 -0.0001342 -0.0041224
                </tableData>
            <tableData breakPoint="6.0">
                      39.38648293963254      56.26640419947507      73.14632545931758
                -10.0    -0.0087877 -0.0087936 -0.0084578
                -5.0    -0.0135733 -0.0137248 -0.0134852
                0.0    -0.0126044 -0.0142293 -0.0154236
                5.0    -0.0082673 -0.0087015 -0.008676
                10.0    -0.0045401 -0.0047641 -0.0048092
                </tableData>
            <tableData breakPoint="10.0">
                      39.38648293963254      56.26640419947507      73.14632545931758
                -10.0    -0.0143198 -0.0142113 -0.0140845
                -5.0    -0.0192299 -0.0191462 -0.0190585
                0.0    -0.0106785 -0.0151192 -0.016612
                5.0    -0.0056067 -0.0086597 -0.0087476
                10.0    -0.0050395 -0.0048452 -0.0046805
                </tableData>
            <tableData breakPoint="14.0">
                      39.38648293963254      56.26640419947507      73.14632545931758
                -10.0    -0.0182158 -0.0181275 -0.0180839
                -5.0    -0.0213834 -0.0213271 -0.0211901
                0.0    -0.0161514 -0.0176663 -0.0191218
                5.0    -0.012859  -0.0131557 -0.0128928
                10.0    -0.0106702 -0.0105155 -0.0103901
                </tableData>
        </table>
    </function>
    <function name="aero/coefficient/CMn__dFlapL_rad">
        <description>CMn__dFlapL_rad = dCMn__dFlapL_rad * dFlapL_rad</description>
        <product>
            <property>aero/coefficient/dCMn__dFlapL_rad</property>
            <property>fcs/posFlapL_rad</property>
        </product>
    </function>
    <function name="aero/coefficient/dCMn__dElev_rad">
        <description>dCMn__dElev_rad</description>
        <table>
            <independentVar lookup="row">aero/beta-deg</independentVar>
            <independentVar lookup="column">velocities/vt-fps</independentVar>
            <independentVar lookup="table">aero/alpha-deg</independentVar>
            <tableData breakPoint="-6.0">
                      39.38648293963254      56.26640419947507      73.14632545931758
                -10.0    0.0030709 0.0030494 0.0036885
                -5.0    0.0028605 0.0028517 0.0036031
                0.0    -0.  0. -0.
                5.0    -0.0028605 -0.0028517 -0.0036031
                10.0    -0.0030709 -0.0030494 -0.0036885
                </tableData>
            <tableData breakPoint="-2.0">
                      39.38648293963254      56.26640419947507      73.14632545931758
                -10.0    -0.0036005 -0.0026146 -0.0034976
                -5.0    -0.0030948 -0.0021863 -0.0031959
                0.0    -0.  0. -0.
                5.0    0.0030948 0.0021621 0.0031959
                10.0    0.0036005 0.0026146 0.0034976
                </tableData>
            <tableData breakPoint="2.0">
                      39.38648293963254      56.26640419947507      73.14632545931758
                -10.0    0.0015641 0.0005895 0.0014667
                -5.0    0.0019267 0.0009974 0.0020205
                0.0    -0.  0.  0.
                5.0    -0.0019267 -0.0009974 -0.0020205
                10.0    -0.0015641 -0.0005895 -0.0014667
                </tableData>
            <tableData breakPoint="6.0">
                      39.38648293963254      56.26640419947507      73.14632545931758
                -10.0    0.0001575 0.0001881 0.0024081
                -5.0    -0.0003171 -0.0002909 -0.0002425
                0.0    -0.  0.  0.
                5.0    0.0003171 0.0002909 0.0002425
                10.0    -0.0001575 -0.0001881 -0.0024081
                </tableData>
            <tableData breakPoint="10.0">
                      39.38648293963254      56.26640419947507      73.14632545931758
                -10.0    -0.0007845 -0.0004494 -0.0004141
                -5.0    -0.0004889 -0.0004241 -0.0003418
                0.0     0.  0. -0.
                5.0    0.0004889 0.0004241 0.0003418
                10.0    0.0007845 0.0004494 0.0004141
                </tableData>
            <tableData breakPoint="14.0">
                      39.38648293963254      56.26640419947507      73.14632545931758
                -10.0    -0.0133916 -0.0133421 -0.0132821
                -5.0    -0.0059186 -0.005852  -0.0057793
                0.0    -0.  0. -0.
                5.0    0.0059186 0.005852  0.0057793
                10.0    0.0133916 0.0133421 0.0132821
                </tableData>
        </table>
    </function>
    <function name="aero/coefficient/CMn__dElev_rad">
        <description>CMn__dElev_rad = dCMn__dElev_rad * dElev_rad</description>
        <product>
            <property>aero/coefficient/dCMn__dElev_rad</property>
            <property>fcs/posElev_rad</property>
        </product>
    </function>
    <function name="aero/coefficient/CMn">
        <description>CMn summation</description>
        <sum>
            <property>aero/coefficient/CMn__zero</property>
            <property>aero/coefficient/CMn__alpha_rad</property>
            <property>aero/coefficient/CMn__beta_rad</property>
            <property>aero/coefficient/CMn__dpHat_rps</property>
            <property>aero/coefficient/CMn__dqHat_rps</property>
            <property>aero/coefficient/CMn__drHat_rps</property>
            <property>aero/coefficient/CMn__dAilR_rad</property>
            <property>aero/coefficient/CMn__dAilL_rad</property>
            <property>aero/coefficient/CMn__dRud_rad</property>
            <property>aero/coefficient/CMn__dFlapR_rad</property>
            <property>aero/coefficient/CMn__dFlapL_rad</property>
            <property>aero/coefficient/CMn__dElev_rad</property>
        </sum>
    </function>
    <axis name="LIFT">
        <function name="aero/force/LIFT__CL">
            <description>LIFT from CL</description>
            <product>
                <property>aero/qbar-area</property>
                <property>aero/coefficient/CL</property>
            </product>
        </function>
    </axis>
    <axis name="DRAG">
        <function name="aero/force/DRAG__CD">
            <description>DRAG from CD</description>
            <product>
                <property>aero/qbar-area</property>
                <property>aero/coefficient/CD</property>
            </product>
        </function>
    </axis>
    <axis name="SIDE">
        <function name="aero/force/SIDE__CY">
            <description>SIDE from CY</description>
            <product>
                <property>aero/qbar-area</property>
                <property>aero/coefficient/CY</property>
            </product>
        </function>
    </axis>
    <axis name="ROLL">
        <function name="aero/moment/ROLL__CMl">
            <description>ROLL from CMl</description>
            <product>
                <property>aero/qbar-area</property>
                <property>metrics/bw-ft</property>
                <property>aero/coefficient/CMl</property>
            </product>
        </function>
    </axis>
    <axis name="PITCH">
        <function name="aero/moment/PITCH__CMm">
            <description>PITCH from CMm</description>
            <product>
                <property>aero/qbar-area</property>
                <property>metrics/cbarw-ft</property>
                <property>aero/coefficient/CMm</property>
            </product>
        </function>
    </axis>
    <axis name="YAW">
        <function name="aero/moment/YAW__CMn">
            <description>YAW from CMn</description>
            <product>
                <property>aero/qbar-area</property>
                <property>metrics/bw-ft</property>
                <property>aero/coefficient/CMn</property>
            </product>
        </function>
    </axis>
</aerodynamics>
