<?xml version="1.0" ?>

<fdm_config release="Alpha" version="2.0">

    <flight_control file="Systems\FlightControl.xml"/>

    <system file="Systems\Effectors.xml"/>


    <mass_balance file="MassOpenFlight.xml"/>

    <ground_reactions file="Gear.xml"/>

    <propulsion file="PropulsionDirect.xml"/>

    <metrics file="MetricsOpenFlight.xml"/>

    <aerodynamics file="AeroOpenFlight.xml"/>


    <system file="Systems\SensorImu.xml"/>

    <system file="Systems\SensorGps.xml"/>

    <system file="Systems\SensorPitot.xml"/>

</fdm_config>
