<?xml version="1.0" ?>

<aerodynamics>

    <function name="aero/coefficient/CL__zero">

        <description>CL__zero</description>

        <table>

            <independentVar lookup="row">velocities/vt-fps</independentVar>

            <independentVar lookup="column">aero/alpha-deg</independentVar>

            <tableData>
                      -6.0      -2.0      2.0      10.0
                56.26640419947507    -0.00094778 -0.00269431 -0.00347043  0.50234863
                95.6528871391076    -4.22198714e-04 -2.67962487e-03 -3.55022033e-03  5.05657806e-01
                135.03937007874012     0.00086691 -0.00265539 -0.00370505  0.50814112
                </tableData>

        </table>

    </function>

    <function name="aero/coefficient/dCL__alpha_rad">

        <description>dCL__alpha_rad</description>

        <table>

            <independentVar lookup="row">velocities/vt-fps</independentVar>

            <independentVar lookup="column">aero/alpha-deg</independentVar>

            <tableData>
                      -6.0      -2.0      2.0      10.0
                56.26640419947507    4.49689   4.4650971 4.4907007 1.1858729
                95.6528871391076    4.5163045 4.47653   4.5018503 1.1716872
                135.03937007874012    4.5522863 4.4943643 4.5202431 1.1638754
                </tableData>

        </table>

    </function>

    <function name="aero/coefficient/CL__alpha_rad">

        <description>CL__alpha_rad = dCL__alpha_rad * alpha_rad</description>

        <product>

            <property>aero/coefficient/dCL__alpha_rad</property>

            <property>aero/alpha-rad</property>

        </product>

    </function>

    <function name="aero/coefficient/dCL__beta_rad">

        <description>dCL__beta_rad</description>

        <table>

            <independentVar lookup="row">velocities/vt-fps</independentVar>

            <independentVar lookup="column">aero/alpha-deg</independentVar>

            <tableData>
                      -6.0      -2.0      2.0      10.0
                56.26640419947507    -0.0003995  0.0063476  0.0013407 -0.0276472
                95.6528871391076    -0.0012939  0.0063515  0.0012929 -0.0285611
                135.03937007874012     0.0118249  0.0062265  0.001962  -0.0097928
                </tableData>

        </table>

    </function>

    <function name="aero/coefficient/CL__beta_rad">

        <description>CL__beta_rad = dCL__beta_rad * beta_rad</description>

        <product>

            <property>aero/coefficient/dCL__beta_rad</property>

            <property>aero/beta-rad</property>

        </product>

    </function>

    <function name="aero/coefficient/dCL__dpHat_rps">

        <description>dCL__dpHat_rps</description>

        <table>

            <independentVar lookup="row">velocities/vt-fps</independentVar>

            <independentVar lookup="column">aero/alpha-deg</independentVar>

            <tableData>
                      -6.0      -2.0      2.0      10.0
                56.26640419947507    -0.0058519 -0.0007069  0.0035239 -0.3650698
                95.6528871391076    -0.0064375 -0.0013938  0.0039336 -0.3615642
                135.03937007874012    -0.0047145 -0.0019027  0.0047597 -0.3530242
                </tableData>

        </table>

    </function>

    <function name="aero/coefficient/CL__dpHat_rps">

        <description>CL__dpHat_rps = dCL__dpHat_rps * dpHat_rps</description>

        <product>

            <property>aero/coefficient/dCL__dpHat_rps</property>

            <property>velocities/p-aero-rad_sec</property>

            <property>aero/bi2vel</property>

        </product>

    </function>

    <function name="aero/coefficient/dCL__dqHat_rps">

        <description>dCL__dqHat_rps</description>

        <table>

            <independentVar lookup="row">velocities/vt-fps</independentVar>

            <independentVar lookup="column">aero/alpha-deg</independentVar>

            <tableData>
                      -6.0      -2.0      2.0      10.0
                56.26640419947507    2.7985771 2.8941284 2.91763   0.597029
                95.6528871391076    2.8074467 2.9006219 2.9233301 0.5815028
                135.03937007874012    2.8307998 2.9094188 2.9330693 0.5831539
                </tableData>

        </table>

    </function>

    <function name="aero/coefficient/CL__dqHat_rps">

        <description>CL__dqHat_rps = dCL__dqHat_rps * dqHat_rps</description>

        <product>

            <property>aero/coefficient/dCL__dqHat_rps</property>

            <property>velocities/q-aero-rad_sec</property>

            <property>aero/ci2vel</property>

        </product>

    </function>

    <function name="aero/coefficient/dCL__drHat_rps">

        <description>dCL__drHat_rps</description>

        <table>

            <independentVar lookup="row">velocities/vt-fps</independentVar>

            <independentVar lookup="column">aero/alpha-deg</independentVar>

            <tableData>
                      -6.0      -2.0      2.0      10.0
                56.26640419947507     0.0019723  0.0025834  0.0024179 -0.0189781
                95.6528871391076     0.0020311  0.0025606  0.0024129 -0.018869
                135.03937007874012     0.00139    0.0025546  0.0026215 -0.0151449
                </tableData>

        </table>

    </function>

    <function name="aero/coefficient/CL__drHat_rps">

        <description>CL__drHat_rps = dCL__drHat_rps * drHat_rps</description>

        <product>

            <property>aero/coefficient/dCL__drHat_rps</property>

            <property>velocities/r-aero-rad_sec</property>

            <property>aero/bi2vel</property>

        </product>

    </function>

    <function name="aero/coefficient/dCL__dTE1R_rad">

        <description>dCL__dTE1R_rad</description>

        <table>

            <independentVar lookup="row">velocities/vt-fps</independentVar>

            <independentVar lookup="column">aero/alpha-deg</independentVar>

            <tableData>
                      -6.0      -2.0      2.0      10.0
                56.26640419947507    0.1821132 0.1839015 0.1843496 0.0604305
                95.6528871391076    0.1829121 0.1843378 0.1847601 0.058044
                135.03937007874012    0.1834367 0.1850268 0.1853676 0.0567323
                </tableData>

        </table>

    </function>

    <function name="aero/coefficient/CL__dTE1R_rad">

        <description>CL__dTE1R_rad = dCL__dTE1R_rad * dTE1R_rad</description>

        <product>

            <property>aero/coefficient/dCL__dTE1R_rad</property>

            <property>fcs/posTE1R_rad</property>

        </product>

    </function>

    <function name="aero/coefficient/dCL__dTE1L_rad">

        <description>dCL__dTE1L_rad</description>

        <table>

            <independentVar lookup="row">velocities/vt-fps</independentVar>

            <independentVar lookup="column">aero/alpha-deg</independentVar>

            <tableData>
                      -6.0      -2.0      2.0      10.0
                56.26640419947507    0.1821182 0.183902  0.1843497 0.0604306
                95.6528871391076    0.1829259 0.1843368 0.1847629 0.058043
                135.03937007874012    0.1834351 0.1850268 0.1853661 0.0567282
                </tableData>

        </table>

    </function>

    <function name="aero/coefficient/CL__dTE1L_rad">

        <description>CL__dTE1L_rad = dCL__dTE1L_rad * dTE1L_rad</description>

        <product>

            <property>aero/coefficient/dCL__dTE1L_rad</property>

            <property>fcs/posTE1L_rad</property>

        </product>

    </function>

    <function name="aero/coefficient/dCL__dTE2R_rad">

        <description>dCL__dTE2R_rad</description>

        <table>

            <independentVar lookup="row">velocities/vt-fps</independentVar>

            <independentVar lookup="column">aero/alpha-deg</independentVar>

            <tableData>
                      -6.0      -2.0      2.0      10.0
                56.26640419947507    0.1717581 0.1721056 0.1722705 0.0223879
                95.6528871391076    0.1726269 0.1725701 0.1721726 0.0214832
                135.03937007874012    0.1732143 0.1733373 0.1732941 0.0202998
                </tableData>

        </table>

    </function>

    <function name="aero/coefficient/CL__dTE2R_rad">

        <description>CL__dTE2R_rad = dCL__dTE2R_rad * dTE2R_rad</description>

        <product>

            <property>aero/coefficient/dCL__dTE2R_rad</property>

            <property>fcs/posTE2R_rad</property>

        </product>

    </function>

    <function name="aero/coefficient/dCL__dTE2L_rad">

        <description>dCL__dTE2L_rad</description>

        <table>

            <independentVar lookup="row">velocities/vt-fps</independentVar>

            <independentVar lookup="column">aero/alpha-deg</independentVar>

            <tableData>
                      -6.0      -2.0      2.0      10.0
                56.26640419947507    0.1717968 0.1721061 0.1722705 0.0223871
                95.6528871391076    0.172624  0.1725703 0.17269   0.0214805
                135.03937007874012    0.1732148 0.1733372 0.1732941 0.0203005
                </tableData>

        </table>

    </function>

    <function name="aero/coefficient/CL__dTE2L_rad">

        <description>CL__dTE2L_rad = dCL__dTE2L_rad * dTE2L_rad</description>

        <product>

            <property>aero/coefficient/dCL__dTE2L_rad</property>

            <property>fcs/posTE2L_rad</property>

        </product>

    </function>

    <function name="aero/coefficient/dCL__dTE3R_rad">

        <description>dCL__dTE3R_rad</description>

        <table>

            <independentVar lookup="row">velocities/vt-fps</independentVar>

            <independentVar lookup="column">aero/alpha-deg</independentVar>

            <tableData>
                      -6.0      -2.0      2.0      10.0
                56.26640419947507    0.1483658 0.1488078 0.1490355 0.0124556
                95.6528871391076    0.1489621 0.1491718 0.1493453 0.0124258
                135.03937007874012    0.149496  0.1498081 0.1497809 0.0117627
                </tableData>

        </table>

    </function>

    <function name="aero/coefficient/CL__dTE3R_rad">

        <description>CL__dTE3R_rad = dCL__dTE3R_rad * dTE3R_rad</description>

        <product>

            <property>aero/coefficient/dCL__dTE3R_rad</property>

            <property>fcs/posTE3R_rad</property>

        </product>

    </function>

    <function name="aero/coefficient/dCL__dTE3L_rad">

        <description>dCL__dTE3L_rad</description>

        <table>

            <independentVar lookup="row">velocities/vt-fps</independentVar>

            <independentVar lookup="column">aero/alpha-deg</independentVar>

            <tableData>
                      -6.0      -2.0      2.0      10.0
                56.26640419947507    0.1483159 0.1488087 0.1490366 0.0124555
                95.6528871391076    0.1491136 0.1491712 0.1493456 0.0124359
                135.03937007874012    0.1494994 0.149807  0.1497809 0.0117654
                </tableData>

        </table>

    </function>

    <function name="aero/coefficient/CL__dTE3L_rad">

        <description>CL__dTE3L_rad = dCL__dTE3L_rad * dTE3L_rad</description>

        <product>

            <property>aero/coefficient/dCL__dTE3L_rad</property>

            <property>fcs/posTE3L_rad</property>

        </product>

    </function>

    <function name="aero/coefficient/dCL__dTE4R_rad">

        <description>dCL__dTE4R_rad</description>

        <table>

            <independentVar lookup="row">velocities/vt-fps</independentVar>

            <independentVar lookup="column">aero/alpha-deg</independentVar>

            <tableData>
                      -6.0      -2.0      2.0      10.0
                56.26640419947507    0.1351789 0.1374267 0.1355945 0.0146543
                95.6528871391076    0.1358818 0.1377419 0.1358414 0.0146818
                135.03937007874012    0.135871  0.1363277 0.136153  0.0143442
                </tableData>

        </table>

    </function>

    <function name="aero/coefficient/CL__dTE4R_rad">

        <description>CL__dTE4R_rad = dCL__dTE4R_rad * dTE4R_rad</description>

        <product>

            <property>aero/coefficient/dCL__dTE4R_rad</property>

            <property>fcs/posTE4R_rad</property>

        </product>

    </function>

    <function name="aero/coefficient/dCL__dTE4L_rad">

        <description>dCL__dTE4L_rad</description>

        <table>

            <independentVar lookup="row">velocities/vt-fps</independentVar>

            <independentVar lookup="column">aero/alpha-deg</independentVar>

            <tableData>
                      -6.0      -2.0      2.0      10.0
                56.26640419947507    0.1351992 0.1374271 0.1355925 0.0146554
                95.6528871391076    0.135882  0.1377476 0.1358419 0.0146814
                135.03937007874012    0.1358771 0.1363281 0.1361531 0.014344
                </tableData>

        </table>

    </function>

    <function name="aero/coefficient/CL__dTE4L_rad">

        <description>CL__dTE4L_rad = dCL__dTE4L_rad * dTE4L_rad</description>

        <product>

            <property>aero/coefficient/dCL__dTE4L_rad</property>

            <property>fcs/posTE4L_rad</property>

        </product>

    </function>

    <function name="aero/coefficient/dCL__dTE5R_rad">

        <description>dCL__dTE5R_rad</description>

        <table>

            <independentVar lookup="row">velocities/vt-fps</independentVar>

            <independentVar lookup="column">aero/alpha-deg</independentVar>

            <tableData>
                      -6.0      -2.0      2.0      10.0
                56.26640419947507    0.1192389 0.1210067 0.1190918 0.0513447
                95.6528871391076    0.1196075 0.1212075 0.1192529 0.0503774
                135.03937007874012    0.117674  0.1217891 0.1199549 0.0497689
                </tableData>

        </table>

    </function>

    <function name="aero/coefficient/CL__dTE5R_rad">

        <description>CL__dTE5R_rad = dCL__dTE5R_rad * dTE5R_rad</description>

        <product>

            <property>aero/coefficient/dCL__dTE5R_rad</property>

            <property>fcs/posTE5R_rad</property>

        </product>

    </function>

    <function name="aero/coefficient/dCL__dTE5L_rad">

        <description>dCL__dTE5L_rad</description>

        <table>

            <independentVar lookup="row">velocities/vt-fps</independentVar>

            <independentVar lookup="column">aero/alpha-deg</independentVar>

            <tableData>
                      -6.0      -2.0      2.0      10.0
                56.26640419947507    0.1192422 0.1210065 0.1190963 0.0513446
                95.6528871391076    0.1196121 0.1212112 0.1192522 0.0503774
                135.03937007874012    0.1176753 0.1217899 0.1199549 0.0497686
                </tableData>

        </table>

    </function>

    <function name="aero/coefficient/CL__dTE5L_rad">

        <description>CL__dTE5L_rad = dCL__dTE5L_rad * dTE5L_rad</description>

        <product>

            <property>aero/coefficient/dCL__dTE5L_rad</property>

            <property>fcs/posTE5L_rad</property>

        </product>

    </function>

    <function name="aero/coefficient/dCL__dLER_rad">

        <description>dCL__dLER_rad</description>

        <table>

            <independentVar lookup="row">velocities/vt-fps</independentVar>

            <independentVar lookup="column">aero/alpha-deg</independentVar>

            <tableData>
                      -6.0      -2.0      2.0      10.0
                56.26640419947507    -0.0106814 -0.0103074 -0.010324  -0.0040211
                95.6528871391076    -0.0105567 -0.0104194 -0.0103421 -0.0031934
                135.03937007874012    -0.0109421 -0.0106102 -0.0102976 -0.0035159
                </tableData>

        </table>

    </function>

    <function name="aero/coefficient/CL__dLER_rad">

        <description>CL__dLER_rad = dCL__dLER_rad * dLER_rad</description>

        <product>

            <property>aero/coefficient/dCL__dLER_rad</property>

            <property>fcs/posLER_rad</property>

        </product>

    </function>

    <function name="aero/coefficient/dCL__dLEL_rad">

        <description>dCL__dLEL_rad</description>

        <table>

            <independentVar lookup="row">velocities/vt-fps</independentVar>

            <independentVar lookup="column">aero/alpha-deg</independentVar>

            <tableData>
                      -6.0      -2.0      2.0      10.0
                56.26640419947507    -0.0107144 -0.0103074 -0.0103238 -0.0040244
                95.6528871391076    -0.0100142 -0.0104186 -0.0103375 -0.0032225
                135.03937007874012    -0.0109337 -0.0106098 -0.0102974 -0.0035139
                </tableData>

        </table>

    </function>

    <function name="aero/coefficient/CL__dLEL_rad">

        <description>CL__dLEL_rad = dCL__dLEL_rad * dLEL_rad</description>

        <product>

            <property>aero/coefficient/dCL__dLEL_rad</property>

            <property>fcs/posLEL_rad</property>

        </product>

    </function>

    <function name="aero/coefficient/CL">

        <description>CL summation</description>

        <sum>

            <property>aero/coefficient/CL__zero</property>

            <property>aero/coefficient/CL__alpha_rad</property>

            <property>aero/coefficient/CL__beta_rad</property>

            <property>aero/coefficient/CL__dpHat_rps</property>

            <property>aero/coefficient/CL__dqHat_rps</property>

            <property>aero/coefficient/CL__drHat_rps</property>

            <property>aero/coefficient/CL__dTE1R_rad</property>

            <property>aero/coefficient/CL__dTE1L_rad</property>

            <property>aero/coefficient/CL__dTE2R_rad</property>

            <property>aero/coefficient/CL__dTE2L_rad</property>

            <property>aero/coefficient/CL__dTE3R_rad</property>

            <property>aero/coefficient/CL__dTE3L_rad</property>

            <property>aero/coefficient/CL__dTE4R_rad</property>

            <property>aero/coefficient/CL__dTE4L_rad</property>

            <property>aero/coefficient/CL__dTE5R_rad</property>

            <property>aero/coefficient/CL__dTE5L_rad</property>

            <property>aero/coefficient/CL__dLER_rad</property>

            <property>aero/coefficient/CL__dLEL_rad</property>

        </sum>

    </function>

    <function name="aero/coefficient/CD__zero">

        <description>CD__zero</description>

        <table>

            <independentVar lookup="row">velocities/vt-fps</independentVar>

            <independentVar lookup="column">aero/alpha-deg</independentVar>

            <tableData>
                      -6.0      -2.0      2.0      10.0
                56.26640419947507    0.02829661 0.03535325 0.03431199 0.02510449
                95.6528871391076    0.02824688 0.03535025 0.03430213 0.02544456
                135.03937007874012    0.02839797 0.03534462 0.03429445 0.02704264
                </tableData>

        </table>

    </function>

    <function name="aero/coefficient/dCD__alpha_rad">

        <description>dCD__alpha_rad</description>

        <table>

            <independentVar lookup="row">velocities/vt-fps</independentVar>

            <independentVar lookup="column">aero/alpha-deg</independentVar>

            <tableData>
                      -6.0      -2.0      2.0      10.0
                56.26640419947507    -0.1052876 -0.0289076  0.0485765  0.1277975
                95.6528871391076    -0.1059862 -0.029091   0.0488795  0.1270566
                135.03937007874012    -0.1054588 -0.029419   0.0492123  0.1220393
                </tableData>

        </table>

    </function>

    <function name="aero/coefficient/CD__alpha_rad">

        <description>CD__alpha_rad = dCD__alpha_rad * alpha_rad</description>

        <product>

            <property>aero/coefficient/dCD__alpha_rad</property>

            <property>aero/alpha-rad</property>

        </product>

    </function>

    <function name="aero/coefficient/dCD__beta_rad">

        <description>dCD__beta_rad</description>

        <table>

            <independentVar lookup="row">velocities/vt-fps</independentVar>

            <independentVar lookup="column">aero/alpha-deg</independentVar>

            <tableData>
                      -6.0      -2.0      2.0      10.0
                56.26640419947507    0.0011687 0.00204   0.0011342 0.005005
                95.6528871391076    0.0010757 0.0020503 0.0011409 0.0042551
                135.03937007874012     0.0030602  0.0020821  0.0011187 -0.0041689
                </tableData>

        </table>

    </function>

    <function name="aero/coefficient/CD__beta_rad">

        <description>CD__beta_rad = dCD__beta_rad * beta_rad</description>

        <product>

            <property>aero/coefficient/dCD__beta_rad</property>

            <property>aero/beta-rad</property>

        </product>

    </function>

    <function name="aero/coefficient/dCD__dpHat_rps">

        <description>dCD__dpHat_rps</description>

        <table>

            <independentVar lookup="row">velocities/vt-fps</independentVar>

            <independentVar lookup="column">aero/alpha-deg</independentVar>

            <tableData>
                      -6.0      -2.0      2.0      10.0
                56.26640419947507     0.0131219  0.0141318  0.0147954 -0.0034484
                95.6528871391076     0.013231   0.0142226  0.0148859 -0.0036757
                135.03937007874012     0.013503   0.0145054  0.0149826 -0.0054818
                </tableData>

        </table>

    </function>

    <function name="aero/coefficient/CD__dpHat_rps">

        <description>CD__dpHat_rps = dCD__dpHat_rps * dpHat_rps</description>

        <product>

            <property>aero/coefficient/dCD__dpHat_rps</property>

            <property>velocities/p-aero-rad_sec</property>

            <property>aero/bi2vel</property>

        </product>

    </function>

    <function name="aero/coefficient/dCD__dqHat_rps">

        <description>dCD__dqHat_rps</description>

        <table>

            <independentVar lookup="row">velocities/vt-fps</independentVar>

            <independentVar lookup="column">aero/alpha-deg</independentVar>

            <tableData>
                      -6.0      -2.0      2.0      10.0
                56.26640419947507    -0.0764706 -0.0249585  0.0299268  0.0875209
                95.6528871391076    -0.0769659 -0.0251199  0.0301081  0.0863005
                135.03937007874012    -0.0757065 -0.0254676  0.0303012  0.0965661
                </tableData>

        </table>

    </function>

    <function name="aero/coefficient/CD__dqHat_rps">

        <description>CD__dqHat_rps = dCD__dqHat_rps * dqHat_rps</description>

        <product>

            <property>aero/coefficient/dCD__dqHat_rps</property>

            <property>velocities/q-aero-rad_sec</property>

            <property>aero/ci2vel</property>

        </product>

    </function>

    <function name="aero/coefficient/dCD__drHat_rps">

        <description>dCD__drHat_rps</description>

        <table>

            <independentVar lookup="row">velocities/vt-fps</independentVar>

            <independentVar lookup="column">aero/alpha-deg</independentVar>

            <tableData>
                      -6.0      -2.0      2.0      10.0
                56.26640419947507    0.0006926 0.0005288 0.0006083 0.0004828
                95.6528871391076    0.0006861 0.0005292 0.0006111 0.0002063
                135.03937007874012     0.0006013  0.0005345  0.0006115 -0.0007351
                </tableData>

        </table>

    </function>

    <function name="aero/coefficient/CD__drHat_rps">

        <description>CD__drHat_rps = dCD__drHat_rps * drHat_rps</description>

        <product>

            <property>aero/coefficient/dCD__drHat_rps</property>

            <property>velocities/r-aero-rad_sec</property>

            <property>aero/bi2vel</property>

        </product>

    </function>

    <function name="aero/coefficient/dCD__dTE1R_rad">

        <description>dCD__dTE1R_rad</description>

        <table>

            <independentVar lookup="row">velocities/vt-fps</independentVar>

            <independentVar lookup="column">aero/alpha-deg</independentVar>

            <tableData>
                      -6.0      -2.0      2.0      10.0
                56.26640419947507    -0.0042263 -0.0007683  0.0025446  0.0074261
                95.6528871391076    -0.0042334 -0.000774   0.0025593  0.0067581
                135.03937007874012    -0.004303  -0.0007817  0.002583   0.0067858
                </tableData>

        </table>

    </function>

    <function name="aero/coefficient/CD__dTE1R_rad">

        <description>CD__dTE1R_rad = dCD__dTE1R_rad * dTE1R_rad</description>

        <product>

            <property>aero/coefficient/dCD__dTE1R_rad</property>

            <property>fcs/posTE1R_rad</property>

        </product>

    </function>

    <function name="aero/coefficient/dCD__dTE1L_rad">

        <description>dCD__dTE1L_rad</description>

        <table>

            <independentVar lookup="row">velocities/vt-fps</independentVar>

            <independentVar lookup="column">aero/alpha-deg</independentVar>

            <tableData>
                      -6.0      -2.0      2.0      10.0
                56.26640419947507    -0.0042254 -0.0007682  0.0025446  0.0074265
                95.6528871391076    -0.0042324 -0.0007741  0.0025591  0.0067605
                135.03937007874012    -0.0043021 -0.0007817  0.0025831  0.0067905
                </tableData>

        </table>

    </function>

    <function name="aero/coefficient/CD__dTE1L_rad">

        <description>CD__dTE1L_rad = dCD__dTE1L_rad * dTE1L_rad</description>

        <product>

            <property>aero/coefficient/dCD__dTE1L_rad</property>

            <property>fcs/posTE1L_rad</property>

        </product>

    </function>

    <function name="aero/coefficient/dCD__dTE2R_rad">

        <description>dCD__dTE2R_rad</description>

        <table>

            <independentVar lookup="row">velocities/vt-fps</independentVar>

            <independentVar lookup="column">aero/alpha-deg</independentVar>

            <tableData>
                      -6.0      -2.0      2.0      10.0
                56.26640419947507    -0.0022641 -0.0006695  0.0009494  0.0020806
                95.6528871391076    -0.0022648 -0.0006751  0.0009645  0.0014591
                135.03937007874012    -0.0023142 -0.0006805  0.0009703  0.0015333
                </tableData>

        </table>

    </function>

    <function name="aero/coefficient/CD__dTE2R_rad">

        <description>CD__dTE2R_rad = dCD__dTE2R_rad * dTE2R_rad</description>

        <product>

            <property>aero/coefficient/dCD__dTE2R_rad</property>

            <property>fcs/posTE2R_rad</property>

        </product>

    </function>

    <function name="aero/coefficient/dCD__dTE2L_rad">

        <description>dCD__dTE2L_rad</description>

        <table>

            <independentVar lookup="row">velocities/vt-fps</independentVar>

            <independentVar lookup="column">aero/alpha-deg</independentVar>

            <tableData>
                      -6.0      -2.0      2.0      10.0
                56.26640419947507    -0.0022475 -0.0006694  0.0009494  0.0020815
                95.6528871391076    -0.0022651 -0.0006751  0.0009569  0.0014586
                135.03937007874012    -0.0023142 -0.0006805  0.0009703  0.0015321
                </tableData>

        </table>

    </function>

    <function name="aero/coefficient/CD__dTE2L_rad">

        <description>CD__dTE2L_rad = dCD__dTE2L_rad * dTE2L_rad</description>

        <product>

            <property>aero/coefficient/dCD__dTE2L_rad</property>

            <property>fcs/posTE2L_rad</property>

        </product>

    </function>

    <function name="aero/coefficient/dCD__dTE3R_rad">

        <description>dCD__dTE3R_rad</description>

        <table>

            <independentVar lookup="row">velocities/vt-fps</independentVar>

            <independentVar lookup="column">aero/alpha-deg</independentVar>

            <tableData>
                      -6.0      -2.0      2.0      10.0
                56.26640419947507    -0.002749  -0.000937   0.0009083  0.0024808
                95.6528871391076    -0.002782  -0.0009434  0.0009148  0.0020235
                135.03937007874012    -0.0028055 -0.0009515  0.0009357  0.0020632
                </tableData>

        </table>

    </function>

    <function name="aero/coefficient/CD__dTE3R_rad">

        <description>CD__dTE3R_rad = dCD__dTE3R_rad * dTE3R_rad</description>

        <product>

            <property>aero/coefficient/dCD__dTE3R_rad</property>

            <property>fcs/posTE3R_rad</property>

        </product>

    </function>

    <function name="aero/coefficient/dCD__dTE3L_rad">

        <description>dCD__dTE3L_rad</description>

        <table>

            <independentVar lookup="row">velocities/vt-fps</independentVar>

            <independentVar lookup="column">aero/alpha-deg</independentVar>

            <tableData>
                      -6.0      -2.0      2.0      10.0
                56.26640419947507    -0.0027503 -0.000937   0.0009083  0.0024808
                95.6528871391076    -0.0027468 -0.0009434  0.0009148  0.0020204
                135.03937007874012    -0.0028052 -0.0009515  0.0009357  0.0020523
                </tableData>

        </table>

    </function>

    <function name="aero/coefficient/CD__dTE3L_rad">

        <description>CD__dTE3L_rad = dCD__dTE3L_rad * dTE3L_rad</description>

        <product>

            <property>aero/coefficient/dCD__dTE3L_rad</property>

            <property>fcs/posTE3L_rad</property>

        </product>

    </function>

    <function name="aero/coefficient/dCD__dTE4R_rad">

        <description>dCD__dTE4R_rad</description>

        <table>

            <independentVar lookup="row">velocities/vt-fps</independentVar>

            <independentVar lookup="column">aero/alpha-deg</independentVar>

            <tableData>
                      -6.0      -2.0      2.0      10.0
                56.26640419947507    -0.0034241 -0.0010783  0.001175   0.0032476
                95.6528871391076    -0.0035348 -0.0010869  0.0011826  0.0027733
                135.03937007874012    -0.0035487 -0.0012207  0.0012081  0.0030496
                </tableData>

        </table>

    </function>

    <function name="aero/coefficient/CD__dTE4R_rad">

        <description>CD__dTE4R_rad = dCD__dTE4R_rad * dTE4R_rad</description>

        <product>

            <property>aero/coefficient/dCD__dTE4R_rad</property>

            <property>fcs/posTE4R_rad</property>

        </product>

    </function>

    <function name="aero/coefficient/dCD__dTE4L_rad">

        <description>dCD__dTE4L_rad</description>

        <table>

            <independentVar lookup="row">velocities/vt-fps</independentVar>

            <independentVar lookup="column">aero/alpha-deg</independentVar>

            <tableData>
                      -6.0      -2.0      2.0      10.0
                56.26640419947507    -0.0033888 -0.0010783  0.0011751  0.0032482
                95.6528871391076    -0.0035343 -0.0010867  0.0011826  0.0027726
                135.03937007874012    -0.0035485 -0.0012207  0.0012081  0.0030497
                </tableData>

        </table>

    </function>

    <function name="aero/coefficient/CD__dTE4L_rad">

        <description>CD__dTE4L_rad = dCD__dTE4L_rad * dTE4L_rad</description>

        <product>

            <property>aero/coefficient/dCD__dTE4L_rad</property>

            <property>fcs/posTE4L_rad</property>

        </product>

    </function>

    <function name="aero/coefficient/dCD__dTE5R_rad">

        <description>dCD__dTE5R_rad</description>

        <table>

            <independentVar lookup="row">velocities/vt-fps</independentVar>

            <independentVar lookup="column">aero/alpha-deg</independentVar>

            <tableData>
                      -6.0      -2.0      2.0      10.0
                56.26640419947507    -0.0036619 -0.0014235  0.0014531  0.0055597
                95.6528871391076    -0.003674  -0.0014332  0.0014628  0.0050662
                135.03937007874012    -0.0038616 -0.0013508  0.0014542  0.0053738
                </tableData>

        </table>

    </function>

    <function name="aero/coefficient/CD__dTE5R_rad">

        <description>CD__dTE5R_rad = dCD__dTE5R_rad * dTE5R_rad</description>

        <product>

            <property>aero/coefficient/dCD__dTE5R_rad</property>

            <property>fcs/posTE5R_rad</property>

        </product>

    </function>

    <function name="aero/coefficient/dCD__dTE5L_rad">

        <description>dCD__dTE5L_rad</description>

        <table>

            <independentVar lookup="row">velocities/vt-fps</independentVar>

            <independentVar lookup="column">aero/alpha-deg</independentVar>

            <tableData>
                      -6.0      -2.0      2.0      10.0
                56.26640419947507    -0.0036618 -0.0014234  0.0014528  0.0055592
                95.6528871391076    -0.0036739 -0.0014333  0.0014629  0.0050661
                135.03937007874012    -0.0038616 -0.0013508  0.0014542  0.0053954
                </tableData>

        </table>

    </function>

    <function name="aero/coefficient/CD__dTE5L_rad">

        <description>CD__dTE5L_rad = dCD__dTE5L_rad * dTE5L_rad</description>

        <product>

            <property>aero/coefficient/dCD__dTE5L_rad</property>

            <property>fcs/posTE5L_rad</property>

        </product>

    </function>

    <function name="aero/coefficient/dCD__dLER_rad">

        <description>dCD__dLER_rad</description>

        <table>

            <independentVar lookup="row">velocities/vt-fps</independentVar>

            <independentVar lookup="column">aero/alpha-deg</independentVar>

            <tableData>
                      -6.0      -2.0      2.0      10.0
                56.26640419947507     2.642e-04  1.093e-04 -7.780e-05 -2.611e-04
                95.6528871391076     2.289e-04  1.095e-04 -7.830e-05 -6.298e-04
                135.03937007874012     2.862e-04  1.106e-04 -7.210e-05 -3.305e-04
                </tableData>

        </table>

    </function>

    <function name="aero/coefficient/CD__dLER_rad">

        <description>CD__dLER_rad = dCD__dLER_rad * dLER_rad</description>

        <product>

            <property>aero/coefficient/dCD__dLER_rad</property>

            <property>fcs/posLER_rad</property>

        </product>

    </function>

    <function name="aero/coefficient/dCD__dLEL_rad">

        <description>dCD__dLEL_rad</description>

        <table>

            <independentVar lookup="row">velocities/vt-fps</independentVar>

            <independentVar lookup="column">aero/alpha-deg</independentVar>

            <tableData>
                      -6.0      -2.0      2.0      10.0
                56.26640419947507     2.513e-04  1.093e-04 -7.780e-05 -2.598e-04
                95.6528871391076     2.499e-04  1.095e-04 -7.840e-05 -5.879e-04
                135.03937007874012     2.888e-04  1.107e-04 -7.210e-05 -3.333e-04
                </tableData>

        </table>

    </function>

    <function name="aero/coefficient/CD__dLEL_rad">

        <description>CD__dLEL_rad = dCD__dLEL_rad * dLEL_rad</description>

        <product>

            <property>aero/coefficient/dCD__dLEL_rad</property>

            <property>fcs/posLEL_rad</property>

        </product>

    </function>

    <function name="aero/coefficient/CD">

        <description>CD summation</description>

        <sum>

            <property>aero/coefficient/CD__zero</property>

            <property>aero/coefficient/CD__alpha_rad</property>

            <property>aero/coefficient/CD__beta_rad</property>

            <property>aero/coefficient/CD__dpHat_rps</property>

            <property>aero/coefficient/CD__dqHat_rps</property>

            <property>aero/coefficient/CD__drHat_rps</property>

            <property>aero/coefficient/CD__dTE1R_rad</property>

            <property>aero/coefficient/CD__dTE1L_rad</property>

            <property>aero/coefficient/CD__dTE2R_rad</property>

            <property>aero/coefficient/CD__dTE2L_rad</property>

            <property>aero/coefficient/CD__dTE3R_rad</property>

            <property>aero/coefficient/CD__dTE3L_rad</property>

            <property>aero/coefficient/CD__dTE4R_rad</property>

            <property>aero/coefficient/CD__dTE4L_rad</property>

            <property>aero/coefficient/CD__dTE5R_rad</property>

            <property>aero/coefficient/CD__dTE5L_rad</property>

            <property>aero/coefficient/CD__dLER_rad</property>

            <property>aero/coefficient/CD__dLEL_rad</property>

        </sum>

    </function>

    <function name="aero/coefficient/CY__zero">

        <description>CY__zero</description>

        <table>

            <independentVar lookup="row">velocities/vt-fps</independentVar>

            <independentVar lookup="column">aero/alpha-deg</independentVar>

            <tableData>
                      -6.0      -2.0      2.0      10.0
                56.26640419947507    -7.33038286e-08  0.00000000e+00  0.00000000e+00 -8.72664626e-08
                95.6528871391076     1.04719755e-08 -1.74532925e-08  0.00000000e+00 -6.63225116e-07
                135.03937007874012    0. 0. 0. 0.
                </tableData>

        </table>

    </function>

    <function name="aero/coefficient/dCY__alpha_rad">

        <description>dCY__alpha_rad</description>

        <table>

            <independentVar lookup="row">velocities/vt-fps</independentVar>

            <independentVar lookup="column">aero/alpha-deg</independentVar>

            <tableData>
                      -6.0      -2.0      2.0      10.0
                56.26640419947507    -7.e-07  0.e+00  0.e+00  5.e-07
                95.6528871391076     1.0e-07 -5.0e-07 -0.0e+00  3.8e-06
                135.03937007874012    0. 0. 0. 0.
                </tableData>

        </table>

    </function>

    <function name="aero/coefficient/CY__alpha_rad">

        <description>CY__alpha_rad = dCY__alpha_rad * alpha_rad</description>

        <product>

            <property>aero/coefficient/dCY__alpha_rad</property>

            <property>aero/alpha-rad</property>

        </product>

    </function>

    <function name="aero/coefficient/dCY__beta_rad">

        <description>dCY__beta_rad</description>

        <table>

            <independentVar lookup="row">velocities/vt-fps</independentVar>

            <independentVar lookup="column">aero/alpha-deg</independentVar>

            <tableData>
                      -6.0      -2.0      2.0      10.0
                56.26640419947507    -0.2736007 -0.2500572 -0.226036  -0.2575765
                95.6528871391076    -0.2741977 -0.2503953 -0.2262878 -0.2590243
                135.03937007874012    -0.2935095 -0.2559865 -0.2305405 -0.2755141
                </tableData>

        </table>

    </function>

    <function name="aero/coefficient/CY__beta_rad">

        <description>CY__beta_rad = dCY__beta_rad * beta_rad</description>

        <product>

            <property>aero/coefficient/dCY__beta_rad</property>

            <property>aero/beta-rad</property>

        </product>

    </function>

    <function name="aero/coefficient/dCY__dpHat_rps">

        <description>dCY__dpHat_rps</description>

        <table>

            <independentVar lookup="row">velocities/vt-fps</independentVar>

            <independentVar lookup="column">aero/alpha-deg</independentVar>

            <tableData>
                      -6.0      -2.0      2.0      10.0
                56.26640419947507    -0.334976  -0.2183198 -0.1048975  0.0261292
                95.6528871391076    -0.335995  -0.2188671 -0.1051119  0.0257071
                135.03937007874012    -0.3464566 -0.222638  -0.1080417  0.0171789
                </tableData>

        </table>

    </function>

    <function name="aero/coefficient/CY__dpHat_rps">

        <description>CY__dpHat_rps = dCY__dpHat_rps * dpHat_rps</description>

        <product>

            <property>aero/coefficient/dCY__dpHat_rps</property>

            <property>velocities/p-aero-rad_sec</property>

            <property>aero/bi2vel</property>

        </product>

    </function>

    <function name="aero/coefficient/dCY__dqHat_rps">

        <description>dCY__dqHat_rps</description>

        <table>

            <independentVar lookup="row">velocities/vt-fps</independentVar>

            <independentVar lookup="column">aero/alpha-deg</independentVar>

            <tableData>
                      -6.0      -2.0      2.0      10.0
                56.26640419947507    -3.31e-05  1.00e-07 -1.00e-07 -1.10e-06
                95.6528871391076     3.0e-07 -2.3e-06 -0.0e+00  1.0e-05
                135.03937007874012     2.4e-06 -1.0e-07 -0.0e+00  3.0e-07
                </tableData>

        </table>

    </function>

    <function name="aero/coefficient/CY__dqHat_rps">

        <description>CY__dqHat_rps = dCY__dqHat_rps * dqHat_rps</description>

        <product>

            <property>aero/coefficient/dCY__dqHat_rps</property>

            <property>velocities/q-aero-rad_sec</property>

            <property>aero/ci2vel</property>

        </product>

    </function>

    <function name="aero/coefficient/dCY__drHat_rps">

        <description>dCY__drHat_rps</description>

        <table>

            <independentVar lookup="row">velocities/vt-fps</independentVar>

            <independentVar lookup="column">aero/alpha-deg</independentVar>

            <tableData>
                      -6.0      -2.0      2.0      10.0
                56.26640419947507    0.0772895 0.0838793 0.0902345 0.1215694
                95.6528871391076    0.0773675 0.0839563 0.0903416 0.1221065
                135.03937007874012    0.0812652 0.0853157 0.0915905 0.1292288
                </tableData>

        </table>

    </function>

    <function name="aero/coefficient/CY__drHat_rps">

        <description>CY__drHat_rps = dCY__drHat_rps * drHat_rps</description>

        <product>

            <property>aero/coefficient/dCY__drHat_rps</property>

            <property>velocities/r-aero-rad_sec</property>

            <property>aero/bi2vel</property>

        </product>

    </function>

    <function name="aero/coefficient/dCY__dTE1R_rad">

        <description>dCY__dTE1R_rad</description>

        <table>

            <independentVar lookup="row">velocities/vt-fps</independentVar>

            <independentVar lookup="column">aero/alpha-deg</independentVar>

            <tableData>
                      -6.0      -2.0      2.0      10.0
                56.26640419947507    -0.0025775 -0.0056363 -0.0084617 -0.017064
                95.6528871391076    -0.0025972 -0.0056499 -0.0084739 -0.0171371
                135.03937007874012    -0.0026231 -0.0056828 -0.0084879 -0.017152
                </tableData>

        </table>

    </function>

    <function name="aero/coefficient/CY__dTE1R_rad">

        <description>CY__dTE1R_rad = dCY__dTE1R_rad * dTE1R_rad</description>

        <product>

            <property>aero/coefficient/dCY__dTE1R_rad</property>

            <property>fcs/posTE1R_rad</property>

        </product>

    </function>

    <function name="aero/coefficient/dCY__dTE1L_rad">

        <description>dCY__dTE1L_rad</description>

        <table>

            <independentVar lookup="row">velocities/vt-fps</independentVar>

            <independentVar lookup="column">aero/alpha-deg</independentVar>

            <tableData>
                      -6.0      -2.0      2.0      10.0
                56.26640419947507    0.0025783 0.0056342 0.0084617 0.0170638
                95.6528871391076    0.0025969 0.0056468 0.0084773 0.0171375
                135.03937007874012    0.0026078 0.0056828 0.0084861 0.0171517
                </tableData>

        </table>

    </function>

    <function name="aero/coefficient/CY__dTE1L_rad">

        <description>CY__dTE1L_rad = dCY__dTE1L_rad * dTE1L_rad</description>

        <product>

            <property>aero/coefficient/dCY__dTE1L_rad</property>

            <property>fcs/posTE1L_rad</property>

        </product>

    </function>

    <function name="aero/coefficient/dCY__dTE2R_rad">

        <description>dCY__dTE2R_rad</description>

        <table>

            <independentVar lookup="row">velocities/vt-fps</independentVar>

            <independentVar lookup="column">aero/alpha-deg</independentVar>

            <tableData>
                      -6.0      -2.0      2.0      10.0
                56.26640419947507    -0.0083882 -0.0063945 -0.0043077 -0.0053204
                95.6528871391076    -0.008433  -0.0064166 -0.0043102 -0.0055105
                135.03937007874012    -0.0085289 -0.0064795 -0.0043568 -0.0056772
                </tableData>

        </table>

    </function>

    <function name="aero/coefficient/CY__dTE2R_rad">

        <description>CY__dTE2R_rad = dCY__dTE2R_rad * dTE2R_rad</description>

        <product>

            <property>aero/coefficient/dCY__dTE2R_rad</property>

            <property>fcs/posTE2R_rad</property>

        </product>

    </function>

    <function name="aero/coefficient/dCY__dTE2L_rad">

        <description>dCY__dTE2L_rad</description>

        <table>

            <independentVar lookup="row">velocities/vt-fps</independentVar>

            <independentVar lookup="column">aero/alpha-deg</independentVar>

            <tableData>
                      -6.0      -2.0      2.0      10.0
                56.26640419947507    0.0083903 0.0063817 0.0043077 0.0053208
                95.6528871391076    0.0084333 0.0064183 0.0043215 0.0055105
                135.03937007874012    0.0085289 0.0064792 0.0043568 0.0056767
                </tableData>

        </table>

    </function>

    <function name="aero/coefficient/CY__dTE2L_rad">

        <description>CY__dTE2L_rad = dCY__dTE2L_rad * dTE2L_rad</description>

        <product>

            <property>aero/coefficient/dCY__dTE2L_rad</property>

            <property>fcs/posTE2L_rad</property>

        </product>

    </function>

    <function name="aero/coefficient/dCY__dTE3R_rad">

        <description>dCY__dTE3R_rad</description>

        <table>

            <independentVar lookup="row">velocities/vt-fps</independentVar>

            <independentVar lookup="column">aero/alpha-deg</independentVar>

            <tableData>
                      -6.0      -2.0      2.0      10.0
                56.26640419947507    -0.0097018 -0.0071384 -0.0043468 -0.0044085
                95.6528871391076    -0.0097418 -0.0071674 -0.0043619 -0.0045651
                135.03937007874012    -0.0099126 -0.0072697 -0.0043172 -0.0048503
                </tableData>

        </table>

    </function>

    <function name="aero/coefficient/CY__dTE3R_rad">

        <description>CY__dTE3R_rad = dCY__dTE3R_rad * dTE3R_rad</description>

        <product>

            <property>aero/coefficient/dCY__dTE3R_rad</property>

            <property>fcs/posTE3R_rad</property>

        </product>

    </function>

    <function name="aero/coefficient/dCY__dTE3L_rad">

        <description>dCY__dTE3L_rad</description>

        <table>

            <independentVar lookup="row">velocities/vt-fps</independentVar>

            <independentVar lookup="column">aero/alpha-deg</independentVar>

            <tableData>
                      -6.0      -2.0      2.0      10.0
                56.26640419947507    0.0097071 0.0071384 0.0043487 0.0044094
                95.6528871391076    0.0097883 0.0071648 0.0043619 0.0045617
                135.03937007874012    0.0099125 0.0072693 0.0043172 0.004855
                </tableData>

        </table>

    </function>

    <function name="aero/coefficient/CY__dTE3L_rad">

        <description>CY__dTE3L_rad = dCY__dTE3L_rad * dTE3L_rad</description>

        <product>

            <property>aero/coefficient/dCY__dTE3L_rad</property>

            <property>fcs/posTE3L_rad</property>

        </product>

    </function>

    <function name="aero/coefficient/dCY__dTE4R_rad">

        <description>dCY__dTE4R_rad</description>

        <table>

            <independentVar lookup="row">velocities/vt-fps</independentVar>

            <independentVar lookup="column">aero/alpha-deg</independentVar>

            <tableData>
                      -6.0      -2.0      2.0      10.0
                56.26640419947507    -0.0122105 -0.0099841 -0.0070213 -0.0077797
                95.6528871391076    -0.0122439 -0.0100253 -0.007045  -0.0080414
                135.03937007874012    -0.0126028 -0.0100896 -0.0070633 -0.0080615
                </tableData>

        </table>

    </function>

    <function name="aero/coefficient/CY__dTE4R_rad">

        <description>CY__dTE4R_rad = dCY__dTE4R_rad * dTE4R_rad</description>

        <product>

            <property>aero/coefficient/dCY__dTE4R_rad</property>

            <property>fcs/posTE4R_rad</property>

        </product>

    </function>

    <function name="aero/coefficient/dCY__dTE4L_rad">

        <description>dCY__dTE4L_rad</description>

        <table>

            <independentVar lookup="row">velocities/vt-fps</independentVar>

            <independentVar lookup="column">aero/alpha-deg</independentVar>

            <tableData>
                      -6.0      -2.0      2.0      10.0
                56.26640419947507    0.0121903 0.0099833 0.0070211 0.0077835
                95.6528871391076    0.0122442 0.010022  0.0070448 0.0080411
                135.03937007874012    0.0126024 0.0100889 0.0070632 0.0080614
                </tableData>

        </table>

    </function>

    <function name="aero/coefficient/CY__dTE4L_rad">

        <description>CY__dTE4L_rad = dCY__dTE4L_rad * dTE4L_rad</description>

        <product>

            <property>aero/coefficient/dCY__dTE4L_rad</property>

            <property>fcs/posTE4L_rad</property>

        </product>

    </function>

    <function name="aero/coefficient/dCY__dTE5R_rad">

        <description>dCY__dTE5R_rad</description>

        <table>

            <independentVar lookup="row">velocities/vt-fps</independentVar>

            <independentVar lookup="column">aero/alpha-deg</independentVar>

            <tableData>
                      -6.0      -2.0      2.0      10.0
                56.26640419947507    -0.0236927 -0.0233263 -0.01992   -0.0261468
                95.6528871391076    -0.0237952 -0.0234045 -0.0199733 -0.0264827
                135.03937007874012    -0.024995  -0.0241637 -0.0205286 -0.0284589
                </tableData>

        </table>

    </function>

    <function name="aero/coefficient/CY__dTE5R_rad">

        <description>CY__dTE5R_rad = dCY__dTE5R_rad * dTE5R_rad</description>

        <product>

            <property>aero/coefficient/dCY__dTE5R_rad</property>

            <property>fcs/posTE5R_rad</property>

        </product>

    </function>

    <function name="aero/coefficient/dCY__dTE5L_rad">

        <description>dCY__dTE5L_rad</description>

        <table>

            <independentVar lookup="row">velocities/vt-fps</independentVar>

            <independentVar lookup="column">aero/alpha-deg</independentVar>

            <tableData>
                      -6.0      -2.0      2.0      10.0
                56.26640419947507    0.0236931 0.0233251 0.0199222 0.0261475
                95.6528871391076    0.0237947 0.0234019 0.0199743 0.0264827
                135.03937007874012    0.0249949 0.0241633 0.0205287 0.0284564
                </tableData>

        </table>

    </function>

    <function name="aero/coefficient/CY__dTE5L_rad">

        <description>CY__dTE5L_rad = dCY__dTE5L_rad * dTE5L_rad</description>

        <product>

            <property>aero/coefficient/dCY__dTE5L_rad</property>

            <property>fcs/posTE5L_rad</property>

        </product>

    </function>

    <function name="aero/coefficient/dCY__dLER_rad">

        <description>dCY__dLER_rad</description>

        <table>

            <independentVar lookup="row">velocities/vt-fps</independentVar>

            <independentVar lookup="column">aero/alpha-deg</independentVar>

            <tableData>
                      -6.0      -2.0      2.0      10.0
                56.26640419947507    0.0016914 0.0016594 0.0012452 0.0019216
                95.6528871391076    0.001702  0.0016693 0.0012454 0.0016395
                135.03937007874012    0.0017724 0.0017356 0.0011754 0.0020194
                </tableData>

        </table>

    </function>

    <function name="aero/coefficient/CY__dLER_rad">

        <description>CY__dLER_rad = dCY__dLER_rad * dLER_rad</description>

        <product>

            <property>aero/coefficient/dCY__dLER_rad</property>

            <property>fcs/posLER_rad</property>

        </product>

    </function>

    <function name="aero/coefficient/dCY__dLEL_rad">

        <description>dCY__dLEL_rad</description>

        <table>

            <independentVar lookup="row">velocities/vt-fps</independentVar>

            <independentVar lookup="column">aero/alpha-deg</independentVar>

            <tableData>
                      -6.0      -2.0      2.0      10.0
                56.26640419947507    -0.0016861 -0.0016594 -0.0012453 -0.0019233
                95.6528871391076    -0.0017152 -0.0016723 -0.0012494 -0.0016654
                135.03937007874012    -0.001786  -0.0017372 -0.0011754 -0.0020202
                </tableData>

        </table>

    </function>

    <function name="aero/coefficient/CY__dLEL_rad">

        <description>CY__dLEL_rad = dCY__dLEL_rad * dLEL_rad</description>

        <product>

            <property>aero/coefficient/dCY__dLEL_rad</property>

            <property>fcs/posLEL_rad</property>

        </product>

    </function>

    <function name="aero/coefficient/CY">

        <description>CY summation</description>

        <sum>

            <property>aero/coefficient/CY__zero</property>

            <property>aero/coefficient/CY__alpha_rad</property>

            <property>aero/coefficient/CY__beta_rad</property>

            <property>aero/coefficient/CY__dpHat_rps</property>

            <property>aero/coefficient/CY__dqHat_rps</property>

            <property>aero/coefficient/CY__drHat_rps</property>

            <property>aero/coefficient/CY__dTE1R_rad</property>

            <property>aero/coefficient/CY__dTE1L_rad</property>

            <property>aero/coefficient/CY__dTE2R_rad</property>

            <property>aero/coefficient/CY__dTE2L_rad</property>

            <property>aero/coefficient/CY__dTE3R_rad</property>

            <property>aero/coefficient/CY__dTE3L_rad</property>

            <property>aero/coefficient/CY__dTE4R_rad</property>

            <property>aero/coefficient/CY__dTE4L_rad</property>

            <property>aero/coefficient/CY__dTE5R_rad</property>

            <property>aero/coefficient/CY__dTE5L_rad</property>

            <property>aero/coefficient/CY__dLER_rad</property>

            <property>aero/coefficient/CY__dLEL_rad</property>

        </sum>

    </function>

    <function name="aero/coefficient/CMl__zero">

        <description>CMl__zero</description>

        <table>

            <independentVar lookup="row">velocities/vt-fps</independentVar>

            <independentVar lookup="column">aero/alpha-deg</independentVar>

            <tableData>
                      -6.0      -2.0      2.0      10.0
                56.26640419947507    -9.73475870e-09 -5.05408869e-08 -5.29497716e-08  3.11317611e-06
                95.6528871391076    -9.73475870e-09 -5.40315454e-08 -5.29497716e-08  3.06081623e-06
                135.03937007874012    -9.73475870e-09 -4.70502284e-08 -5.99310886e-08  3.13062940e-06
                </tableData>

        </table>

    </function>

    <function name="aero/coefficient/dCMl__alpha_rad">

        <description>dCMl__alpha_rad</description>

        <table>

            <independentVar lookup="row">velocities/vt-fps</independentVar>

            <independentVar lookup="column">aero/alpha-deg</independentVar>

            <tableData>
                      -6.0      -2.0      2.0      10.0
                56.26640419947507    2.76e-05 2.72e-05 2.73e-05 6.80e-06
                95.6528871391076    2.76e-05 2.71e-05 2.73e-05 7.10e-06
                135.03937007874012    2.76e-05 2.73e-05 2.75e-05 6.70e-06
                </tableData>

        </table>

    </function>

    <function name="aero/coefficient/CMl__alpha_rad">

        <description>CMl__alpha_rad = dCMl__alpha_rad * alpha_rad</description>

        <product>

            <property>aero/coefficient/dCMl__alpha_rad</property>

            <property>aero/alpha-rad</property>

        </product>

    </function>

    <function name="aero/coefficient/dCMl__beta_rad">

        <description>dCMl__beta_rad</description>

        <table>

            <independentVar lookup="row">velocities/vt-fps</independentVar>

            <independentVar lookup="column">aero/alpha-deg</independentVar>

            <tableData>
                      -6.0      -2.0      2.0      10.0
                56.26640419947507     0.0082265 -0.0292955 -0.0660915 -0.0712901
                95.6528871391076     0.0084632 -0.0293384 -0.0662134 -0.0706649
                135.03937007874012     0.0063358 -0.0297759 -0.066758  -0.0711239
                </tableData>

        </table>

    </function>

    <function name="aero/coefficient/CMl__beta_rad">

        <description>CMl__beta_rad = dCMl__beta_rad * beta_rad</description>

        <product>

            <property>aero/coefficient/dCMl__beta_rad</property>

            <property>aero/beta-rad</property>

        </product>

    </function>

    <function name="aero/coefficient/dCMl__dpHat_rps">

        <description>dCMl__dpHat_rps</description>

        <table>

            <independentVar lookup="row">velocities/vt-fps</independentVar>

            <independentVar lookup="column">aero/alpha-deg</independentVar>

            <tableData>
                      -6.0      -2.0      2.0      10.0
                56.26640419947507    -0.5096065 -0.50814   -0.5066215 -0.1737838
                95.6528871391076    -0.5117397 -0.5094982 -0.5076763 -0.1717939
                135.03937007874012    -0.5153345 -0.5116728 -0.5095639 -0.1695316
                </tableData>

        </table>

    </function>

    <function name="aero/coefficient/CMl__dpHat_rps">

        <description>CMl__dpHat_rps = dCMl__dpHat_rps * dpHat_rps</description>

        <product>

            <property>aero/coefficient/dCMl__dpHat_rps</property>

            <property>velocities/p-aero-rad_sec</property>

            <property>aero/bi2vel</property>

        </product>

    </function>

    <function name="aero/coefficient/dCMl__dqHat_rps">

        <description>dCMl__dqHat_rps</description>

        <table>

            <independentVar lookup="row">velocities/vt-fps</independentVar>

            <independentVar lookup="column">aero/alpha-deg</independentVar>

            <tableData>
                      -6.0      -2.0      2.0      10.0
                56.26640419947507    6.10e-06 1.76e-05 1.77e-05 4.50e-06
                95.6528871391076    1.76e-05 1.67e-05 1.78e-05 5.10e-06
                135.03937007874012    2.69e-05 1.76e-05 1.78e-05 2.90e-06
                </tableData>

        </table>

    </function>

    <function name="aero/coefficient/CMl__dqHat_rps">

        <description>CMl__dqHat_rps = dCMl__dqHat_rps * dqHat_rps</description>

        <product>

            <property>aero/coefficient/dCMl__dqHat_rps</property>

            <property>velocities/q-aero-rad_sec</property>

            <property>aero/ci2vel</property>

        </product>

    </function>

    <function name="aero/coefficient/dCMl__drHat_rps">

        <description>dCMl__drHat_rps</description>

        <table>

            <independentVar lookup="row">velocities/vt-fps</independentVar>

            <independentVar lookup="column">aero/alpha-deg</independentVar>

            <tableData>
                      -6.0      -2.0      2.0      10.0
                56.26640419947507    -0.0659317 -0.0166779  0.0326589  0.0482825
                95.6528871391076    -0.0662999 -0.0167619  0.0327204  0.0476121
                135.03937007874012    -0.0668141 -0.0168043  0.0329263  0.0473538
                </tableData>

        </table>

    </function>

    <function name="aero/coefficient/CMl__drHat_rps">

        <description>CMl__drHat_rps = dCMl__drHat_rps * drHat_rps</description>

        <product>

            <property>aero/coefficient/dCMl__drHat_rps</property>

            <property>velocities/r-aero-rad_sec</property>

            <property>aero/bi2vel</property>

        </product>

    </function>

    <function name="aero/coefficient/dCMl__dTE1R_rad">

        <description>dCMl__dTE1R_rad</description>

        <table>

            <independentVar lookup="row">velocities/vt-fps</independentVar>

            <independentVar lookup="column">aero/alpha-deg</independentVar>

            <tableData>
                      -6.0      -2.0      2.0      10.0
                56.26640419947507    -0.0151172 -0.0152341 -0.0152465 -0.0018266
                95.6528871391076    -0.0152015 -0.0152712 -0.015274  -0.0016177
                135.03937007874012    -0.0152693 -0.0153289 -0.0153109 -0.0016315
                </tableData>

        </table>

    </function>

    <function name="aero/coefficient/CMl__dTE1R_rad">

        <description>CMl__dTE1R_rad = dCMl__dTE1R_rad * dTE1R_rad</description>

        <product>

            <property>aero/coefficient/dCMl__dTE1R_rad</property>

            <property>fcs/posTE1R_rad</property>

        </product>

    </function>

    <function name="aero/coefficient/dCMl__dTE1L_rad">

        <description>dCMl__dTE1L_rad</description>

        <table>

            <independentVar lookup="row">velocities/vt-fps</independentVar>

            <independentVar lookup="column">aero/alpha-deg</independentVar>

            <tableData>
                      -6.0      -2.0      2.0      10.0
                56.26640419947507    0.0151203 0.0152354 0.0152487 0.0018276
                95.6528871391076    0.0152048 0.0152723 0.0152808 0.0016191
                135.03937007874012    0.015267  0.0153311 0.0153115 0.001632
                </tableData>

        </table>

    </function>

    <function name="aero/coefficient/CMl__dTE1L_rad">

        <description>CMl__dTE1L_rad = dCMl__dTE1L_rad * dTE1L_rad</description>

        <product>

            <property>aero/coefficient/dCMl__dTE1L_rad</property>

            <property>fcs/posTE1L_rad</property>

        </product>

    </function>

    <function name="aero/coefficient/dCMl__dTE2R_rad">

        <description>dCMl__dTE2R_rad</description>

        <table>

            <independentVar lookup="row">velocities/vt-fps</independentVar>

            <independentVar lookup="column">aero/alpha-deg</independentVar>

            <tableData>
                      -6.0      -2.0      2.0      10.0
                56.26640419947507    -0.0298638 -0.0300158 -0.0300975 -0.0013199
                95.6528871391076    -0.030029  -0.0300988 -0.030121  -0.0012253
                135.03937007874012    -0.0301777 -0.0302317 -0.0302603 -0.0012346
                </tableData>

        </table>

    </function>

    <function name="aero/coefficient/CMl__dTE2R_rad">

        <description>CMl__dTE2R_rad = dCMl__dTE2R_rad * dTE2R_rad</description>

        <product>

            <property>aero/coefficient/dCMl__dTE2R_rad</property>

            <property>fcs/posTE2R_rad</property>

        </product>

    </function>

    <function name="aero/coefficient/dCMl__dTE2L_rad">

        <description>dCMl__dTE2L_rad</description>

        <table>

            <independentVar lookup="row">velocities/vt-fps</independentVar>

            <independentVar lookup="column">aero/alpha-deg</independentVar>

            <tableData>
                      -6.0      -2.0      2.0      10.0
                56.26640419947507    0.0298772 0.0300122 0.0300995 0.0013198
                95.6528871391076    0.0300319 0.030102  0.0301694 0.0012257
                135.03937007874012    0.0301801 0.0302337 0.0302624 0.0012351
                </tableData>

        </table>

    </function>

    <function name="aero/coefficient/CMl__dTE2L_rad">

        <description>CMl__dTE2L_rad = dCMl__dTE2L_rad * dTE2L_rad</description>

        <product>

            <property>aero/coefficient/dCMl__dTE2L_rad</property>

            <property>fcs/posTE2L_rad</property>

        </product>

    </function>

    <function name="aero/coefficient/dCMl__dTE3R_rad">

        <description>dCMl__dTE3R_rad</description>

        <table>

            <independentVar lookup="row">velocities/vt-fps</independentVar>

            <independentVar lookup="column">aero/alpha-deg</independentVar>

            <tableData>
                      -6.0      -2.0      2.0      10.0
                56.26640419947507    -0.0385559 -0.03865   -0.0388292 -0.0021609
                95.6528871391076    -0.038703  -0.0387468 -0.0389078 -0.0021381
                135.03937007874012    -0.0389094 -0.0389101 -0.0389877 -0.0021725
                </tableData>

        </table>

    </function>

    <function name="aero/coefficient/CMl__dTE3R_rad">

        <description>CMl__dTE3R_rad = dCMl__dTE3R_rad * dTE3R_rad</description>

        <product>

            <property>aero/coefficient/dCMl__dTE3R_rad</property>

            <property>fcs/posTE3R_rad</property>

        </product>

    </function>

    <function name="aero/coefficient/dCMl__dTE3L_rad">

        <description>dCMl__dTE3L_rad</description>

        <table>

            <independentVar lookup="row">velocities/vt-fps</independentVar>

            <independentVar lookup="column">aero/alpha-deg</independentVar>

            <tableData>
                      -6.0      -2.0      2.0      10.0
                56.26640419947507    0.038566  0.0386518 0.0388321 0.0021611
                95.6528871391076    0.0387576 0.0387475 0.0389095 0.0021364
                135.03937007874012    0.0389115 0.0389118 0.0389895 0.0021732
                </tableData>

        </table>

    </function>

    <function name="aero/coefficient/CMl__dTE3L_rad">

        <description>CMl__dTE3L_rad = dCMl__dTE3L_rad * dTE3L_rad</description>

        <product>

            <property>aero/coefficient/dCMl__dTE3L_rad</property>

            <property>fcs/posTE3L_rad</property>

        </product>

    </function>

    <function name="aero/coefficient/dCMl__dTE4R_rad">

        <description>dCMl__dTE4R_rad</description>

        <table>

            <independentVar lookup="row">velocities/vt-fps</independentVar>

            <independentVar lookup="column">aero/alpha-deg</independentVar>

            <tableData>
                      -6.0      -2.0      2.0      10.0
                56.26640419947507    -0.0453772 -0.0454421 -0.045762  -0.0049157
                95.6528871391076    -0.0455388 -0.0455441 -0.0458483 -0.0049043
                135.03937007874012    -0.0457291 -0.0457091 -0.0458991 -0.0049547
                </tableData>

        </table>

    </function>

    <function name="aero/coefficient/CMl__dTE4R_rad">

        <description>CMl__dTE4R_rad = dCMl__dTE4R_rad * dTE4R_rad</description>

        <product>

            <property>aero/coefficient/dCMl__dTE4R_rad</property>

            <property>fcs/posTE4R_rad</property>

        </product>

    </function>

    <function name="aero/coefficient/dCMl__dTE4L_rad">

        <description>dCMl__dTE4L_rad</description>

        <table>

            <independentVar lookup="row">velocities/vt-fps</independentVar>

            <independentVar lookup="column">aero/alpha-deg</independentVar>

            <tableData>
                      -6.0      -2.0      2.0      10.0
                56.26640419947507    0.0453744 0.0454435 0.0457637 0.0049161
                95.6528871391076    0.0455411 0.0455446 0.0458499 0.0049042
                135.03937007874012    0.0457309 0.0457104 0.0459008 0.0049549
                </tableData>

        </table>

    </function>

    <function name="aero/coefficient/CMl__dTE4L_rad">

        <description>CMl__dTE4L_rad = dCMl__dTE4L_rad * dTE4L_rad</description>

        <product>

            <property>aero/coefficient/dCMl__dTE4L_rad</property>

            <property>fcs/posTE4L_rad</property>

        </product>

    </function>

    <function name="aero/coefficient/dCMl__dTE5R_rad">

        <description>dCMl__dTE5R_rad</description>

        <table>

            <independentVar lookup="row">velocities/vt-fps</independentVar>

            <independentVar lookup="column">aero/alpha-deg</independentVar>

            <tableData>
                      -6.0      -2.0      2.0      10.0
                56.26640419947507    -0.048151  -0.0482542 -0.0488407 -0.02343
                95.6528871391076    -0.0482946 -0.0483425 -0.04891   -0.0229256
                135.03937007874012    -0.0482661 -0.0484256 -0.0490655 -0.0229716
                </tableData>

        </table>

    </function>

    <function name="aero/coefficient/CMl__dTE5R_rad">

        <description>CMl__dTE5R_rad = dCMl__dTE5R_rad * dTE5R_rad</description>

        <product>

            <property>aero/coefficient/dCMl__dTE5R_rad</property>

            <property>fcs/posTE5R_rad</property>

        </product>

    </function>

    <function name="aero/coefficient/dCMl__dTE5L_rad">

        <description>dCMl__dTE5L_rad</description>

        <table>

            <independentVar lookup="row">velocities/vt-fps</independentVar>

            <independentVar lookup="column">aero/alpha-deg</independentVar>

            <tableData>
                      -6.0      -2.0      2.0      10.0
                56.26640419947507    0.0481529 0.0482556 0.0488453 0.023431
                95.6528871391076    0.048297  0.0483431 0.0489119 0.0229262
                135.03937007874012    0.0482677 0.048427  0.0490671 0.0229714
                </tableData>

        </table>

    </function>

    <function name="aero/coefficient/CMl__dTE5L_rad">

        <description>CMl__dTE5L_rad = dCMl__dTE5L_rad * dTE5L_rad</description>

        <product>

            <property>aero/coefficient/dCMl__dTE5L_rad</property>

            <property>fcs/posTE5L_rad</property>

        </product>

    </function>

    <function name="aero/coefficient/dCMl__dLER_rad">

        <description>dCMl__dLER_rad</description>

        <table>

            <independentVar lookup="row">velocities/vt-fps</independentVar>

            <independentVar lookup="column">aero/alpha-deg</independentVar>

            <tableData>
                      -6.0      -2.0      2.0      10.0
                56.26640419947507    0.0040265 0.0038378 0.0039127 0.0017207
                95.6528871391076    0.0040805 0.0038818 0.0039198 0.0013921
                135.03937007874012    0.0042015 0.0039613 0.0039058 0.0015652
                </tableData>

        </table>

    </function>

    <function name="aero/coefficient/CMl__dLER_rad">

        <description>CMl__dLER_rad = dCMl__dLER_rad * dLER_rad</description>

        <product>

            <property>aero/coefficient/dCMl__dLER_rad</property>

            <property>fcs/posLER_rad</property>

        </product>

    </function>

    <function name="aero/coefficient/dCMl__dLEL_rad">

        <description>dCMl__dLEL_rad</description>

        <table>

            <independentVar lookup="row">velocities/vt-fps</independentVar>

            <independentVar lookup="column">aero/alpha-deg</independentVar>

            <tableData>
                      -6.0      -2.0      2.0      10.0
                56.26640419947507    -0.0040282 -0.003838  -0.0039129 -0.0017211
                95.6528871391076    -0.0041064 -0.0038831 -0.0039224 -0.0014024
                135.03937007874012    -0.0042077 -0.0039622 -0.0039059 -0.0015648
                </tableData>

        </table>

    </function>

    <function name="aero/coefficient/CMl__dLEL_rad">

        <description>CMl__dLEL_rad = dCMl__dLEL_rad * dLEL_rad</description>

        <product>

            <property>aero/coefficient/dCMl__dLEL_rad</property>

            <property>fcs/posLEL_rad</property>

        </product>

    </function>

    <function name="aero/coefficient/CMl">

        <description>CMl summation</description>

        <sum>

            <property>aero/coefficient/CMl__zero</property>

            <property>aero/coefficient/CMl__alpha_rad</property>

            <property>aero/coefficient/CMl__beta_rad</property>

            <property>aero/coefficient/CMl__dpHat_rps</property>

            <property>aero/coefficient/CMl__dqHat_rps</property>

            <property>aero/coefficient/CMl__drHat_rps</property>

            <property>aero/coefficient/CMl__dTE1R_rad</property>

            <property>aero/coefficient/CMl__dTE1L_rad</property>

            <property>aero/coefficient/CMl__dTE2R_rad</property>

            <property>aero/coefficient/CMl__dTE2L_rad</property>

            <property>aero/coefficient/CMl__dTE3R_rad</property>

            <property>aero/coefficient/CMl__dTE3L_rad</property>

            <property>aero/coefficient/CMl__dTE4R_rad</property>

            <property>aero/coefficient/CMl__dTE4L_rad</property>

            <property>aero/coefficient/CMl__dTE5R_rad</property>

            <property>aero/coefficient/CMl__dTE5L_rad</property>

            <property>aero/coefficient/CMl__dLER_rad</property>

            <property>aero/coefficient/CMl__dLEL_rad</property>

        </sum>

    </function>

    <function name="aero/coefficient/CMm__zero">

        <description>CMm__zero</description>

        <table>

            <independentVar lookup="row">velocities/vt-fps</independentVar>

            <independentVar lookup="column">aero/alpha-deg</independentVar>

            <tableData>
                      -6.0      -2.0      2.0      10.0
                56.26640419947507     0.0145777   0.01269904  0.01198084 -0.04422995
                95.6528871391076     0.01463693  0.01272468  0.01199158 -0.04403288
                135.03937007874012     0.01467981  0.0127582   0.0120175  -0.04269944
                </tableData>

        </table>

    </function>

    <function name="aero/coefficient/dCMm__alpha_rad">

        <description>dCMm__alpha_rad</description>

        <table>

            <independentVar lookup="row">velocities/vt-fps</independentVar>

            <independentVar lookup="column">aero/alpha-deg</independentVar>

            <tableData>
                      -6.0      -2.0      2.0      10.0
                56.26640419947507    -0.0213331 -0.0534014 -0.0165996  0.3276193
                95.6528871391076    -0.0212832 -0.0539131 -0.016578   0.3282789
                135.03937007874012    -0.022627  -0.0552418 -0.0169853  0.3233942
                </tableData>

        </table>

    </function>

    <function name="aero/coefficient/CMm__alpha_rad">

        <description>CMm__alpha_rad = dCMm__alpha_rad * alpha_rad</description>

        <product>

            <property>aero/coefficient/dCMm__alpha_rad</property>

            <property>aero/alpha-rad</property>

        </product>

    </function>

    <function name="aero/coefficient/dCMm__beta_rad">

        <description>dCMm__beta_rad</description>

        <table>

            <independentVar lookup="row">velocities/vt-fps</independentVar>

            <independentVar lookup="column">aero/alpha-deg</independentVar>

            <tableData>
                      -6.0      -2.0      2.0      10.0
                56.26640419947507    -0.0080771 -0.0047008 -0.0039029  0.0025454
                95.6528871391076    -0.0080698 -0.0046958 -0.0038827  0.0010946
                135.03937007874012    -0.0074245 -0.0042083 -0.0038706 -0.0095947
                </tableData>

        </table>

    </function>

    <function name="aero/coefficient/CMm__beta_rad">

        <description>CMm__beta_rad = dCMm__beta_rad * beta_rad</description>

        <product>

            <property>aero/coefficient/dCMm__beta_rad</property>

            <property>aero/beta-rad</property>

        </product>

    </function>
    <function name="aero/coefficient/dCMm__dpHat_rps">

        <description>dCMm__dpHat_rps</description>

        <table>

            <independentVar lookup="row">velocities/vt-fps</independentVar>

            <independentVar lookup="column">aero/alpha-deg</independentVar>

            <tableData>
                      -6.0      -2.0      2.0      10.0
                56.26640419947507    -1.448000e-04 -1.324400e-03  1.158000e-04  1.670567e-01
                95.6528871391076    -2.970000e-05 -1.128000e-03  3.550000e-05  1.664408e-01
                135.03937007874012     2.515000e-04 -7.514000e-04 -3.460000e-05  1.640196e-01
                </tableData>

        </table>

    </function>

    <function name="aero/coefficient/CMm__dpHat_rps">

        <description>CMm__dpHat_rps = dCMm__dpHat_rps * dpHat_rps</description>

        <product>

            <property>aero/coefficient/dCMm__dpHat_rps</property>

            <property>velocities/p-aero-rad_sec</property>

            <property>aero/bi2vel</property>

        </product>

    </function>

    <function name="aero/coefficient/dCMm__dqHat_rps">

        <description>dCMm__dqHat_rps</description>

        <table>

            <independentVar lookup="row">velocities/vt-fps</independentVar>

            <independentVar lookup="column">aero/alpha-deg</independentVar>

            <tableData>
                      -6.0      -2.0      2.0      10.0
                56.26640419947507    -1.2285105 -1.1624721 -1.1501964 -0.6140456
                95.6528871391076    -1.2331475 -1.165075  -1.1524187 -0.6153387
                135.03937007874012    -1.243357  -1.1687487 -1.1562171 -0.630688
                </tableData>

        </table>

    </function>

    <function name="aero/coefficient/CMm__dqHat_rps">

        <description>CMm__dqHat_rps = dCMm__dqHat_rps * dqHat_rps</description>

        <product>

            <property>aero/coefficient/dCMm__dqHat_rps</property>

            <property>velocities/q-aero-rad_sec</property>

            <property>aero/ci2vel</property>

        </product>

    </function>

    <function name="aero/coefficient/dCMm__drHat_rps">

        <description>dCMm__drHat_rps</description>

        <table>

            <independentVar lookup="row">velocities/vt-fps</independentVar>

            <independentVar lookup="column">aero/alpha-deg</independentVar>

            <tableData>
                      -6.0      -2.0      2.0      10.0
                56.26640419947507    -0.0027059 -0.0030419 -0.0026933  0.00881
                95.6528871391076    -0.0027174 -0.0030333 -0.0026902  0.0083522
                135.03937007874012    -0.0024748 -0.0029397 -0.0027479  0.0062857
                </tableData>

        </table>

    </function>

    <function name="aero/coefficient/CMm__drHat_rps">

        <description>CMm__drHat_rps = dCMm__drHat_rps * drHat_rps</description>

        <product>

            <property>aero/coefficient/dCMm__drHat_rps</property>

            <property>velocities/r-aero-rad_sec</property>

            <property>aero/bi2vel</property>

        </product>

    </function>

    <function name="aero/coefficient/dCMm__dTE1R_rad">

        <description>dCMm__dTE1R_rad</description>

        <table>

            <independentVar lookup="row">velocities/vt-fps</independentVar>

            <independentVar lookup="column">aero/alpha-deg</independentVar>

            <tableData>
                      -6.0      -2.0      2.0      10.0
                56.26640419947507     0.0043437  0.0051203  0.0054655 -0.0106867
                95.6528871391076     0.0043296  0.005095   0.0054502 -0.0114837
                135.03937007874012     0.0043517  0.0050416  0.0054353 -0.0119224
                </tableData>

        </table>

    </function>

    <function name="aero/coefficient/CMm__dTE1R_rad">

        <description>CMm__dTE1R_rad = dCMm__dTE1R_rad * dTE1R_rad</description>

        <product>

            <property>aero/coefficient/dCMm__dTE1R_rad</property>

            <property>fcs/posTE1R_rad</property>

        </product>

    </function>

    <function name="aero/coefficient/dCMm__dTE1L_rad">

        <description>dCMm__dTE1L_rad</description>

        <table>

            <independentVar lookup="row">velocities/vt-fps</independentVar>

            <independentVar lookup="column">aero/alpha-deg</independentVar>

            <tableData>
                      -6.0      -2.0      2.0      10.0
                56.26640419947507     0.0043428  0.0051202  0.0054655 -0.0106867
                95.6528871391076     0.0043291  0.0050955  0.0054484 -0.011484
                135.03937007874012     0.0043524  0.0050416  0.0054361 -0.0119204
                </tableData>

        </table>

    </function>

    <function name="aero/coefficient/CMm__dTE1L_rad">

        <description>CMm__dTE1L_rad = dCMm__dTE1L_rad * dTE1L_rad</description>

        <product>

            <property>aero/coefficient/dCMm__dTE1L_rad</property>

            <property>fcs/posTE1L_rad</property>

        </product>

    </function>

    <function name="aero/coefficient/dCMm__dTE2R_rad">

        <description>dCMm__dTE2R_rad</description>

        <table>

            <independentVar lookup="row">velocities/vt-fps</independentVar>

            <independentVar lookup="column">aero/alpha-deg</independentVar>

            <tableData>
                      -6.0      -2.0      2.0      10.0
                56.26640419947507    -0.0114646 -0.0113026 -0.0109513 -0.0092537
                95.6528871391076    -0.0115335 -0.0113472 -0.0107012 -0.0094056
                135.03937007874012    -0.0115624 -0.0114505 -0.0110366 -0.0098639
                </tableData>

        </table>

    </function>

    <function name="aero/coefficient/CMm__dTE2R_rad">

        <description>CMm__dTE2R_rad = dCMm__dTE2R_rad * dTE2R_rad</description>

        <product>

            <property>aero/coefficient/dCMm__dTE2R_rad</property>

            <property>fcs/posTE2R_rad</property>

        </product>

    </function>

    <function name="aero/coefficient/dCMm__dTE2L_rad">

        <description>dCMm__dTE2L_rad</description>

        <table>

            <independentVar lookup="row">velocities/vt-fps</independentVar>

            <independentVar lookup="column">aero/alpha-deg</independentVar>

            <tableData>
                      -6.0      -2.0      2.0      10.0
                56.26640419947507    -0.0114647 -0.0113029 -0.0109513 -0.0092531
                95.6528871391076    -0.0115329 -0.0113474 -0.0109938 -0.0094045
                135.03937007874012    -0.0115623 -0.0114505 -0.0110366 -0.0098645
                </tableData>

        </table>

    </function>

    <function name="aero/coefficient/CMm__dTE2L_rad">

        <description>CMm__dTE2L_rad = dCMm__dTE2L_rad * dTE2L_rad</description>

        <product>

            <property>aero/coefficient/dCMm__dTE2L_rad</property>

            <property>fcs/posTE2L_rad</property>

        </product>

    </function>

    <function name="aero/coefficient/dCMm__dTE3R_rad">

        <description>dCMm__dTE3R_rad</description>

        <table>

            <independentVar lookup="row">velocities/vt-fps</independentVar>

            <independentVar lookup="column">aero/alpha-deg</independentVar>

            <tableData>
                      -6.0      -2.0      2.0      10.0
                56.26640419947507    -0.0396612 -0.039674  -0.0395742 -0.0144008
                95.6528871391076    -0.0397914 -0.0397728 -0.0396606 -0.014268
                135.03937007874012    -0.0399617 -0.039973  -0.039751  -0.0146172
                </tableData>

        </table>

    </function>

    <function name="aero/coefficient/CMm__dTE3R_rad">

        <description>CMm__dTE3R_rad = dCMm__dTE3R_rad * dTE3R_rad</description>

        <product>

            <property>aero/coefficient/dCMm__dTE3R_rad</property>

            <property>fcs/posTE3R_rad</property>

        </product>

    </function>

    <function name="aero/coefficient/dCMm__dTE3L_rad">

        <description>dCMm__dTE3L_rad</description>

        <table>

            <independentVar lookup="row">velocities/vt-fps</independentVar>

            <independentVar lookup="column">aero/alpha-deg</independentVar>

            <tableData>
                      -6.0      -2.0      2.0      10.0
                56.26640419947507    -0.0396612 -0.0396741 -0.0395748 -0.0144008
                95.6528871391076    -0.0398349 -0.0397726 -0.0396606 -0.0142636
                135.03937007874012    -0.0399617 -0.0399723 -0.039751  -0.0146148
                </tableData>

        </table>

    </function>

    <function name="aero/coefficient/CMm__dTE3L_rad">

        <description>CMm__dTE3L_rad = dCMm__dTE3L_rad * dTE3L_rad</description>

        <product>

            <property>aero/coefficient/dCMm__dTE3L_rad</property>

            <property>fcs/posTE3L_rad</property>

        </product>

    </function>

    <function name="aero/coefficient/dCMm__dTE4R_rad">

        <description>dCMm__dTE4R_rad</description>

        <table>

            <independentVar lookup="row">velocities/vt-fps</independentVar>

            <independentVar lookup="column">aero/alpha-deg</independentVar>

            <tableData>
                      -6.0      -2.0      2.0      10.0
                56.26640419947507    -0.0628764 -0.0644537 -0.0631746 -0.0202706
                95.6528871391076    -0.0630712 -0.0645945 -0.0632879 -0.0202043
                135.03937007874012    -0.0633365 -0.0634894 -0.0634011 -0.0204936
                </tableData>

        </table>

    </function>

    <function name="aero/coefficient/CMm__dTE4R_rad">

        <description>CMm__dTE4R_rad = dCMm__dTE4R_rad * dTE4R_rad</description>

        <product>

            <property>aero/coefficient/dCMm__dTE4R_rad</property>

            <property>fcs/posTE4R_rad</property>

        </product>

    </function>

    <function name="aero/coefficient/dCMm__dTE4L_rad">

        <description>dCMm__dTE4L_rad</description>

        <table>

            <independentVar lookup="row">velocities/vt-fps</independentVar>

            <independentVar lookup="column">aero/alpha-deg</independentVar>

            <tableData>
                      -6.0      -2.0      2.0      10.0
                56.26640419947507    -0.0628798 -0.0644539 -0.0631734 -0.0202708
                95.6528871391076    -0.0630713 -0.0645977 -0.0632882 -0.0202052
                135.03937007874012    -0.063336  -0.0634897 -0.0634011 -0.0204936
                </tableData>

        </table>

    </function>

    <function name="aero/coefficient/CMm__dTE4L_rad">

        <description>CMm__dTE4L_rad = dCMm__dTE4L_rad * dTE4L_rad</description>

        <product>

            <property>aero/coefficient/dCMm__dTE4L_rad</property>

            <property>fcs/posTE4L_rad</property>

        </product>

    </function>

    <function name="aero/coefficient/dCMm__dTE5R_rad">

        <description>dCMm__dTE5R_rad</description>

        <table>

            <independentVar lookup="row">velocities/vt-fps</independentVar>

            <independentVar lookup="column">aero/alpha-deg</independentVar>

            <tableData>
                      -6.0      -2.0      2.0      10.0
                56.26640419947507    -0.0796407 -0.0814049 -0.0803469 -0.0497176
                95.6528871391076    -0.0798169 -0.081533  -0.0804477 -0.0491068
                135.03937007874012    -0.0800065 -0.081986  -0.0808624 -0.049242
                </tableData>

        </table>

    </function>

    <function name="aero/coefficient/CMm__dTE5R_rad">

        <description>CMm__dTE5R_rad = dCMm__dTE5R_rad * dTE5R_rad</description>

        <product>

            <property>aero/coefficient/dCMm__dTE5R_rad</property>

            <property>fcs/posTE5R_rad</property>

        </product>

    </function>

    <function name="aero/coefficient/dCMm__dTE5L_rad">

        <description>dCMm__dTE5L_rad</description>

        <table>

            <independentVar lookup="row">velocities/vt-fps</independentVar>

            <independentVar lookup="column">aero/alpha-deg</independentVar>

            <tableData>
                      -6.0      -2.0      2.0      10.0
                56.26640419947507    -0.0796415 -0.0814047 -0.0803491 -0.049718
                95.6528871391076    -0.0798173 -0.0815337 -0.0804478 -0.0491069
                135.03937007874012    -0.0800063 -0.0819863 -0.0808624 -0.0492332
                </tableData>

        </table>

    </function>

    <function name="aero/coefficient/CMm__dTE5L_rad">

        <description>CMm__dTE5L_rad = dCMm__dTE5L_rad * dTE5L_rad</description>

        <product>

            <property>aero/coefficient/dCMm__dTE5L_rad</property>

            <property>fcs/posTE5L_rad</property>

        </product>

    </function>

    <function name="aero/coefficient/dCMm__dLER_rad">

        <description>dCMm__dLER_rad</description>

        <table>

            <independentVar lookup="row">velocities/vt-fps</independentVar>

            <independentVar lookup="column">aero/alpha-deg</independentVar>

            <tableData>
                      -6.0      -2.0      2.0      10.0
                56.26640419947507     0.0014326  0.0011938  0.0011932 -0.0010288
                95.6528871391076     0.001482   0.0012401  0.0011884 -0.0015161
                135.03937007874012     0.0016144  0.0013236  0.0011555 -0.0012536
                </tableData>

        </table>

    </function>

    <function name="aero/coefficient/CMm__dLER_rad">

        <description>CMm__dLER_rad = dCMm__dLER_rad * dLER_rad</description>

        <product>

            <property>aero/coefficient/dCMm__dLER_rad</property>

            <property>fcs/posLER_rad</property>

        </product>

    </function>

    <function name="aero/coefficient/dCMm__dLEL_rad">

        <description>dCMm__dLEL_rad</description>

        <table>

            <independentVar lookup="row">velocities/vt-fps</independentVar>

            <independentVar lookup="column">aero/alpha-deg</independentVar>

            <tableData>
                      -6.0      -2.0      2.0      10.0
                56.26640419947507     0.0014373  0.0011938  0.0011931 -0.0010276
                95.6528871391076     0.0014602  0.00124    0.0011857 -0.0014949
                135.03937007874012     0.0016143  0.0013232  0.0011554 -0.001255
                </tableData>

        </table>

    </function>

    <function name="aero/coefficient/CMm__dLEL_rad">

        <description>CMm__dLEL_rad = dCMm__dLEL_rad * dLEL_rad</description>

        <product>

            <property>aero/coefficient/dCMm__dLEL_rad</property>

            <property>fcs/posLEL_rad</property>

        </product>

    </function>

    <function name="aero/coefficient/CMm">

        <description>CMm summation</description>

        <sum>

            <property>aero/coefficient/CMm__zero</property>

            <property>aero/coefficient/CMm__alpha_rad</property>

            <property>aero/coefficient/CMm__beta_rad</property>

            <property>aero/coefficient/CMm__dpHat_rps</property>

            <property>aero/coefficient/CMm__dqHat_rps</property>

            <property>aero/coefficient/CMm__drHat_rps</property>

            <property>aero/coefficient/CMm__dTE1R_rad</property>

            <property>aero/coefficient/CMm__dTE1L_rad</property>

            <property>aero/coefficient/CMm__dTE2R_rad</property>

            <property>aero/coefficient/CMm__dTE2L_rad</property>

            <property>aero/coefficient/CMm__dTE3R_rad</property>

            <property>aero/coefficient/CMm__dTE3L_rad</property>

            <property>aero/coefficient/CMm__dTE4R_rad</property>

            <property>aero/coefficient/CMm__dTE4L_rad</property>

            <property>aero/coefficient/CMm__dTE5R_rad</property>

            <property>aero/coefficient/CMm__dTE5L_rad</property>

            <property>aero/coefficient/CMm__dLER_rad</property>

            <property>aero/coefficient/CMm__dLEL_rad</property>

        </sum>

    </function>

    <function name="aero/coefficient/CMn__zero">

        <description>CMn__zero</description>

        <table>

            <independentVar lookup="row">velocities/vt-fps</independentVar>

            <independentVar lookup="column">aero/alpha-deg</independentVar>

            <tableData>
                      -6.0      -2.0      2.0      10.0
                56.26640419947507    -2.50294947e-07 -4.18879020e-08 -6.63225116e-08 -4.57718232e-08
                95.6528871391076    -2.50294947e-07 -3.83972435e-08 -6.63225116e-08 -8.06784083e-08
                135.03937007874012    -2.50294947e-07 -4.18879020e-08 -6.63225116e-08 -9.81317008e-08
                </tableData>

        </table>

    </function>

    <function name="aero/coefficient/dCMn__alpha_rad">

        <description>dCMn__alpha_rad</description>

        <table>

            <independentVar lookup="row">velocities/vt-fps</independentVar>

            <independentVar lookup="column">aero/alpha-deg</independentVar>

            <tableData>
                      -6.0      -2.0      2.0      10.0
                56.26640419947507    -4.3e-06 -1.2e-06  1.9e-06  3.7e-06
                95.6528871391076    -4.3e-06 -1.1e-06  1.9e-06  3.9e-06
                135.03937007874012    -4.3e-06 -1.2e-06  1.9e-06  4.0e-06
                </tableData>

        </table>

    </function>

    <function name="aero/coefficient/CMn__alpha_rad">

        <description>CMn__alpha_rad = dCMn__alpha_rad * alpha_rad</description>

        <product>

            <property>aero/coefficient/dCMn__alpha_rad</property>

            <property>aero/alpha-rad</property>

        </product>

    </function>

    <function name="aero/coefficient/dCMn__beta_rad">

        <description>dCMn__beta_rad</description>

        <table>

            <independentVar lookup="row">velocities/vt-fps</independentVar>

            <independentVar lookup="column">aero/alpha-deg</independentVar>

            <tableData>
                      -6.0      -2.0      2.0      10.0
                56.26640419947507    0.0546829 0.0434089 0.0308372 0.0251246
                95.6528871391076    0.0547534 0.0434678 0.030865  0.0254562
                135.03937007874012    0.0509028 0.042604  0.0325644 0.0369301
                </tableData>

        </table>

    </function>

    <function name="aero/coefficient/CMn__beta_rad">

        <description>CMn__beta_rad = dCMn__beta_rad * beta_rad</description>

        <product>

            <property>aero/coefficient/dCMn__beta_rad</property>

            <property>aero/beta-rad</property>

        </product>

    </function>

    <function name="aero/coefficient/dCMn__dpHat_rps">

        <description>dCMn__dpHat_rps</description>

        <table>

            <independentVar lookup="row">velocities/vt-fps</independentVar>

            <independentVar lookup="column">aero/alpha-deg</independentVar>

            <tableData>
                      -6.0      -2.0      2.0      10.0
                56.26640419947507     0.1350502  0.0587806 -0.0161893 -0.0954561
                95.6528871391076     0.1354431  0.0589141 -0.0162049 -0.095089
                135.03937007874012     0.1348599  0.0587102 -0.0154279 -0.0911372
                </tableData>

        </table>

    </function>

    <function name="aero/coefficient/CMn__dpHat_rps">

        <description>CMn__dpHat_rps = dCMn__dpHat_rps * dpHat_rps</description>

        <product>

            <property>aero/coefficient/dCMn__dpHat_rps</property>

            <property>velocities/p-aero-rad_sec</property>

            <property>aero/bi2vel</property>

        </product>

    </function>

    <function name="aero/coefficient/dCMn__dqHat_rps">

        <description>dCMn__dqHat_rps</description>

        <table>

            <independentVar lookup="row">velocities/vt-fps</independentVar>

            <independentVar lookup="column">aero/alpha-deg</independentVar>

            <tableData>
                      -6.0      -2.0      2.0      10.0
                56.26640419947507     3.2e-06 -7.0e-07  6.0e-07  2.4e-06
                95.6528871391076    -2.1e-06 -3.0e-07  6.0e-07 -3.3e-06
                135.03937007874012    -4.8e-06 -7.0e-07  6.0e-07  3.0e-07
                </tableData>

        </table>

    </function>

    <function name="aero/coefficient/CMn__dqHat_rps">

        <description>CMn__dqHat_rps = dCMn__dqHat_rps * dqHat_rps</description>

        <product>

            <property>aero/coefficient/dCMn__dqHat_rps</property>

            <property>velocities/q-aero-rad_sec</property>

            <property>aero/ci2vel</property>

        </product>

    </function>

    <function name="aero/coefficient/dCMn__drHat_rps">

        <description>dCMn__drHat_rps</description>

        <table>

            <independentVar lookup="row">velocities/vt-fps</independentVar>

            <independentVar lookup="column">aero/alpha-deg</independentVar>

            <tableData>
                      -6.0      -2.0      2.0      10.0
                56.26640419947507    -0.0164602 -0.0149874 -0.0133042 -0.0232996
                95.6528871391076    -0.0164711 -0.0150025 -0.013319  -0.0234593
                135.03937007874012    -0.0154759 -0.0147407 -0.0137634 -0.026406
                </tableData>

        </table>

    </function>

    <function name="aero/coefficient/CMn__drHat_rps">

        <description>CMn__drHat_rps = dCMn__drHat_rps * drHat_rps</description>

        <product>

            <property>aero/coefficient/dCMn__drHat_rps</property>

            <property>velocities/r-aero-rad_sec</property>

            <property>aero/bi2vel</property>

        </product>

    </function>

    <function name="aero/coefficient/dCMn__dTE1R_rad">

        <description>dCMn__dTE1R_rad</description>

        <table>

            <independentVar lookup="row">velocities/vt-fps</independentVar>

            <independentVar lookup="column">aero/alpha-deg</independentVar>

            <tableData>
                      -6.0      -2.0      2.0      10.0
                56.26640419947507     0.0012994  0.0005688 -0.0001591  0.0002406
                95.6528871391076     0.0013194  0.0005713 -0.0001588  0.0002696
                135.03937007874012     0.0013189  0.0005752 -0.0001575  0.0002742
                </tableData>

        </table>

    </function>

    <function name="aero/coefficient/CMn__dTE1R_rad">

        <description>CMn__dTE1R_rad = dCMn__dTE1R_rad * dTE1R_rad</description>

        <product>

            <property>aero/coefficient/dCMn__dTE1R_rad</property>

            <property>fcs/posTE1R_rad</property>

        </product>

    </function>

    <function name="aero/coefficient/dCMn__dTE1L_rad">

        <description>dCMn__dTE1L_rad</description>

        <table>

            <independentVar lookup="row">velocities/vt-fps</independentVar>

            <independentVar lookup="column">aero/alpha-deg</independentVar>

            <tableData>
                      -6.0      -2.0      2.0      10.0
                56.26640419947507    -0.0012997 -0.0005685  0.0001592 -0.0002406
                95.6528871391076    -0.0013197 -0.0005708  0.0001585 -0.0002687
                135.03937007874012    -0.0013165 -0.0005752  0.0001576 -0.0002742
                </tableData>

        </table>

    </function>

    <function name="aero/coefficient/CMn__dTE1L_rad">

        <description>CMn__dTE1L_rad = dCMn__dTE1L_rad * dTE1L_rad</description>

        <product>

            <property>aero/coefficient/dCMn__dTE1L_rad</property>

            <property>fcs/posTE1L_rad</property>

        </product>

    </function>

    <function name="aero/coefficient/dCMn__dTE2R_rad">

        <description>dCMn__dTE2R_rad</description>

        <table>

            <independentVar lookup="row">velocities/vt-fps</independentVar>

            <independentVar lookup="column">aero/alpha-deg</independentVar>

            <tableData>
                      -6.0      -2.0      2.0      10.0
                56.26640419947507     0.0029801  0.0011763 -0.0006441  0.000334
                95.6528871391076     0.00301    0.0011801 -0.0006432  0.0002599
                135.03937007874012     0.0030028  0.0011851 -0.0006375  0.0003293
                </tableData>

        </table>

    </function>

    <function name="aero/coefficient/CMn__dTE2R_rad">

        <description>CMn__dTE2R_rad = dCMn__dTE2R_rad * dTE2R_rad</description>

        <product>

            <property>aero/coefficient/dCMn__dTE2R_rad</property>

            <property>fcs/posTE2R_rad</property>

        </product>

    </function>

    <function name="aero/coefficient/dCMn__dTE2L_rad">

        <description>dCMn__dTE2L_rad</description>

        <table>

            <independentVar lookup="row">velocities/vt-fps</independentVar>

            <independentVar lookup="column">aero/alpha-deg</independentVar>

            <tableData>
                      -6.0      -2.0      2.0      10.0
                56.26640419947507    -0.002983  -0.0011739  0.0006442 -0.0003347
                95.6528871391076    -0.0030102 -0.0011806  0.0006439 -0.0002598
                135.03937007874012    -0.003003  -0.0011851  0.0006376 -0.000329
                </tableData>

        </table>

    </function>

    <function name="aero/coefficient/CMn__dTE2L_rad">

        <description>CMn__dTE2L_rad = dCMn__dTE2L_rad * dTE2L_rad</description>

        <product>

            <property>aero/coefficient/dCMn__dTE2L_rad</property>

            <property>fcs/posTE2L_rad</property>

        </product>

    </function>

    <function name="aero/coefficient/dCMn__dTE3R_rad">

        <description>dCMn__dTE3R_rad</description>

        <table>

            <independentVar lookup="row">velocities/vt-fps</independentVar>

            <independentVar lookup="column">aero/alpha-deg</independentVar>

            <tableData>
                      -6.0      -2.0      2.0      10.0
                56.26640419947507     0.0038526  0.0016364 -0.0006024  0.0008828
                95.6528871391076     0.0038664  0.0016412 -0.000601   0.000782
                135.03937007874012     0.0038605  0.0016479 -0.0006014  0.0008951
                </tableData>

        </table>

    </function>

    <function name="aero/coefficient/CMn__dTE3R_rad">

        <description>CMn__dTE3R_rad = dCMn__dTE3R_rad * dTE3R_rad</description>

        <product>

            <property>aero/coefficient/dCMn__dTE3R_rad</property>

            <property>fcs/posTE3R_rad</property>

        </product>

    </function>

    <function name="aero/coefficient/dCMn__dTE3L_rad">

        <description>dCMn__dTE3L_rad</description>

        <table>

            <independentVar lookup="row">velocities/vt-fps</independentVar>

            <independentVar lookup="column">aero/alpha-deg</independentVar>

            <tableData>
                      -6.0      -2.0      2.0      10.0
                56.26640419947507    -0.0038542 -0.0016365  0.0006022 -0.0008834
                95.6528871391076    -0.0038856 -0.0016408  0.000601  -0.0007814
                135.03937007874012    -0.0038607 -0.0016479  0.0006014 -0.0008969
                </tableData>

        </table>

    </function>

    <function name="aero/coefficient/CMn__dTE3L_rad">

        <description>CMn__dTE3L_rad = dCMn__dTE3L_rad * dTE3L_rad</description>

        <product>

            <property>aero/coefficient/dCMn__dTE3L_rad</property>

            <property>fcs/posTE3L_rad</property>

        </product>

    </function>

    <function name="aero/coefficient/dCMn__dTE4R_rad">

        <description>dCMn__dTE4R_rad</description>

        <table>

            <independentVar lookup="row">velocities/vt-fps</independentVar>

            <independentVar lookup="column">aero/alpha-deg</independentVar>

            <tableData>
                      -6.0      -2.0      2.0      10.0
                56.26640419947507     0.0046131  0.0022677 -0.000132   0.0015906
                95.6528871391076     0.0046212  0.0022743 -0.0001282  0.0015644
                135.03937007874012     0.0045681  0.0022652 -0.0001085  0.0017746
                </tableData>

        </table>

    </function>

    <function name="aero/coefficient/CMn__dTE4R_rad">

        <description>CMn__dTE4R_rad = dCMn__dTE4R_rad * dTE4R_rad</description>

        <product>

            <property>aero/coefficient/dCMn__dTE4R_rad</property>

            <property>fcs/posTE4R_rad</property>

        </product>

    </function>

    <function name="aero/coefficient/dCMn__dTE4L_rad">

        <description>dCMn__dTE4L_rad</description>

        <table>

            <independentVar lookup="row">velocities/vt-fps</independentVar>

            <independentVar lookup="column">aero/alpha-deg</independentVar>

            <tableData>
                      -6.0      -2.0      2.0      10.0
                56.26640419947507    -0.0046124 -0.0022676  0.0001321 -0.0015928
                95.6528871391076    -0.0046215 -0.0022737  0.0001282 -0.0015644
                135.03937007874012    -0.0045682 -0.0022651  0.0001085 -0.0017746
                </tableData>

        </table>

    </function>

    <function name="aero/coefficient/CMn__dTE4L_rad">

        <description>CMn__dTE4L_rad = dCMn__dTE4L_rad * dTE4L_rad</description>

        <product>

            <property>aero/coefficient/dCMn__dTE4L_rad</property>

            <property>fcs/posTE4L_rad</property>

        </product>

    </function>

    <function name="aero/coefficient/dCMn__dTE5R_rad">

        <description>dCMn__dTE5R_rad</description>

        <table>

            <independentVar lookup="row">velocities/vt-fps</independentVar>

            <independentVar lookup="column">aero/alpha-deg</independentVar>

            <tableData>
                      -6.0      -2.0      2.0      10.0
                56.26640419947507    0.0063017 0.0043256 0.0021045 0.0026951
                95.6528871391076    0.0063178 0.0043362 0.0021146 0.0027674
                135.03937007874012    0.0058978 0.0043899 0.0022631 0.0035421
                </tableData>

        </table>

    </function>

    <function name="aero/coefficient/CMn__dTE5R_rad">

        <description>CMn__dTE5R_rad = dCMn__dTE5R_rad * dTE5R_rad</description>

        <product>

            <property>aero/coefficient/dCMn__dTE5R_rad</property>

            <property>fcs/posTE5R_rad</property>

        </product>

    </function>

    <function name="aero/coefficient/dCMn__dTE5L_rad">

        <description>dCMn__dTE5L_rad</description>

        <table>

            <independentVar lookup="row">velocities/vt-fps</independentVar>

            <independentVar lookup="column">aero/alpha-deg</independentVar>

            <tableData>
                      -6.0      -2.0      2.0      10.0
                56.26640419947507    -0.0063019 -0.0043255 -0.0021048 -0.0026956
                95.6528871391076    -0.0063179 -0.0043359 -0.0021147 -0.0027673
                135.03937007874012    -0.0058979 -0.0043899 -0.0022631 -0.0035413
                </tableData>

        </table>

    </function>

    <function name="aero/coefficient/CMn__dTE5L_rad">

        <description>CMn__dTE5L_rad = dCMn__dTE5L_rad * dTE5L_rad</description>

        <product>

            <property>aero/coefficient/dCMn__dTE5L_rad</property>

            <property>fcs/posTE5L_rad</property>

        </product>

    </function>

    <function name="aero/coefficient/dCMn__dLER_rad">

        <description>dCMn__dLER_rad</description>

        <table>

            <independentVar lookup="row">velocities/vt-fps</independentVar>

            <independentVar lookup="column">aero/alpha-deg</independentVar>

            <tableData>
                      -6.0      -2.0      2.0      10.0
                56.26640419947507    -5.018e-04 -3.003e-04 -8.370e-05 -1.401e-04
                95.6528871391076    -5.063e-04 -3.028e-04 -8.380e-05 -2.667e-04
                135.03937007874012    -4.877e-04 -3.074e-04 -7.790e-05 -2.250e-04
                </tableData>

        </table>

    </function>

    <function name="aero/coefficient/CMn__dLER_rad">

        <description>CMn__dLER_rad = dCMn__dLER_rad * dLER_rad</description>

        <product>

            <property>aero/coefficient/dCMn__dLER_rad</property>

            <property>fcs/posLER_rad</property>

        </product>

    </function>

    <function name="aero/coefficient/dCMn__dLEL_rad">

        <description>dCMn__dLEL_rad</description>

        <table>

            <independentVar lookup="row">velocities/vt-fps</independentVar>

            <independentVar lookup="column">aero/alpha-deg</independentVar>

            <tableData>
                      -6.0      -2.0      2.0      10.0
                56.26640419947507    5.019e-04 3.003e-04 8.370e-05 1.407e-04
                95.6528871391076    5.112e-04 3.034e-04 8.430e-05 2.593e-04
                135.03937007874012    4.894e-04 3.077e-04 7.790e-05 2.256e-04
                </tableData>

        </table>

    </function>

    <function name="aero/coefficient/CMn__dLEL_rad">

        <description>CMn__dLEL_rad = dCMn__dLEL_rad * dLEL_rad</description>

        <product>

            <property>aero/coefficient/dCMn__dLEL_rad</property>

            <property>fcs/posLEL_rad</property>

        </product>

    </function>

    <function name="aero/coefficient/CMn">

        <description>CMn summation</description>

        <sum>

            <property>aero/coefficient/CMn__zero</property>

            <property>aero/coefficient/CMn__alpha_rad</property>

            <property>aero/coefficient/CMn__beta_rad</property>

            <property>aero/coefficient/CMn__dpHat_rps</property>

            <property>aero/coefficient/CMn__dqHat_rps</property>

            <property>aero/coefficient/CMn__drHat_rps</property>

            <property>aero/coefficient/CMn__dTE1R_rad</property>

            <property>aero/coefficient/CMn__dTE1L_rad</property>

            <property>aero/coefficient/CMn__dTE2R_rad</property>

            <property>aero/coefficient/CMn__dTE2L_rad</property>

            <property>aero/coefficient/CMn__dTE3R_rad</property>

            <property>aero/coefficient/CMn__dTE3L_rad</property>

            <property>aero/coefficient/CMn__dTE4R_rad</property>

            <property>aero/coefficient/CMn__dTE4L_rad</property>

            <property>aero/coefficient/CMn__dTE5R_rad</property>

            <property>aero/coefficient/CMn__dTE5L_rad</property>

            <property>aero/coefficient/CMn__dLER_rad</property>

            <property>aero/coefficient/CMn__dLEL_rad</property>

        </sum>

    </function>

    <axis name="LIFT">

        <function name="aero/force/LIFT__CL">

            <description>LIFT from CL</description>

            <product>

                <property>aero/qbar-area</property>

                <property>aero/coefficient/CL</property>

            </product>

        </function>

    </axis>

    <axis name="DRAG">

        <function name="aero/force/DRAG__CD">

            <description>DRAG from CD</description>

            <product>

                <property>aero/qbar-area</property>

                <property>aero/coefficient/CD</property>

            </product>

        </function>

    </axis>

    <axis name="SIDE">

        <function name="aero/force/SIDE__CY">

            <description>SIDE from CY</description>

            <product>

                <property>aero/qbar-area</property>

                <property>aero/coefficient/CY</property>

            </product>

        </function>

    </axis>

    <axis name="ROLL">

        <function name="aero/moment/ROLL__CMl">

            <description>ROLL from CMl</description>

            <product>

                <property>aero/qbar-area</property>

                <property>metrics/bw-ft</property>

                <property>aero/coefficient/CMl</property>

            </product>

        </function>

    </axis>

    <axis name="PITCH">

        <function name="aero/moment/PITCH__CMm">

            <description>PITCH from CMm</description>

            <product>

                <property>aero/qbar-area</property>

                <property>metrics/cbarw-ft</property>

                <property>aero/coefficient/CMm</property>

            </product>

        </function>

    </axis>

    <axis name="YAW">

        <function name="aero/moment/YAW__CMn">

            <description>YAW from CMn</description>

            <product>

                <property>aero/qbar-area</property>

                <property>metrics/bw-ft</property>

                <property>aero/coefficient/CMn</property>

            </product>

        </function>

    </axis>

</aerodynamics>
