<?xml version="1.0" ?>

<fdm_config release="Alpha" version="2.0">

    <flight_control file="Systems\FlightControl.xml"/>

    <system file="Systems\Effectors.xml"/>


    <mass_balance file="Mass_DKS.xml"/>

    <ground_reactions file="Gear.xml"/>

    <propulsion file="Propulsion.xml"/>

    <metrics file="Metrics_DKS.xml"/>

    <aerodynamics file="Aero_DKS_Deform.xml"/>


    <external_reactions file="Winch.xml"/>


    <system file="Systems\SensorImu.xml"/>

    <system file="Systems\SensorGps.xml"/>

    <system file="Systems\Sensor5Hole.xml"/>

</fdm_config>
