<?xml version="1.0"?>
<propeller name="APC 6x4e" version="1.1"> <!-- derived from APC website -->
  <ixx unit="KG*M2"> 9.84e-06 </ixx> <!-- derived from APC mass -->
  <diameter unit="IN"> 6.0 </diameter>
  <numblades> 2 </numblades>
  <minrpm> 0 </minrpm>
  <maxrpm> 12000 </maxrpm>
  <constspeed> 0 </constspeed>

  <table name="C_THRUST" type="internal">
    <tableData>
        0.      0.124
        0.0309  0.1237
        0.0618  0.1233
        0.0926  0.1228
        0.1235  0.122
        0.1544  0.1211
        0.1853  0.1199
        0.2162  0.1183
        0.2468  0.1163
        0.2776  0.1139
        0.3085  0.1109
        0.3394  0.1074
        0.3703  0.1034
        0.4012  0.0991
        0.4321  0.0944
        0.4626  0.0892
        0.4935  0.0837
        0.5244  0.0782
        0.5553  0.0724
        0.5862  0.0666
        0.6171  0.0606
        0.6479  0.0545
        0.6788  0.0482
        0.7097  0.0418
        0.7403  0.0352
        0.7712  0.0284
        0.8021  0.0215
        0.8329  0.0145
        0.8641  0.0073
        0.895  -0.
    </tableData>
  </table>

  <table name="C_POWER" type = "internal">
    <tableData>
        0.     0.0774
        0.0309 0.0772
        0.0618 0.0769
        0.0926 0.0765
        0.1235 0.0761
        0.1544 0.0755
        0.1853 0.0748
        0.2162 0.074
        0.2468 0.073
        0.2776 0.0717
        0.3085 0.0702
        0.3394 0.0686
        0.3703 0.0668
        0.4012 0.065
        0.4321 0.063
        0.4626 0.0609
        0.4935 0.0588
        0.5244 0.0566
        0.5553 0.0541
        0.5862 0.0514
        0.6171 0.0484
        0.6479 0.0451
        0.6788 0.0414
        0.7097 0.0374
        0.7403 0.0329
        0.7712 0.0281
        0.8021 0.023
        0.8329 0.0175
        0.8641 0.0121
        0.895  0.0078
    </tableData>
  </table>

</propeller>
