<?xml version="1.0"?>
<propeller name="DJI 9450" version="1.1">
  <ixx unit="KG*M2"> 6.05e-05 </ixx> <!-- (1/12) * 12.6e-3 * (9.45*0.0254)^2 -->
  <diameter unit="IN"> 9.45 </diameter>
  <numblades> 2 </numblades>
  <minrpm> 0 </minrpm>
  <maxrpm> 10000 </maxrpm>
  <constspeed> 0 </constspeed>

  <table name="C_THRUST" type="internal"> <!-- derived from APC website for the 9X4.5e -->
    <tableData>
      0.      0.1016
      0.0215  0.1009
      0.0538  0.1
      0.0754  0.0989
      0.1077  0.0976
      0.1292  0.0961
      0.1508  0.0943
      0.1831  0.0923
      0.2046  0.0901
      0.2369  0.0875
      0.2585  0.0848
      0.28    0.0818
      0.3123  0.0786
      0.3338  0.0751
      0.3654  0.0713
      0.3877  0.0674
      0.4092  0.0632
      0.4415  0.059
      0.4631  0.0546
      0.4938  0.0502
      0.5169  0.0456
      0.5385  0.041
      0.5708  0.0362
      0.5923  0.0313
      0.6231  0.0263
      0.6462  0.0212
      0.6677  0.016
      0.7     0.0108
      0.7215  0.0054
      0.7515 -0.
    </tableData>
  </table>

  <table name="C_POWER" type = "internal"> <!-- derived from APC website for the 9X4.5e -->
    <tableData>
      0.     0.0491
      0.0215 0.048
      0.0538 0.047
      0.0754 0.046
      0.1077 0.0451
      0.1292 0.0443
      0.1508 0.0432
      0.1831 0.0426
      0.2046 0.0424
      0.2369 0.0418
      0.2585 0.0412
      0.28   0.0405
      0.3123 0.0397
      0.3338 0.0387
      0.3654 0.0377
      0.3877 0.0365
      0.4092 0.0352
      0.4415 0.0338
      0.4631 0.0323
      0.4938 0.0306
      0.5169 0.0288
      0.5385 0.0268
      0.5708 0.0246
      0.5923 0.0221
      0.6231 0.0195
      0.6462 0.0168
      0.6677 0.0139
      0.7    0.0108
      0.7215 0.0076
      0.7515 0.005
    </tableData>
  </table>

</propeller>
